Simulations: Version=58
  Memo TitlePage
    # The APSIM Grapevine Model

    ZHU, J., Brown, H.E., Parker, A.K.,Trought, M.C.T.

    ##Building the model.
    The APSIM Grapevine model has been adapted from the potato model [Brown_etal_2011] and developed using the Plant Modelling Framework (PMF) of [brown_plant_2014]. This new framework provides a library of plant organ and process submodels that can be coupled, at runtime, to construct a model in much the same way that models can be coupled to construct a simulation. This means that dynamic composition of lower level process and organ classes (e.g. photosynthesis, leaf) into larger constructions (e.g. maize, wheat, sorghum) can be achieved by the model developer without additional coding.

    The model consists of:
    * a phenology model to simulate development between growth phases
    * a structure model to simulate plant morphology
    * a collection of organs to simulate the various plant parts
    * an arbitrator to allocate resources (N, biomass) to the various plant organs

    ##Pecularities of Grapevine
    Grapevine is a challenging crop to model because it is a perennial woody plant.
    A budding phase was added for simulating the start of the vegetative phase. This budding phase was similar to the emergence phase for annual crop.
    There are an enormous number of Grapevine cultivars and trainning systems. They differ in phenology and vegetative growth.

    ##Including a Grapevine crop in an APSIM simulation
    To indluce a Grapevine crop in a simulation the grapevine plant needs to be added to the vineyard, field or zone in which it is to be grown.  This can be done by right clicking on the vineyard, selecting Add from the drop down menu and then selecting Plant from the list that comes up.
    ###Setting plant density and bud number (budNumber number and early canopy growth)
    The Grapevine Management script sets the number of stems that will appear from plant.
    ###Setting final leaf number (Crop duration)
    The duration of a Grapevine crop is determined by the number of leaves that the mainstem produces and how long it takes for these to appear and seness.
  Replacements
    Plant Grapevine: CropType=Grapevine; IsEnding=false; DaysAfterEnding=0
      Cultivar SauvignonBlanc
      Phenology
        WangEngelTempFunction ThermalTime: MinTemp=4; OptTemp=28; MaxTemp=40; RefTemp=25; MaximumTemperatureWeighting=0.5
        GenericPhase Dormancy: Start=EndoDormancy; End=EcoDormancy
          Constant Target: FixedValue=1
          VariableReference Progression: VariableName=[Phenology].ThermalTime.Value()
        GenericPhase Veg: Start=EcoDormancy; End=StartFlowering
          Constant Target: FixedValue=40.7
          VariableReference Progression: VariableName=[Phenology].ThermalTime.Value()
        GenericPhase Flowering: Start=StartFlowering; End=EndFlowering
          Constant Target: FixedValue=0.1
          VariableReference Progression: VariableName=[Phenology].ThermalTime.Value()
        GenericPhase BerryDevelopment: Start=EndFlowering; End=Veraison
          MultiplyFunction Target
            Constant Base: FixedValue=39.8
          VariableReference Progression: VariableName=[Phenology].ThermalTime.Value()
        GenericPhase Ripening: Start=Veraison; End=Mature
          VariableReference Progression: VariableName=[Phenology].ThermalTime.Value()
          Constant Target: FixedValue=10
        GenericPhase LeafDeath: Start=Mature; End=LeafFall
          VariableReference Progression: VariableName=[Phenology].ThermalTime.Value()
          Constant Target: FixedValue=40
        GotoPhase: Start=LeafDeath; End=Unused; PhaseNameToGoto=Dormancy
        AccumulateByDate DoyJuly1st: StartDate=01-JUL; EndDate=30-JUN; ResetDate=30-JUN
          Constant Days: FixedValue=1; Units=days/day
        OnEventFunction CurrentSeason: SetEvent=EcoDormancy; ReSetEvent=EndoDormancy
          Memo
            A function is used to capture the year of the current season as in the south hemisphere the growing season extends to the second year.
          Constant PreEventValue: FixedValue=2003
          VariableReference PostEventValue: VariableName=[Clock].Today.Year
        OnEventFunction FloweringDOY: SetEvent=StartFlowering; ReSetEvent=EndoDormancy
          Memo
            A function is used to provide flowering date as days after sowing(DAS).
          Constant PreEventValue: FixedValue=0
          VariableReference PostEventValue: VariableName=[Clock].Today.DayOfYear
        OnEventFunction VeraisonDOY: SetEvent=Veraison; ReSetEvent=EndoDormancy
          Memo
            A function is used to provide flowering date as days after sowing(DAS).
          Constant PreEventValue: FixedValue=0
          VariableReference PostEventValue: VariableName=[Clock].Today.DayOfYear
        DivideFunction MeanTmax
          AccumulateByNumericPhase: StartStageName=2.68; EndStageName=4.677; ResetStageName=EcoDormancy; FractionRemovedOnCut=0; FractionRemovedOnHarvest=0; FractionRemovedOnGraze=0; FractionRemovedOnPrune=0
            VariableReference Tmax: VariableName=[Management].ExtraVariables.Script.Tmax
          AccumulateByNumericPhase Days: StartStageName=2.68; EndStageName=4.677; ResetStageName=EcoDormancy; FractionRemovedOnCut=0; FractionRemovedOnHarvest=0; FractionRemovedOnGraze=0; FractionRemovedOnPrune=0
            Constant Days: FixedValue=1; Units=days/day
        DivideFunction MeanRad
          AccumulateByNumericPhase: StartStageName=2.806; EndStageName=4.865; ResetStageName=EcoDormancy; FractionRemovedOnCut=0; FractionRemovedOnHarvest=0; FractionRemovedOnGraze=0; FractionRemovedOnPrune=0
            VariableReference Radn: VariableName=[Management].ExtraVariables.Script.Radn
          AccumulateByNumericPhase Time: StartStageName=2.806; EndStageName=4.865; ResetStageName=EcoDormancy; FractionRemovedOnCut=0; FractionRemovedOnHarvest=0; FractionRemovedOnGraze=0; FractionRemovedOnPrune=0
            Constant Days: FixedValue=1; Units=days/day
        OnEventFunction MeanTmaxIni: SetEvent=Mature
          Constant PreEventValue: FixedValue=15
          VariableReference PostEventValue: VariableName=[Phenology].MeanTmax
        OnEventFunction MeanRadnIni: SetEvent=Mature
          Constant PreEventValue: FixedValue=15
          VariableReference PostEventValue: VariableName=[Phenology].MeanRad
        OnEventFunction YieldEstimation: SetEvent=Veraison
          Constant PreEventValue: FixedValue=10
          AddFunction PostEventValue
            Constant: FixedValue=0
            LinearInterpolationFunction TmaxIni: XProperty=[Phenology].MeanTmaxIni
              XYPairs: X=[15, 20, 25]; Y=[9, 12, 15]
            LinearInterpolationFunction RadIni: same as Replacements.Grapevine.Phenology.YieldEstimation.PostEventValue.TmaxIni
            LinearInterpolationFunction Tmax: XProperty=[Phenology].MeanTmax
              XYPairs: same as Replacements.Grapevine.Phenology.YieldEstimation.PostEventValue.TmaxIni.XYPairs
    Folder Management
      Operations
        2004-07-01  [Grapevine].Sow(population: 0.231481, cultivar: "SauvignonBlanc", depth: 800, rowSpacing: 2400, budNumber:24);
      Manager Pruning
        PruneDateString = 1-July
```csharp
using System;
using System.Collections.Generic;
using Models.Core;
using Models.PMF;
using Models.PMF.Interfaces;
using System.Xml.Serialization;

namespace Models
{
    [Serializable] 
    [System.Xml.Serialization.XmlInclude(typeof(Model))]
    public class Script : Model
    {
        [Link] Plant Grapevine;
        [Link] Clock Clock;

        [Description("Prune Date")]
        public string PruneDateString { get; set; }
        [XmlIgnore] private DateTime PruneDate { get; set; }
        [XmlIgnore] private RemovalFractions Remove { get; set; }
        
        [EventSubscribe("Commencing")]
        private void OnSimulationCommencing(object sender, EventArgs e)
        {
            Remove = new RemovalFractions();
        }
        
        [EventSubscribe("DoManagement")]
        private void OnDoManagement(object sender, EventArgs e)
        {
            //Set up  array of remove fractions to send with Cut method.  Each member in the array corresponds to an organ in the same order they are set up in.
            PruneDate = DateTime.Parse(PruneDateString);
                        
            if (PruneDate.Month == Clock.Today.Month && PruneDate.Day == Clock.Today.Day)
            {
                Remove.SetPhenologyStage = 1;
                Grapevine.RemoveBiomass("Prune", Remove);
            }
        }
    }
}
```
      Manager ExtraVariables
        Tmax = 0
        Tmin = 0
        Radn = 0
```csharp
using System;
using Models.Core;
using Models.PMF;
using Models;
using System.Xml.Serialization;
using APSIM.Shared.Utilities;

namespace Models
{
    [Serializable] 
  //  [System.Xml.Serialization.XmlInclude(typeof(Model))]
    public class Script : Model
    {
        [Link] Clock Clock;
        [Link] Weather Met;
       
        [Description("Tmax")]         
        public double Tmax { get; set; } 
        [Description("Tmin")]         
        public double Tmin { get; set; }  //mm
        [Description("Radn")]         
        public double Radn { get; set; }  //mm

        [EventSubscribe("StartOfDay")]
        private void StartOfDay(object sender, EventArgs e)
        {
               Tmax = Met.MaxT;
               Tmin = Met.MinT;
               Radn = Met.Radn;
        }
        
     }
}
```
    Report: EventNames=[Clock].DoReport
      VariableNames:
        [Clock].Today
        [Clock].Today.Year
        [Clock].Today.DayOfYear
        [Grapevine].DOYFromJuly1st.Value()
        [Grapevine].Phenology.CurrentSeason.Value()
        [Grapevine].Phenology.Stage
        [Grapevine].Phenology.FloweringDOY.Value()
        [Grapevine].Phenology.VeraisonDOY.Value()
        [Grapevine].Phenology.CurrentStageName
        [Grapevine].Phenology.AccumulatedTT
        [Grapevine].Phenology.DoyJuly1st
        [Grapevine].Phenology.MeanTmax as meanTmax
        [Grapevine].Phenology.MeanTmaxIni as TmaxIni
        [Grapevine].Phenology.YieldEstimation as Yield
        [Grapevine].Phenology.MeanRadnIni as RadnIni
        [Management].ExtraVariables.Script.Tmax as metTmax
    Report HarvestReport: EventNames=[Grapevine].Pruning
      VariableNames:
        [Clock].Today.Year
        [Grapevine].DOYFromJuly1st.Value()
        [Grapevine].Phenology.CurrentSeason.Value()
        [Grapevine].Phenology.Stage
        [Grapevine].Phenology.FloweringDOY.Value()
        [Grapevine].Phenology.VeraisonDOY.Value()
        [Grapevine].Phenology.CurrentStageName
        [Grapevine].Phenology.AccumulatedTT
        [Grapevine].Phenology.DoyJuly1st
        [Grapevine].Phenology.MeanTmax as meanTmax
        [Grapevine].Phenology.MeanTmaxIni as TmaxIni
        [Grapevine].Phenology.YieldEstimation as Yield
        [Grapevine].Phenology.MeanRad as RadnIni
        [Management].ExtraVariables.Script.Tmax
  DataStore
  Simulation YieldPrediction
    Weather: FileName=Site1004_RPC.met
    Clock: StartDate=2004-07-01; EndDate=2006-07-01
    Summary
    SoilArbitrator Soil Arbitrator
    Zone Vineyard: Area=1; Slope=0
      Memo
        Double Guyôt-trained vines, pruned each year to retain 24 nodes were monitored. Vines were trained using vertical shoot positioning (VSP), with an exposed leaf area height of 1.2 m, and trimmed to maintain a compact canopy. Vines were planted 1.8 m apart within the row, and 2.4 m apart between rows. Average flowering date was determined by monitoring all the inflorescences on one cane on a vine in each plot on a regular basis throughout flowering. Likewise, regular berry samples (at least weekly) were taken from before the date of véraison until harvest at a soluble solids concentration value of 21.5 oBrix.
      Soil: SoilType=Sedementary; LocalName=Lincoln; Latitude=0; Longitude=0; AirDry=[0.08, 0.16, 0.15, 0.13, 0.15, 0.15]
        Water
          Thickness  BD   AirDry  LL15  DUL   SAT
          100        1.2  0.08    0.16  0.33  0.5
          200        1.2  0.16    0.16  0.33  0.5
          300        1.2  0.15    0.15  0.31  0.44
          300        1.2  0.13    0.13  0.27  0.46
          300        1.2  0.15    0.15  0.3   0.44
          300        1.2  0.15    0.15  0.3   0.44
          SoilCrop GrapevineSoil: LL=[0.13, 0.13, 0.1, 0.15, 0.15, 0.15]; KL=[0.1, 0.06, 0.04, 0.01, 0.0051, 0.002]; XF=[1, 1, 1, 1, 0.5, 0.2]
        SoilWater: SummerDate=1-Nov; SummerU=9; SummerCona=4.4; WinterDate=1-Apr; WinterU=9; WinterCona=4.4; DiffusConst=88; DiffusSlope=35.4; Salb=0.18; CN2Bare=0; CNRed=-9e-05; CNCov=0; slope=0; discharge_width=0; catchment_area=0; max_pond=0; ResidueInterception=0
          Thickness  SWCON  KLAT
          100        0.55   0
          200        0.55   0
          300        0.55   0
          300        0.55   0
          300        0.55   0
          300        0.55   0
        SoilNitrogen: fom_types=[default, manure, mucuna, lablab, shemp, stable]; fract_carb=[0.2, 0.3, 0.54, 0.57, 0.45, 0]; fract_cell=[0.7, 0.3, 0.37, 0.37, 0.47, 0.1]; fract_lign=[0.1, 0.4, 0.09, 0.06, 0.08, 0.9]
          SoilNitrogenNO3 NO3
          SoilNitrogenNH4 NH4
          SoilNitrogenUrea Urea
          SoilNitrogenPlantAvailableNO3 PlantAvailableNO3
          SoilNitrogenPlantAvailableNH4 PlantAvailableNH4
        SoilOrganicMatter: RootCN=30; EnrACoeff=7.4; EnrBCoeff=0.2; OCUnits=Total
          Thickness  OC    SoilCN  FBiom  FInert  RootWt
          100        3.5   11.5    0.025  0.3     1243.93
          200        2.5   11.5    0.025  0.4     833.832
          300        1.2   11.5    0.015  0.75    457.617
          300        1.03  11.5    0.01   0.9     251.145
          300        0.47  11.5    0.01   0.96    137.831
          300        0.47  11.5    0.01   0.96    75.6435
        Analysis: Thickness=[100, 200, 300, 300, 300, 300]; PH=[6.6, 6.2, 5.7, 5.5, 5.5, 5.5]; PHUnits=Water; BoronUnits=0
        InitialWater Initial water: PercentMethod=0; FractionFull=1
        Sample: NO3Units=kg/ha; NH4Units=kg/ha; SWUnits=Volumetric; OCUnits=Total; PHUnits=Water
          Thickness  NO3   NH4
          100        40    0.1
          200        30    0.1
          300        14    0.1
          300        14    0.1
          300        1.38  0.1
          300        1.38  0.1
        CERESSoilTemperature
      SurfaceOrganicMatter: InitialResidueName=Grapevine; InitialResidueType=Grapevine; InitialResidueMass=2000; InitialStandingFraction=0; InitialCPR=0; InitialCNR=80; FractionFaecesAdded=0.5
      MicroClimate: a_interception=0; b_interception=1; c_interception=0; d_interception=0; soil_albedo=0.23; SoilHeatFluxFraction=0.4; NightInterceptionFraction=0.5; ReferenceHeight=2
      Irrigation
      Fertiliser
      Plant Grapevine: CropType=Grapevine; IsEnding=false; DaysAfterEnding=0
      Report: EventNames=[Clock].DoReport
      Folder Management
        Operations
          2004-07-01  [Grapevine].Sow(population: 0.231481, cultivar: "SauvignonBlanc", depth: 800, rowSpacing: 2400, budNumber:24);
        Manager Pruning
          PruneDateString = 1-March
          script: same as in Replacements.Management.Pruning
  Experiment SimulationExp
    Memo Experiment Description
      We need to create the sensitivity analysis framework now. We try adding as a new experiment in same APSIM-X file (see below, we separate if becomes messy) that:

      image

      Details:

      1- Run fodder-beet/catch-crop rotations from 1971 to 2000

      2- Four locations/.met already added here: K:\Rainshelter\MultiCropRotation_APSIM_X\ObservedData\Weather\SensAnMet

      image

      3- Management

      Sow automatically FB on 15 Nov
      Harvest FB on 15 May
      Sow CC on 15 June
      Harvest CC on 10 Nov
      4- Factorial treatments:

      2 x water (rain-fed x fully irrigated)
      2 x N (0 or 400 kg N/ha on fodder beet)
      5- Important aspects

      Continuous rotation (no soil re-set) for 30 years
    Factors
      Factor Pruning
        CompositeFactor Early: Specifications=[Pruning].Script.PruneDateString = 1-July
    Simulation Grape
      Weather: FileName=Site1004_RPC.met
      Clock: StartDate=2004-07-01; EndDate=2014-07-01
      Summary
      SoilArbitrator Soil Arbitrator
      Zone Block: Area=1; Slope=0
        Memo: same as YieldPrediction.Vineyard.Memo
        Folder Manager folder
          Manager FactorLabels
            AGENT_NO = 999
            Lat = 999
            Lon = 999
            SoilStamp = lowWHC
            GCM = Had
            RCP = RCP25
            TS = Baseline
```csharp
using System;
using Models.Core;
using Models.PMF;
using Models.Soils;
using System.Xml.Serialization;
using Models.PMF;
using APSIM.Shared.Utilities;
        
namespace Models
{
    [Serializable] 
 //   [System.Xml.Serialization.XmlInclude(typeof(Model))]
    public class Script : Model
    {
        [Link] Clock Clock;
        [Link] ISummary summary;
        [Description("AGENT_NO: ")]
        public string AGENT_NO { get; set; }             
        [Description("Lat: ")]
        public string Lat { get; set; }
        [Description("Lon: ")]
        public string Lon { get; set; }
        [Description("SoilStamp: ")]
        public string SoilStamp { get; set; }
        [Description("GCM: ")]
        public string GCM { get; set; }
        [Description("RCP: ")]
        public string RCP { get; set; }
        [Description("Time Slice: ")]
        public string TS { get; set; }
        private RemovalFractions removalFractions;
        
        [EventSubscribe("DoManagementCalculations")]
        private void OnDoManagementCalculations(object sender, EventArgs e)
        {
        // Sort out timeSlice classification
                        if ((Clock.Today.Date.Year <= 2005))
                {
                TS = "Baseline";
                } else {
                TS = "Future";
                }

        }      
    }
}
```
          Operations
            2004-07-01  [Grapevine].Sow(population: 0.231481, cultivar: "SauvignonBlanc", depth: 800, rowSpacing: 2400, budNumber:24);
          Manager Pruning: same as Replacements.Management.Pruning
          Manager ExtraVariables: same as Replacements.Management.ExtraVariables
        Soil: same as YieldPrediction.Vineyard.Soil
        SurfaceOrganicMatter: InitialResidueName=Grapevine; InitialResidueType=Grapevine; InitialResidueMass=2000; InitialStandingFraction=0; InitialCPR=0; InitialCNR=80; FractionFaecesAdded=0.5
        MicroClimate: a_interception=0; b_interception=1; c_interception=0; d_interception=0; soil_albedo=0.23; SoilHeatFluxFraction=0.4; NightInterceptionFraction=0.5; ReferenceHeight=2
        Irrigation
        Fertiliser
        Plant Grapevine: CropType=Grapevine; IsEnding=false; DaysAfterEnding=0
        Report Output: EventNames=[Grapevine].Pruning
          VariableNames:
            [Clock].Today.Year as Year
            [Clock].Today as ReportDate
            [FactorLabels].Script.AGENT_NO as AGENT_NO
            [FactorLabels].Script.Lat as Lat
            [FactorLabels].Script.Lon as Lon
            [FactorLabels].Script.GCM as GCM
            [FactorLabels].Script.RCP as RCP
            [FactorLabels].Script.TS as TimeSlice
            [FactorLabels].Script.SoilStamp as SoilStamp
            [Grapevine].Phenology.CurrentSeason.Value() as CurrentSeason
            [Grapevine].Phenology.Stage as PhenoStageCode
            [Grapevine].Phenology.FloweringDOY.Value() as DOY_Flowering
            [Grapevine].Phenology.VeraisonDOY.Value() as DOY_Veraison
            [Grapevine].Phenology.AccumulatedTT as TTsum
            [Grapevine].Phenology.DoyJuly1st as DOY_01Jul
            [Grapevine].Phenology.MeanTmax as meanTmax
            [Grapevine].Phenology.MeanTmaxIni as TmaxIni
            [Grapevine].Phenology.YieldEstimation as Yield
            [Grapevine].Phenology.MeanRad as RadnIni
            [Management].ExtraVariables.Script.Tmax as Tmax
        Report: same as Replacements.Report
        Folder Management: same as Replacements.Management
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