Simulations: Version=46
  Memo Title page
    # APSIM Fodder Beet Model

    Khaembah E.N., Brown H.E., Zyskowski R., Chakwizira E., de Ruiter J.M., Teixeira E.I.

    The New Zealand Institute for Plant & Food Research Limited
    Private Bag 4704, Christchurch, New Zealand

    The APSIM Fodder Beet Model has been developed using the Plant Modelling Framework (PMF) of [brown_plant_2014]. This framework provides a library of plant organ and process submodels that can be coupled, at runtime, to construct a model in much the same way that models can be coupled to construct a simulation. This means that dynamic composition of lower level process and organ classes (e.g. photosynthesis, leaf) into larger constructions (e.g. maize, barley, sorghum) can be achieved by the model developer without additional coding.

    The model consists of:

    * A phenology model to simulate development between growth phases
    * A structure model to simulate plant morphology
    * A collection of organs to simulate the various plant parts
    * An arbitrator to allocate resources (N, biomass) to various plant organs.
  Replacements
    Plant Kale: CropType=Kale
      OrganArbitrator Arbitrator
        RelativeAllocation NArbitrator
        RelativeAllocation DMArbitrator
      Phenology
        Constant ThermalTimeK: FixedValue=10
        MultiplyFunction ThermalTime
          PhaseLookup
            PhaseLookupValue SoilTemperature: Start=Sowing; End=Germination
              SoilTemperatureFunction ThermalTime: maxt_soil_surface=20; mint_soil_surface=10
                XYPairs: X=[2, 20, 35]; Y=[0, 18, 1]
              Memo
                The effect of soil temperature can go beyond germination as has been demonstrated in previous studies
                ([Stone_etal_1998]).
            PhaseLookupValue AirTemperature: Start=Germination; End=Maturity
              AirTemperatureFunction ThermalTime
                XYPairs: X=[2, 20, 35]; Y=[0, 18, 0]
              Memo
                Temperature is extrapolated to 3-hourly values from daily maximum and minimum using a sinusoidal function, and thermal-time accumulation is calculated for each period and combined to give daily values ([Jones_etal_1986]). The optimum temperature was set at 25–30°C with a maximum of 45°C, targets assumed similar to those of sugar beet reported by ([Ober_Rajabi_2010]) and ([Sanghera_etal_2016]).
          AddFunction DroughtPhenologyAcelleration
            Constant One: FixedValue=1
            MultiplyFunction Stress
              Constant StressResponseCoefficient: FixedValue=2
              LinearInterpolationFunction StressFactor: XProperty=[Kale].Leaf.Fw
                XYPairs: X=[0, 1]; Y=[0, 0]
        GerminatingPhase Planted: Start=Sowing; End=Germination
        EmergingPhase Germinating: ShootLag=0; ShootRate=10; Start=Germination; End=PreEmerge; TTForTimeStep=0
          VariableReference ThermalTime: VariableName=[Phenology].ThermalTime.Value()
          Memo
            Turned off the lag and used only the Tt per mm to empirically fit simulations to FRNL data of emergence.
        GenericPhase Emerging: Start=PreEmerge; End=Emergence
          Constant Target: FixedValue=100
          VariableReference Progression: VariableName=[Phenology].ThermalTime.Value()
        GenericPhase Emerged: Start=Emergence; End=Expanding
          Constant Target: FixedValue=350
          VariableReference Progression: VariableName=[Phenology].ThermalTime.Value()
        GenericPhase Expanding: Start=Expanding; End=Vegetative
          Constant Target: FixedValue=500
          VariableReference Progression: VariableName=[Phenology].ThermalTime.Value()
        GenericPhase Vegetative: Start=Vegetative; End=Maturity
          Constant Target: FixedValue=2000
          VariableReference Progression: VariableName=[Phenology].ThermalTime.Value()
        EndPhase Maturity: Start=Maturity; End=Unused
          Constant Target: FixedValue=15000
          VariableReference ThermalTime: VariableName=[Phenology].ThermalTime.Value()
        AccumulateFunction AccumulatedThermalTime: StartStageName=PreEmerge; EndStageName=Maturity; FractionRemovedOnCut=0; FractionRemovedOnHarvest=0; FractionRemovedOnGraze=0; FractionRemovedOnPrune=0
          VariableReference: VariableName=[Phenology].ThermalTime.Value()
        PhotoperiodFunction Photoperiod: Twilight=-6; DayLength=0
      Structure: CohortInitialisationStage=Germination; LeafInitialisationStage=Emergence
        VariableReference ThermalTime: VariableName=[Phenology].ThermalTime.Value()
        LinearInterpolationFunction HeightModel: XProperty=[Structure].LeafTipsAppeared
          XYPairs: X=[0, 24]; Y=[20, 2500]
        PhaseLookupValue MainStemPrimordiaInitiationRate: Start=PreEmerge; End=Maturity
          DivideFunction NodeInitiationRateFunction
            VariableReference Phyllochron: VariableName=[Structure].Phyllochron.Phyllochron.Value
            Constant PrimordiaPerMainstemNode: FixedValue=0
        PhaseLookupValue Phyllochron: Start=PreEmerge; End=Maturity
          LinearInterpolationFunction Phyllochron: XProperty=[Kale].Structure.LeafTipsAppeared
            XYPairs: X=[0, 3, 100]; Y=[100, 100, 100]
            Memo
              Measured value of 45-53oCd/leaf from Emmanuel's data and FRNL data too.

              Two stage phyllochron (100oCd to 50oCd) is an empirical fix to get first leaves right. May be in fact response to soil temperature at later stages. To check.

              There seems to be a seasonal difference in leaf appearance rates across sowing dates. So we should check thermal-time model.
        Constant FinalLeafNumber: FixedValue=80
        Constant DroughtInducedBranchMortality: FixedValue=0
        Constant BranchingRate: FixedValue=0
        Constant BranchMortality: FixedValue=0
        Constant PlantMortality: FixedValue=0
        Constant StemSenescenceAge: FixedValue=0
      Leaf: MaxCover=1; Albedo=0.2; Gsmax=0.015; R50=150; MicroClimatePresent=true; KDead=0.03; MaximumMainStemLeafNumber=80
        zero: CurrentExpandingLeaf, StartFractionExpanded, FractionNextleafExpanded, DeadNodesYesterday, GrowthRespiration, FRGR, PotentialEP, TipsAtEmergence, CohortsAtInitialisation, FractionDied
        LeafCohort InitialLeaves[1]: Rank=1; Area=50
          zero: NReallocationFactor, DMReallocationFactor, NRetranslocationFactor, DMRetranslocationFactor, ShadeInducedSenRate, SenescedFrac, DeltaPotentialArea, DeltaStressConstrainedArea, DeltaCarbonConstrainedArea, PotentialStructuralDMAllocation, PotentialMetabolicDMAllocation, MetabolicNReallocated, MetabolicWtReallocated, StorageNReallocated, StorageWtReallocated, MetabolicNRetranslocated, StorageNRetrasnlocated, DMRetranslocated, MetabolicNAllocation, StructuralDMAllocation, MetabolicDMAllocation, MaintenanceRespiration
        CompositeBiomass Total: DMDOfStructural=0.6; Propertys=[[Leaf].Live, [Leaf].Dead]
        VariableReference ThermalTime: VariableName=[Phenology].ThermalTime.Value()
        RUEModel Photosynthesis
          Constant RUE: FixedValue=1.6
          Constant FVPD: FixedValue=1
          WeightedTemperatureFunction FT: MaximumTemperatureWeighting=1
            XYPairs: X=[0, 10, 18, 26, 38]; Y=[0.1, 1, 1, 1, 0]
          LinearInterpolationFunction FW: XProperty=[Leaf].Fw
            XYPairs: X=[0, 1, 1.5]; Y=[0, 1, 1]
          RUECO2Function FCO2: PhotosyntheticPathway=C3
          VariableReference RadnInt: VariableName=[Leaf].RadIntTot
          LinearInterpolationFunction FN: XProperty=[Leaf].Fn
            XYPairs: X=[0, 1, 1.5]; Y=[0, 1, 1]
        LinearInterpolationFunction FrostFraction: XProperty=[Weather].MinT
          XYPairs: X=[-1, 0]; Y=[0, 0]
        MultiplyFunction ExtinctionCoeff
          Constant PotentialExtinctionCoeff: FixedValue=0.8
          LinearInterpolationFunction WaterStress: XProperty=[Leaf].Fw
            XYPairs: X=[0, 1]; Y=[0.5, 1]
        LeafCohortParameters CohortParameters: ExpansionStressValue=0
          LinearInterpolationFunction MaxArea: XProperty=[Structure].LeafTipsAppeared
            XYPairs: X=[0, 2, 4, 6, 8]; Y=[500, 30000, 60000, 90000, 120000]
            Memo
              Pattern of max leaf area assumed from sugar beet: Milford et al. 1985
              Values from measurments A-Block FRNL experiment 2014-15 Plant & Food
          LinearInterpolationFunction GrowthDuration: XProperty=[Structure].LeafTipsAppeared
            XYPairs: X=[0, 6, 11, 15, 21, 35, 45, 50]; Y=[120, 120, 120, 120, 120, 120, 120, 120]
          LinearInterpolationFunction LagDuration: XProperty=[Plant].Leaf.LAI
            XYPairs: X=[0, 3.5, 9]; Y=[300, 200, 200]
            Memo
              Assumed shape as maize data (Teixeira et al 2011).
          Constant SenescenceDuration: FixedValue=200
          Constant DetachmentLagDuration: FixedValue=1E-06
          Constant DetachmentDuration: FixedValue=1
          Constant StructuralFraction: FixedValue=0.1
          Constant SpecificLeafAreaMin: FixedValue=7500
          Constant SpecificLeafAreaMax: FixedValue=8500
          LinearInterpolationFunction ExpansionStress: XProperty=[Leaf].Fw
            XYPairs: X=[0, 0.25, 0.5, 0.75, 1]; Y=[0, 0.1, 0.5, 0.8, 1]
          Constant MinimumNConc: FixedValue=0.015
          Constant CriticalNConc: FixedValue=0.02
          Constant MaximumNConc: FixedValue=0.045
          Constant NReallocationFactor: FixedValue=0.95
          Constant NRetranslocationFactor: FixedValue=0.01
          Constant DMRetranslocationFactor: FixedValue=0.01
          Constant DMReallocationFactor: FixedValue=0.8
          Constant StorageFraction: FixedValue=0.2
          LinearInterpolationFunction ShadeInducedSenescenceRate: XProperty=[Leaf].CohortCurrentRankCoverAbove
            XYPairs: X=[0, 0.5, 0.95, 1]; Y=[0, 0, 0, 0]
          Constant InitialNConc: FixedValue=0
          Constant SenessingLeafRelativeSize: FixedValue=0; Units=0-1
          ArrayFunction LagDurationAgeMultiplier: Values=1 1 1
          ArrayFunction SenescenceDurationAgeMultiplier: Values=1 1 1
          ArrayFunction LeafSizeAgeMultiplier: Values=1 1 1 1 1 1 1 1 1 1 1 1
          Constant RemobilisationCost: FixedValue=0
          Constant CarbonConcentration: FixedValue=0.4
          AddFunction DroughtInducedLagAcceleration
            Constant One: FixedValue=1
            MultiplyFunction Stress
              Constant StressResponseCoefficient: FixedValue=1
              LinearInterpolationFunction StressFactor: XProperty=[Leaf].Fw
                XYPairs: X=[0, 0.5]; Y=[0.5, 0]
          AddFunction DroughtInducedSenAcceleration: same as Replacements.Kale.Leaf.CohortParameters.DroughtInducedLagAcceleration
          Constant CellDivisionStress: FixedValue=1; Units=0-1
          Constant LeafSizeShapeParameter: FixedValue=0.01
          Constant MaintenanceRespirationFunction: FixedValue=0
        MinimumFunction FRGRFunction
          VariableReference RUE_FT: VariableName=[Leaf].Photosynthesis.FT.Value
          MinimumFunction Others
            VariableReference RUE_FN: VariableName=[Leaf].Photosynthesis.FN.Value
            VariableReference RUE_FVPD: VariableName=[Leaf].Photosynthesis.FVPD.Value
        Constant DMConversionEfficiency: FixedValue=1
        Constant RemobilisationCost: FixedValue=0
        Constant CarbonConcentration: FixedValue=0.4
        Constant StructuralFraction: FixedValue=0.5
        BiomassRemoval BiomassRemovalDefaults
          OrganBiomassRemovalType Harvest: FractionLiveToRemove=0.5; FractionDeadToRemove=0; FractionLiveToResidue=0.1; FractionDeadToResidue=0
          OrganBiomassRemovalType Cut: FractionLiveToRemove=0.8; FractionDeadToRemove=0; FractionLiveToResidue=0; FractionDeadToResidue=0
          OrganBiomassRemovalType Prune: FractionLiveToRemove=0; FractionDeadToRemove=0; FractionLiveToResidue=0.6; FractionDeadToResidue=0
          OrganBiomassRemovalType Graze: FractionLiveToRemove=0.6; FractionDeadToRemove=0; FractionLiveToResidue=0.2; FractionDeadToResidue=0
      GenericOrgan Stem
        Constant SenescenceRate: FixedValue=0; Units=/d
        LinearInterpolationFunction MaximumNConc: XProperty=[Phenology].Stage
          XYPairs: X=[3, 4, 6]; Y=[0.06, 0.03, 0.02]
        Constant MinimumNConc: FixedValue=0.006
        Constant NReallocationFactor: FixedValue=0.05
        PhaseBasedSwitch NitrogenDemandSwitch: Start=Germination; End=Maturity
        Constant NRetranslocationFactor: FixedValue=0.05
        Constant DMRetranslocationFactor: FixedValue=0
        Constant InitialWtFunction: FixedValue=0; Units=g/m^2
        Constant DetachmentRateFunction: FixedValue=0; Units=/d
        Constant MaintenanceRespirationFunction: FixedValue=0; Units=0-1
        Constant DMConversionEfficiency: FixedValue=1; Units=0-1
        BiomassRemoval BiomassRemovalDefaults: same as Replacements.Kale.Leaf.BiomassRemovalDefaults
        Constant DMReallocationFactor: FixedValue=0.8
        VariableReference CriticalNConc: VariableName=[Stem].MinimumNConc.Value()
        Constant RemobilisationCost: FixedValue=0
        Constant CarbonConcentration: FixedValue=0.4
        PhaseLookup DMDemandFunctionA
          PhaseLookupValue Early: Start=Emergence; End=Vegetative
            AllometricDemandFunction: Const=32; Power=2.5; XProperty=[Leaf].LAI; YProperty=[Stem].Live.Wt
          PhaseLookupValue Mature: Start=Vegetative; End=Unused
            PartitionFractionDemandFunction DMDemandFunction
              Constant Partitionfraction: FixedValue=0.1
        BiomassDemand DMDemands
          MultiplyFunction Structural
            PartitionFractionDemandFunction DMDemandFunction
              Constant PartitionFraction: FixedValue=0.3; Units=g/m^2
            Constant StructuralFraction: FixedValue=0.8
          Constant Metabolic: FixedValue=0
          StorageDMDemandFunction Storage
            SubtractFunction StorageFraction
              Constant One: FixedValue=1
              VariableReference StructuralFraction: VariableName=[Stem].DMDemands.Structural.StructuralFraction.Value()
        BiomassDemand NDemands
          MultiplyFunction Structural
            VariableReference MinNconc: VariableName=[Stem].minimumNconc.Value()
            VariableReference PotentialDMAllocation: VariableName=[Stem].potentialDMAllocation.Structural
          MultiplyFunction Metabolic
            SubtractFunction MetabolicNconc
              VariableReference CritNconc: VariableName=[Stem].criticalNConc.Value()
              VariableReference MinNconc: VariableName=[Stem].minimumNconc.Value()
            VariableReference PotentialDMAllocation: VariableName=[Stem].potentialDMAllocation.Structural
          StorageNDemandFunction Storage
            VariableReference NitrogenDemandSwitch: VariableName=[Stem].nitrogenDemandSwitch.Value()
            VariableReference MaxNconc: VariableName=[Stem].maximumNconc.Value()
      Root: GrowthRespiration=0; MaintenanceRespiration=0
        LinearInterpolationFunction KLModifier: XProperty=[Root].LengthDensity
          XYPairs: X=[0, 1]; Y=[1, 1]
        Constant SoilWaterEffect: FixedValue=1
        Constant MaximumRootDepth: FixedValue=1500
        PhaseLookup RootFrontVelocity
          PhaseLookupValue: Start=Germination; End=Maturity
            Constant: FixedValue=10
        Constant MaximumNConc: FixedValue=0.01
        Constant MinimumNConc: FixedValue=0.005
        PhaseBasedSwitch NitrogenDemandSwitch: Start=PreEmerge; End=Maturity
        LinearInterpolationFunction SenescenceRate: XProperty=[Leaf].FractionDied
          XYPairs: X=[0, 1]; Y=[0, 0.001]
        BiomassRemoval BiomassRemovalDefaults: same as Replacements.Kale.Leaf.BiomassRemovalDefaults
        Constant KNO3: FixedValue=0.02; Units=g/plant
        Constant KNH4: FixedValue=0.01; Units=g/plant
        LinearInterpolationFunction NUptakeSWFactor: XProperty=[Root].RWC
          XYPairs: X=[0, 1]; Y=[0, 1]
        Constant InitialDM: FixedValue=5; Units=g/plant
        Constant SpecificRootLength: FixedValue=40; Units=m/g
        LinearInterpolationFunction MaxDailyNUptake: XProperty=[Root].Depth
          XYPairs: X=[0, 100, 150]; Y=[0.1, 1, 6]
          Memo
            Early growth N uptake is assumed to be 0.1 kg N/ha/day, and this increases with root growth reaching a maximumof 5.8 kg N/ha/day. The maximum N uptake per day is assumed from sugar beet data (Armstrong et al., 1986).
        Constant DMConversionEfficiency: FixedValue=1
        Constant MaintenanceRespirationFunction: FixedValue=1
        Constant RemobilisationCost: FixedValue=0
        Constant CarbonConcentration: FixedValue=0.4
        BiomassDemand DMDemands
          MultiplyFunction Structural
            PartitionFractionDemandFunction DMDemandFunction
              LinearInterpolationFunction PartitionFraction: XProperty=[Root].Depth
                XYPairs: X=[0, 1200, 2000]; Y=[0.05, 0, 0]
                Memo
                  The roots were assumed to account for 5% of dry matter.
            Constant StructuralFraction: FixedValue=1
          Constant Metabolic: FixedValue=0
          StorageDMDemandFunction Storage
            SubtractFunction StorageFraction
              Constant One: FixedValue=1
              VariableReference StructuralFraction: VariableName=[Root].DMDemands.Structural.StructuralFraction.Value()
        BiomassDemand NDemands
          MultiplyFunction Structural
            VariableReference MinNconc: VariableName=[Root].minimumNconc.Value()
            VariableReference PotentialDMAllocation: VariableName=[Root].potentialDMAllocation.Structural
          MultiplyFunction Metabolic
            SubtractFunction MetabolicNconc
              VariableReference CritNconc: VariableName=[Root].criticalNConc.Value()
              VariableReference MinNconc: VariableName=[Root].minimumNconc.Value()
            VariableReference PotentialDMAllocation: VariableName=[Root].potentialDMAllocation.Structural
          StorageNDemandFunction Storage
            VariableReference NitrogenDemandSwitch: VariableName=[Root].nitrogenDemandSwitch.Value()
            VariableReference MaxNconc: VariableName=[Root].maximumNconc.Value()
      CompositeBiomass AboveGround: DMDOfStructural=0.6; Propertys=[[Leaf].Live, [Leaf].Dead, [Stem].Live, [Stem].Dead]
      CompositeBiomass BelowGround: DMDOfStructural=0.6; Propertys=[[Root].Live, [Root].Dead]
      CompositeBiomass Total: DMDOfStructural=0.6
        Propertys=[[Leaf].Live, [Leaf].Dead, [Stem].Live, [Stem].Dead, [Root].Live, [Root].Dead]
      CompositeBiomass TotalLive: DMDOfStructural=0.6; Propertys=[[Leaf].Live, [Stem].Live, [Root].Live]
      CompositeBiomass TotalDead: DMDOfStructural=0.6; Propertys=[[Leaf].Dead, [Stem].Dead, [Root].Dead]
      LinearInterpolationFunction MortalityRate: XProperty=[Leaf].CoverGreen
        XYPairs: X=[0.98, 1]; Y=[0, 1]
      CultivarFolder Cultivars
        Cultivar Grunner
        Cultivar Regal
    Report: EventNames=[Clock].DoReport
      VariableNames:
        [Clock].Today
        [Kale].AboveGround.N
        [Kale].AboveGround.Wt
        [Kale].AboveGroundDead.N
        [Kale].AboveGroundDead.Wt
        [Kale].AboveGroundLive.N
        [Kale].AboveGroundLive.Wt
        [Kale].Arbitrator.DM.TotalFixationSupply
        [Kale].Arbitrator.DMDemand
        [Kale].Leaf.AppearedCohortNo
        [Kale].Leaf.CohortParameters.MaxArea.Value()
        [Kale].Leaf.CoverDead
        [Kale].Leaf.CoverGreen
        [Kale].Leaf.CoverTotal
        [Kale].Leaf.Dead.N
        [Kale].Leaf.Dead.NConc
        [Kale].Leaf.Dead.Wt
        [Kale].Leaf.DeadCohortNo
        [Kale].Leaf.ExpandedCohortNo
        [Kale].Leaf.Fw
        [Kale].Leaf.Height
        [Kale].Leaf.InitialisedCohortNo
        [Kale].Leaf.LAI
        [Kale].Leaf.Live.N
        [Kale].Leaf.Live.NConc
        [Kale].Leaf.Live.Wt
        [Kale].Leaf.Photosynthesis.RadnInt.Value()
        [Kale].Leaf.Photosynthesis.RUEact.Value()
        [Kale].Leaf.PlantAppearedGreenLeafNo
        [Kale].Leaf.PlantsenescedLeafNo
        [Kale].Leaf.SenescingCohortNo
        [Kale].Leaf.SpecificArea
        [Kale].Leaf.Transpiration
        [Kale].Stem.Live.NConc
        [Kale].Stem.Live.Wt
        [Kale].Stem.Live.N
        [Kale].Stem.NConc
        [Kale].Stem.PercentWSC
        [Kale].Phenology.AccumulatedThermalTime.Value()
        [Kale].Phenology.CurrentPhaseName
        [Kale].Phenology.CurrentStageName
        [Kale].Phenology.DailyVernalisation.Value()
        [Kale].Phenology.FlagLeafDAS
        [Kale].Phenology.FloweringDAS
        [Kale].Phenology.MaturityDAS
        [Kale].Phenology.MeanTemp.Value()
        [Kale].Phenology.Photoperiod.Value()
        [Kale].Phenology.PhotoPeriodDeltaFunction
        [Kale].Phenology.SoilTemperatureFunction.Value()
        [Kale].Phenology.Stage
        [Kale].Phenology.ThermalTime.Value()
        [Kale].Phenology.Vrn1.Value()
        [Kale].Phenology.Vrn2.Value()
        [Kale].Phenology.Vrn4.Value()
        [Kale].Phenology.Zadok.Stage
        [Kale].Root.Depth
        [Kale].Root.Live.N
        [Kale].Root.Live.NConc
        [Kale].Root.N
        [Kale].Root.Nconc
        [Kale].Root.WaterUptake
        [Kale].Root.Live.Wt
        [Kale].SowingData.Cultivar
        [Kale].StorageRoot.Live.NConc
        [Kale].StorageRoot.Live.Wt
        [Kale].StorageRoot.Live.N
        [Kale].StorageRoot.NConc
        [Kale].StorageRoot.Wt
        [Kale].Structure.Height
        [Kale].Structure.LeafTipsAppeared
        [Kale].Structure.MainStemPopn
        [Kale].Structure.TotalStemPopn
        [Kale].Total.N
        [Kale].Total.NConc
        [Kale].Total.Wt
        [Kale].TotalDead.N
        [Kale].TotalDead.NConc
        [Phenology].Photoperiod.Value()
        [Soil].SoilWater.SW
        [Soil].SoilWater.SWmm
        [SurfaceOrganicMatter].Wt
        [Weather].MeanT
        sum([Soil].SoilNitrogen.NO3) as TotalSoilNitrogen
        sum([Soil].SoilWater.SWmm) as ProfileWater
        sum([Soil].SoilNitrogen.mineral_n) as ProfileN
        [Soil].SoilWater.LeachNO3
        [Weather].Rain
        [Irrigation].IrrigationApplied
        [Fertiliser].NitrogenApplied
        [Leaf].CohortSize[4]
        [Leaf].CohortSize[5]
        [Leaf].CohortSize[6]
        [Leaf].CohortSize[7]
        [Leaf].CohortSize[8]
        [Leaf].CohortSize[9]
        [Leaf].CohortSize[10]
        [Leaf].CohortSize[11]
        [Leaf].CohortSize[12]
        [Leaf].CohortSize[13]
        [Leaf].CohortSize[14]
        [Leaf].CohortSize[15]
        [Leaf].CohortSize[16]
        [Leaf].CohortSize[17]
  DataStore
    ExcelInput ObservedData: FileName=Observed\KaleObserved.xlsx; SheetNames=[Observed]
    PredictedObserved: PredictedTableName=Report; ObservedTableName=Observed; FieldNameUsedForMatch=Clock.Today
      Tests: POName=PredictedObserved
        AcceptedStats:
          Name                                n     Slope     Intercept  SEslope    SEintercept  R2        RMSE      NSE         ME          MAE        RSR
          Kale.AboveGround.N                  318   0.928426  1.94398    0.0342477  0.853235     0.699307  6.72898   0.623261    0.342731    5.00531    0.612824
          Kale.AboveGround.Wt                 415   0.895383  130.806    0.0226939  39.1403      0.790322  387.129   0.775168    -28.1306    296.031    0.473593
          Kale.Leaf.CoverGreen                236   0.798773  0.128734   0.026443   0.0208285    0.795898  0.100261  0.783793    -0.0237133  0.0793535  0.463994
          Kale.Leaf.CoverTotal                120   0.658558  0.289321   0.0392613  0.0275623    0.704526  0.127157  0.61574     0.0600813   0.0943407  0.617299
          Kale.Leaf.LAI                       387   0.572489  1.02661    0.0322752  0.0877853    0.449706  0.917715  0.41599     -0.016699   0.678199   0.763218
          Kale.Leaf.Live.N                    304   0.677984  2.12419    0.0363091  0.232577     0.535859  1.99646   0.488962    0.267897    1.50073    0.713693
          Kale.Leaf.Live.Wt                   387   0.782802  69.0374    0.0417113  6.91127      0.477757  68.4638   0.00312416  36.2756     52.1011    0.997146
          Kale.Leaf.PlantAppearedGreenLeafNo  207   1.07993   1.65924    0.0368392  0.814114     0.807394  4.66818   0.410411    3.35749     3.61063    0.76599
          Kale.Petiole.Live.N                 304   0.429249  1.56289    0.0369081  0.105501     0.309339  1.25922   0.25098     0.158568    0.984427   0.864035
          Kale.Petiole.Live.Wt                387   0.566417  83.2456    0.031632   4.79146      0.454397  63.0484   0.305502    26.3471     52.0688    0.832288
          Kale.Phenology.Stage                16    1.19791   -0.360134  0.0215609  0.0955152    0.995485  0.550187  0.806268    0.480976    0.480976   0.426173
          Kale.StorageRoot.Live.N             304   0.947822  -1.22664   0.0322468  0.498864     0.74098   5.00473   0.629207    -1.9105     3.86347    0.607925
          Kale.StorageRoot.Live.Wt            387   0.839071  47.1908    0.0193151  26.1826      0.830555  325.066   0.793077    -138.182    246.611    0.4543
          Kale.Structure.LeafTipsAppeared     295   0.916919  6.14626    0.0240905  0.879371     0.831771  7.60799   0.778031    3.42645     4.85285    0.470337
          Kale.TotalDead.N                    98    2.50138   0.232308   0.172426   0.269956     0.686736  3.01413   -8.80589    2.0862      2.18342    3.11542
          Nit                                 1112  1         0          0          0            1         0         1           0           0          0
        AcceptedStatsName=Name n Slope Intercept SEslope SEintercept R2 RMSE NSE ME MAE RSR
    Input Ashley_Dean: FileName=Observed\Ashley_DEAN Seq.txt
      ErrorMessage=The process cannot access the file 'C:\ApsimX\Prototypes\Kale\Observed\kale_observed.prn' because it is being used by another process.
  Folder KaleValidation
    Folder NZ
      Folder Lincoln
        Experiment LincolnRS2011
          Memo Trial details
            This trial was conducted in the rainshelter at Plant and Food Research in Lincoln, New Zealand in 2011. The objective was to evaluate the effect of nitrogen and irrigation on the development and growth of Kale crops.
            Details:

            •	Three nitrogen treatments:  0 kg N/ha, 50 kg N/ha & 300 kg N/ha applied as dissolved urea with fertigation
            •	Two irrigation treatments: Nil and full irrigation

            Fodder beet (cultivar "Regal") was precision drilled on 14 Nov 2016. Sowing density was 11 plants/m2 and row spacing was 0.45m.
          Factors
            Factor Irr
              Factor Full
                Specifications:
                  [Irrig]
                  [StateFactors].Script.IrrFactor = true
                Operations Full
                  2011-12-20  [Irrigation].Apply(6);
                  2011-12-27  [Irrigation].Apply(30);
                  2012-01-04  [Irrigation].Apply(31);
                  2012-01-10  [Irrigation].Apply(28);
                  2012-01-17  [Irrigation].Apply(38);
                  2012-01-24  [Irrigation].Apply(33);
                  2012-01-31  [Irrigation].Apply(28);
                  2012-02-07  [Irrigation].Apply(27);
                  2012-02-14  [Irrigation].Apply(28);
                  2012-02-21  [Irrigation].Apply(31);
                  2012-02-28  [Irrigation].Apply(16);
                  2012-03-06  [Irrigation].Apply(21);
                  2012-03-13  [Irrigation].Apply(19);
                  2012-03-20  [Irrigation].Apply(24);
                  2012-03-27  [Irrigation].Apply(18);
                  2012-04-03  [Irrigation].Apply(15);
                  2012-04-10  [Irrigation].Apply(35);
                  2012-04-17  [Irrigation].Apply(12);
                  2012-04-24  [Irrigation].Apply(12);
                  2012-05-01  [Irrigation].Apply(9);
                  2012-05-08  [Irrigation].Apply(8);
                  Memo
                    Have added an extra irrigation, on 22 Oct,

                    Data indcates water applied but no notes of it RFZ

                    In Statefactors have donethe irrigations for
                      17/12  21/1 19/11 14/1
              Factor Nil
                Specifications:
                  [Irrig]
                  [StateFactors].Script.IrrFactor = false
                Operations Nil
                  2016-09-02  [Irrigation].Apply(20)
                  2016-10-25  [Irrigation].Apply(5)
                  2017-01-18  [Irrigation].Apply(5)
                  2017-02-25  [Irrigation].Apply(5)
                  2017-05-21  [Irrigation].Apply(50)
                  Memo
                    Have added an extra irrigation, on 3 Nov,

                    Data indcates water applied but no notes of it RFZ
            Factor Nit
              Factor 0
                Specifications:
                  [Fert]
                  [StateFactors].Script.NitFactor = 0
                Operations 0
                  0001-01-01  [Fertiliser].Apply(0, Fertiliser.Types.UreaN, 00);
                  2012-01-11  [Fertiliser].Apply(0, Fertiliser.Types.UreaN, 10);
                  2012-02-01  [Fertiliser].Apply(0, Fertiliser.Types.UreaN, 10);
                  Memo
                    Uniques fertigation event
              Factor 30
                Specifications:
                  [Fert]
                  [StateFactors].Script.NitFactor = 50
                Operations 30
                  2011-12-16  [Fertiliser].Apply(10, Fertiliser.Types.UreaN, 10);
                  2012-01-11  [Fertiliser].Apply(10, Fertiliser.Types.UreaN, 10);
                  2012-02-01  [Fertiliser].Apply(10, Fertiliser.Types.UreaN, 10);
              Factor 120
                Specifications:
                  [Fert]
                  [StateFactors].Script.NitFactor = 300
                Operations 120
                  2011-12-16  [Fertiliser].Apply(40, Fertiliser.Types.UreaN, 10);
                  2012-01-11  [Fertiliser].Apply(40, Fertiliser.Types.UreaN, 10);
                  2012-02-01  [Fertiliser].Apply(40, Fertiliser.Types.UreaN, 10);
              Factor 240
                Specifications:
                  [Fert]
                  [StateFactors].Script.NitFactor = 300
                Operations 120
                  2011-12-16  [Fertiliser].Apply(60, Fertiliser.Types.UreaN, 10);
                  2012-01-11  [Fertiliser].Apply(60, Fertiliser.Types.UreaN, 10);
                  2012-02-01  [Fertiliser].Apply(60, Fertiliser.Types.UreaN, 10);
          Simulation Rainshelter
            Clock: StartDate=2011-10-01; EndDate=2012-06-01
            Summary summaryfile
            Weather: FileName=lincoln.met
            SoilArbitrator Soil Arbitrator
            Zone paddock: Area=1; Slope=0
              Folder Manager folder
                Operations GeneralIrrigation
                  2016-09-02  [Irrigation].Apply(25.0);
                  2016-10-25  [Irrigation].Apply(5.0);
                  2016-10-28  [Irrigation].Apply(5.0);
                Operations Irrig
                Operations Fert
                  2016-10-29  [Fertiliser].Apply(100, Fertiliser.Types.UreaN, 10);
                  2017-01-18  [Fertiliser].Apply(100, Fertiliser.Types.UreaN, 10);
                  2017-02-25  [Fertiliser].Apply(100, Fertiliser.Types.UreaN, 10);
                Operations Testing
                Manager ClimateControl
                  StartDate = 2011-10-17
                  EndDate = 2012-05-20
```csharp
using System;
using Models.Core;
using APSIM.Shared.Utilities;



using System.Collections.Generic;
using System.Text;
using Models.PMF;
using Models;
using System.Xml.Serialization;

namespace Models
{
    [Serializable] 
    [System.Xml.Serialization.XmlInclude(typeof(Model))]
    public class Script : Model
    {
        [Link] Weather Met;
        [Link] Clock Clock;
    
        [Description("Start Date")]
        public DateTime StartDate { get; set; }
        
        [Description("End Date")]
        public DateTime EndDate { get; set; }
 
    
        [EventSubscribe("PreparingNewWeatherData")]
        private void OnPreparingNewWeatherData(object sender, EventArgs e)
        {
            if ((Clock.Today.Date >= StartDate) && (Clock.Today.Date <= EndDate))
                Met.Rain = 0;        
        }
    }
}
```
                Manager StateFactors
                  IrrFactor = False
                  NitFactor = 0
```csharp
using System;
using Models.Core;
using System.Collections.Generic;
using System.Text;
using Models.Soils;
using Models.PMF;
using Models;
using System.Xml.Serialization;
using APSIM.Shared.Utilities;

namespace Models
{
    [Serializable] 
    public class Script : Model
    {
        [Link] Clock Clock;
        [Link] Irrigation Irrigation;
        [Link] Fertiliser Fert;
        [Link] Soil ThisSoil;
        [Description("Amount of Irrgation be applied 0/1")]
        public bool IrrFactor { get; set; }
        [Description("Amount of fertiliser to be applied (kg/ha)")]
        public double NitFactor { get; set; }
        
          
        private void SetSoilLayers()
        {
            /*
            Not used yrt use whenmore detailed info is known
            */
            int i = 0;
            if ((IrrFactor == false) && (NitFactor == 0))
            {
                if (ThisSoil.Thickness.Length != 7)
                {
                    throw new Exception("Soil layer exception");
                }
             
                ThisSoil.LL15[0] = 0.06;
                ThisSoil.LL15[1] = 0.06;
                ThisSoil.LL15[2] = 0.08;
                ThisSoil.LL15[3] = 0.14;
                ThisSoil.LL15[4] = 0.16;
                ThisSoil.LL15[5] = 0.16;
                ThisSoil.LL15[6] = 0.11;
                ThisSoil.DUL[0] = 0.34;
                ThisSoil.DUL[1] = 0.3;
                ThisSoil.DUL[2] = 0.28;
                ThisSoil.DUL[3] = 0.3;
                ThisSoil.DUL[4] = 0.3;
                ThisSoil.DUL[5] = 0.30;
                ThisSoil.DUL[6] = 0.3;
                ThisSoil.SAT[0] = 0.4;
                ThisSoil.SAT[1] = 0.4;
                ThisSoil.SAT[2] = 0.4;
                ThisSoil.SAT[3] = 0.4;
                ThisSoil.SAT[4] = 0.4;
                ThisSoil.SAT[5] = 0.4;
                ThisSoil.SAT[6] = 0.4;
                ThisSoil.SoilWater.Reset();
            }   
            if ((IrrFactor == false) && (NitFactor == 50))
            {
                if (ThisSoil.Thickness.Length != 7)
                {
                    throw new Exception("Soil layer exception");
                }
             
                ThisSoil.LL15[0] = 0.07;
                ThisSoil.LL15[1] = 0.12;
                ThisSoil.LL15[2] = 0.17;
                ThisSoil.LL15[3] = 0.20;
                ThisSoil.LL15[4] = 0.26;
                ThisSoil.LL15[5] = 0.32;
                ThisSoil.LL15[6] = 0.30;
                ThisSoil.DUL[0] = 0.30;
                ThisSoil.DUL[1] = 0.26;
                ThisSoil.DUL[2] = 0.29;
                ThisSoil.DUL[3] = 0.25;
                ThisSoil.DUL[4] = 0.29;
                ThisSoil.DUL[5] = 0.34;
                ThisSoil.DUL[6] = 0.30;
                ThisSoil.SAT[0] = 0.34;
                ThisSoil.SAT[1] = 0.34;
                ThisSoil.SAT[2] = 0.34;
                ThisSoil.SAT[3] = 0.34;
                ThisSoil.SAT[4] = 0.34;
                ThisSoil.SAT[5] = 0.34;
                ThisSoil.SAT[6] = 0.34;
                ThisSoil.SoilWater.Reset();
            }   
            if ((IrrFactor == false) && (NitFactor == 50))
            {
                if (ThisSoil.Thickness.Length != 7)
                {
                    throw new Exception("Soil layer exception");
                }
             
                ThisSoil.LL15[0] = 0.06;
                ThisSoil.LL15[1] = 0.11;
                ThisSoil.LL15[2] = 0.21;
                ThisSoil.LL15[3] = 0.18;
                ThisSoil.LL15[4] = 0.23;
                ThisSoil.LL15[5] = 0.30;
                ThisSoil.LL15[6] = 0.26;
                ThisSoil.DUL[0] = 0.25;
                ThisSoil.DUL[1] = 0.26;
                ThisSoil.DUL[2] = 0.30;
                ThisSoil.DUL[3] = 0.27;
                ThisSoil.DUL[4] = 0.34;
                ThisSoil.DUL[5] = 0.27;
                ThisSoil.DUL[6] = 0.30;
                ThisSoil.SAT[0] = 0.34;
                ThisSoil.SAT[1] = 0.34;
                ThisSoil.SAT[2] = 0.34;
                ThisSoil.SAT[3] = 0.34;
                ThisSoil.SAT[4] = 0.34;
                ThisSoil.SAT[5] = 0.34;
                ThisSoil.SAT[6] = 0.34;
                ThisSoil.SoilWater.Reset();
            }   
            if ((IrrFactor == true) && (NitFactor == 0))
            {
                if (ThisSoil.Thickness.Length != 7)
                {
                    throw new Exception("Soil layer exception");
                }
             
                ThisSoil.LL15[0] = 0.13;
                ThisSoil.LL15[1] = 0.21;
                ThisSoil.LL15[2] = 0.25;
                ThisSoil.LL15[3] = 0.19;
                ThisSoil.LL15[4] = 0.29;
                ThisSoil.LL15[5] = 0.32;
                ThisSoil.LL15[6] = 0.34;
                ThisSoil.DUL[0] = 0.31;
                ThisSoil.DUL[1] = 0.28;
                ThisSoil.DUL[2] = 0.30;
                ThisSoil.DUL[3] = 0.28;
                ThisSoil.DUL[4] = 0.29;
                ThisSoil.DUL[5] = 0.34;
                ThisSoil.DUL[6] = 0.30;
                ThisSoil.SAT[0] = 0.34;
                ThisSoil.SAT[1] = 0.34;
                ThisSoil.SAT[2] = 0.34;
                ThisSoil.SAT[3] = 0.34;
                ThisSoil.SAT[4] = 0.34;
                ThisSoil.SAT[5] = 0.34;
                ThisSoil.SAT[6] = 0.34;
                ThisSoil.SoilWater.Reset();
            }   
            if ((IrrFactor == true) && (NitFactor == 50))
            {
                if (ThisSoil.Thickness.Length != 7)
                {
                    throw new Exception("Soil layer exception");
                }
             
                ThisSoil.LL15[0] = 0.14;
                ThisSoil.LL15[1] = 0.21;
                ThisSoil.LL15[2] = 0.27;
                ThisSoil.LL15[3] = 0.27;
                ThisSoil.LL15[4] = 0.27;
                ThisSoil.LL15[5] = 0.32;
                ThisSoil.LL15[6] = 0.30;
                ThisSoil.DUL[0] = 0.31;
                ThisSoil.DUL[1] = 0.28;
                ThisSoil.DUL[2] = 0.30;
                ThisSoil.DUL[3] = 0.28;
                ThisSoil.DUL[4] = 0.29;
                ThisSoil.DUL[5] = 0.34;
                ThisSoil.DUL[6] = 0.30;
                ThisSoil.SAT[0] = 0.34;
                ThisSoil.SAT[1] = 0.34;
                ThisSoil.SAT[2] = 0.34;
                ThisSoil.SAT[3] = 0.34;
                ThisSoil.SAT[4] = 0.34;
                ThisSoil.SAT[5] = 0.34;
                ThisSoil.SAT[6] = 0.34;
                ThisSoil.SoilWater.Reset();
            }
            if ((IrrFactor == true) && (NitFactor == 250))
            {
                if (ThisSoil.Thickness.Length != 7)
                {
                    throw new Exception("Soil layer exception");
                }
             
                ThisSoil.LL15[0] = 0.12;
                ThisSoil.LL15[1] = 0.18;
                ThisSoil.LL15[2] = 0.17;
                ThisSoil.LL15[3] = 0.20;
                ThisSoil.LL15[4] = 0.27;
                ThisSoil.LL15[5] = 0.27;
                ThisSoil.LL15[6] = 0.21;
                ThisSoil.DUL[0] = 0.31;
                ThisSoil.DUL[1] = 0.28;
                ThisSoil.DUL[2] = 0.30;
                ThisSoil.DUL[3] = 0.28;
                ThisSoil.DUL[4] = 0.29;
                ThisSoil.DUL[5] = 0.34;
                ThisSoil.DUL[6] = 0.30;
                ThisSoil.SAT[0] = 0.34;
                ThisSoil.SAT[1] = 0.34;
                ThisSoil.SAT[2] = 0.34;
                ThisSoil.SAT[3] = 0.34;
                ThisSoil.SAT[4] = 0.34;
                ThisSoil.SAT[5] = 0.34;
                ThisSoil.SAT[6] = 0.34;
                ThisSoil.SoilWater.Reset();
            }
        }

        [EventSubscribe("Commencing")]
        private void OnSimulationCommencing(object sender, EventArgs e)
        {
            //    SetSoilLayers();
        }
        
        [EventSubscribe("DoManagement")]
        private void OnDoManagement(object sender, EventArgs e)
        {
            //Specific irrgations
            
            //Kale
            
            if ((IrrFactor == true) && (NitFactor == 300))
            {
                if ((DateUtilities.CompareDates("1-Feb", Clock.Today) == 0))
                    Irrigation.Apply(40);
                if ((DateUtilities.CompareDates("1-Mar", Clock.Today) == 0))
                    Irrigation.Apply(36);
            }
        
            //Oats
            if (Clock.Today.Year == 2017)
            if ((DateUtilities.CompareDates("5-Jul", Clock.Today) == 0))
            if (IrrFactor == true)
            {
                if (NitFactor == 0)
                    Fert.Apply(40, Models.Fertiliser.Types.NO3N, 10);
                if (NitFactor == 50)
                    Fert.Apply(85, Models.Fertiliser.Types.NO3N, 10);
                if (NitFactor == 300)
                    Fert.Apply(270, Models.Fertiliser.Types.NO3N, 10);
               
            }
             
            
            
        }
    }
        
        
}
```
                Manager SowDateCv
                  InitialRootDepth = 5
                  CropToSow = Regal
                  SowingDate = 2011-10-18
```csharp
using System;
using Models.Core;
using System.Collections.Generic;
using System.Text;
using Models.PMF;
using Models;
using System.Xml.Serialization;
using APSIM.Shared.Utilities;
using System.Data;
using Models.PMF.Interfaces;
using Models.Surface;

namespace Models
{
    [Serializable] 
    //[System.Xml.Serialization.XmlInclude(typeof(Model))]
    public class Script : Model
    {
        [Link] Plant Kale;
        [Link] Clock Clock;
        [Link] Zone zone;
        [Link] Simulation Simulation;
        [Link] SurfaceOrganicMatter SurfOM;
        
                
        [Description("Initial Root Depth")]
        public double InitialRootDepth { get; set; }
        [Description("Sown Crop")]
        public string CropToSow { get; set; }
        [Description("Sowing Date")]
        public DateTime SowingDate { get; set; }
        //[Description("Sowing Date2")]
        //public DateTime SowingDate2 { get; set; }
        //[Description("Sowing Date3")]
        //public DateTime SowingDate3 { get; set; }
        //[Description("Sowing Date4")]
        //public DateTime SowingDate4 { get; set; }
        
        
        [EventSubscribe("DoManagement")]
        private void OnDoManagement(object sender, EventArgs e)
        {
            if (Clock.Today.Date == SowingDate)
            {
                Kale.Sow(cultivar: CropToSow, population: 9, depth: InitialRootDepth, rowSpacing: 500);
                
            }
            //else if (Clock.Today.Date == SowingDate2)
            {
                //    Kale.Sow(cultivar: CropToSow, population: 9, depth: InitialRootDepth, rowSpacing: 500);
            }
            //else if (Clock.Today.Date == SowingDate3)
            {
                //    Kale.Sow(cultivar: CropToSow, population: 9, depth: InitialRootDepth, rowSpacing: 500);
            }
            //else if (Clock.Today.Date == SowingDate4)
            {
                //    Kale.Sow(cultivar: CropToSow, population: 9, depth: InitialRootDepth, rowSpacing: 500);
        
            }
            
            
        }
    }
}
```
              MicroClimate: a_interception=0; b_interception=1; c_interception=0; d_interception=0; soil_albedo=0.3; SoilHeatFluxFraction=0.4; NightInterceptionFraction=0.5; ReferenceHeight=2
              Irrigation
              Fertiliser
              SurfaceOrganicMatter Surface Organic Matter: InitialResidueName=wheat_stubble; InitialResidueType=wheat; InitialResidueMass=1500; InitialStandingFraction=0; InitialCPR=0; InitialCNR=80; FractionFaecesAdded=0.5
              SoluteManager
              Soil: SoilType=NZ_sedementary; Region=Plains; State=Canterbury; Country=New Zealnd; Latitude=0; Longitude=0
                Analysis: Thickness=[100, 200, 300, 300, 300, 300]; PH=[6.6, 6.2, 5.7, 5.5, 5.5, 5.5]; PHUnits=Water; BoronUnits=HotWater
                Water
                  Thickness  BD     AirDry  LL15  DUL   SAT    KS
                  150        1      0.05    0.08  0.32  0.35   4832.039
                  150        1.32   0.1     0.12  0.32  0.35   389.229
                  300        1.35   0.149   0.16  0.32  0.342  16.362
                  300        1.3    0.14    0.15  0.28  0.322  97.995
                  300        1.3    0.15    0.16  0.28  0.348  97.995
                  300        1.3    0.149   0.16  0.28  0.342  97.995
                  300        1.3    0.1     0.12  0.28  0.307  97.995
                  200        1.601  0.06    0.12  0.22  0.309  97.995
                  SoilCrop kaleSoil: LL=[0.12, 0.12, 0.12, 0.12, 0.12, 0.12, 0.12, 0.12]; KL=[0.1, 0.06, 0.06, 0.06, 0.06, 0.06, 0.06, 0.06]; XF=[1, 1, 1, 1, 1, 1, 1, 1]
                SoilWater: SummerDate=1-Nov; SummerU=6; SummerCona=2; WinterDate=1-Apr; WinterU=9; WinterCona=4.4; DiffusConst=0; DiffusSlope=0; Salb=0.18; CN2Bare=68; CNRed=20; CNCov=0.8; slope=0; discharge_width=0; catchment_area=0; max_pond=0; ResidueInterception=0
                  Thickness  SWCON  KLAT
                  200        0.7    0
                  200        0.7    0
                  200        0.95   0
                  200        0.95   0
                  200        0.95   0
                  200        0.95   0
                  200        0.95   0
                  200        0.95   0
                SoilNitrogen: fom_type=[default, manure, mucuna, lablab, shemp, stable]; fract_carb=[0.2, 0.3, 0.54, 0.57, 0.45, 0]; fract_cell=[0.7, 0.3, 0.37, 0.37, 0.47, 0.1]; fract_lign=[0.1, 0.4, 0.09, 0.06, 0.08, 0.9]
                SoilOrganicMatter: RootCN=40; RootWt=1000; SoilCN=11; EnrACoeff=7.4; EnrBCoeff=0.2; OCUnits=Total
                  Thickness  OC     FBiom  FInert
                  180        3      0.06   0.437
                  150        1.247  0.04   0.657
                  400        0.316  0.012  0.85
                  270        0.208  0.01   0.945
                  500        0.2    0.01   0.983
                Sample Initial Soil Settings: NO3Units=kgha; NH4Units=kgha; SWUnits=Volumetric; OCUnits=Total; PHUnits=Water
                  Thickness  NO3   NH4  SW
                  200        18.9  2    0.3
                  200        17    2.3  0.28
                  200        5     6    0.24
                  200        2     5    0.24
                  200        2     5    0.28
                  200        2     5    0.28
                  200        3     5    0.28
                  200        3     5    0.22
                CERESSoilTemperature
              Plant Kale
              Report EnviroReport: EventNames=[Clock].DoReport
                VariableNames:
                  [Clock].Today
                  [Weather].MeanT
                  [Weather].Radn
                  [Weather].Rain
                  [Irrigation].IrrigationApplied
                  [Kale].Leaf.Fw
                  [Kale].Phenology.ThermalTime
                  [MicroClimate].interception as Interception
                  [Soil].SoilWater.Es as Evaporation
                  [Soil].SoilWater.Drainage as Drainage
                  [Soil].SoilWater.Runoff as Runoff
                  sum([Soil].SoilWater.SWmm) as TotalSoilWater
                  sum([Soil].SoilNitrogen.MineralisedN) as MineralisedN
                  [Fertiliser].NitrogenApplied as FertiliserN
                  sum([Soil].SoilNitrogen.Denitrification) as DenitrifiedN
                  ([Soil].SoilWater.LeachUrea+[Soil].SoilWater.LeachNH4+[Soil].SoilWater.LeachNO3) as NLeached
                  [SurfaceOrganicMatter].N as TotalSurfOMN
                  sum([Soil].SoilNitrogen.FOMN) as TotalFOMN
                  sum([Soil].SoilNitrogen.MicrobialN) as TotalMicrobialN
                  sum([Soil].SoilNitrogen.HumicN) as TotalHumicN
                  (sum([Soil].SoilNitrogen.NH4) + sum([Soil].SoilNitrogen.NO3)) as TotalSoilN
                  sum([Soil].SoilNitrogen.urea) as TotalUrea
                  sum([Soil].SoilNitrogen.NH4) as TotalNH4
                  sum([Soil].SoilNitrogen.NO3) as TotalNO3
              Report: EventNames=[Clock].DoReport
                VariableNames:
                  [Clock].Today
                  [Weather].MeanT
                  [Soil].SoilWater.SW
                  [Soil].SoilWater.SWmm
                  sum([Soil].SoilWater.SWmm) as ProfileWater
                  [Kale].AboveGround.N
                  [Kale].AboveGround.Wt
                  [Kale].AboveGroundLive.N
                  [Kale].AboveGroundLive.Wt
                  [Kale].AboveGroundDead.N
                  [Kale].AboveGroundDead.Wt
                  [Kale].Arbitrator.DMDemand
                  [Kale].Arbitrator.DM.TotalFixationSupply
                  [Kale].Leaf.AppearedCohortNo
                  [Kale].Leaf.CoverDead
                  [Kale].Leaf.CoverGreen
                  [Kale].Leaf.CoverTotal
                  [Kale].Leaf.Dead.N
                  [Kale].Leaf.Dead.NConc
                  [Kale].Leaf.Dead.Wt
                  [Kale].Leaf.DeadCohortNo
                  [Kale].Leaf.SenescingCohortNo
                  [Kale].Leaf.ExpandedCohortNo
                  [Kale].Leaf.Fn
                  [Kale].Leaf.Fw
                  [Kale].Leaf.Height
                  [Kale].Leaf.InitialisedCohortNo
                  [Kale].Leaf.LAI
                  [Kale].Leaf.Live.N
                  [Kale].Leaf.Live.NConc
                  [Kale].Leaf.Live.Wt
                  [Kale].Leaf.SpecificArea
                  [Kale].Leaf.Transpiration
                  [Kale].Phenology.CurrentPhaseName
                  [Kale].Phenology.CurrentStageName
                  [Kale].Phenology.DailyVernalisation.Value()
                  [Kale].Phenology.MeanTemp.Value()
                  [Kale].Phenology.Photoperiod.Value()
                  [Kale].Phenology.Stage
                  [Kale].Phenology.ThermalTime.Value()
                  [Kale].Phenology.ThermalTime.Value()
                  [Kale].Phenology.Vrn1.Value()
                  [Kale].Phenology.Vrn2.Value()
                  [Kale].Phenology.Vrn4.Value()
                  [Kale].Phenology.Zadok.Stage
                  [Kale].Root.Depth
                  [Kale].Root.N
                  [Kale].Root.Wt
                  [Kale].Root.Nconc
                  [Kale].Root.WaterUptake
                  [Kale].StorageRoot.N
                  [Kale].StorageRoot.NConc
                  [Kale].StorageRoot.Wt
                  [Kale].StorageRoot.Live.StorageWt
                  [Kale].Petiole.N
                  [Kale].Petiole.NConc
                  [Kale].Petiole.Wt
                  [Kale].Petiole.PercentWSC
                  [Kale].Petiole.Live.StorageWt
                  [Kale].SowingData.Cultivar
                  [Kale].Structure.Height
                  [Kale].Structure.LeafTipsAppeared
                  [Kale].Leaf.PlantAppearedGreenLeafNo
                  [Kale].Structure.MainStemPopn
                  [Kale].Structure.TotalStemPopn
                  [Kale].Total.N
                  [Kale].Total.Wt
                  [SurfaceOrganicMatter].Wt
                  sum([Soil].SoilNitrogen.NO3) as TotalSoilNitrogen
                  [Kale].Phenology.FlagLeafDAS
                  [Kale].Phenology.FloweringDAS
                  [Kale].Phenology.MaturityDAS
                  [Kale].Phenology.PhotoPeriod
                  [Kale].Phenology.PhotoPeriodDeltaFunction
                  [Kale].Phenology.Stage
                  [Kale].Phenology.SoilTemperatureFunction.Value()
        Experiment Ashley_Dean_2013_
          Factors
            Factor Irrigation_: Specifications=[Irrigation_]
              Operations Full_
                2013-11-21  [Irrigation].Apply(15 );
                2013-11-25  [Irrigation].Apply(15 );
                2013-12-02  [Irrigation].Apply(15 );
                2013-12-05  [Irrigation].Apply(15.8 );
                2013-12-09  [Irrigation].Apply(10 );
                2013-12-12  [Irrigation].Apply(14 );
                2013-12-16  [Irrigation].Apply(20 );
                2013-12-23  [Irrigation].Apply(14.5 );
                2014-01-06  [Irrigation].Apply(29 );
                2014-01-09  [Irrigation].Apply(23 );
                2014-01-13  [Irrigation].Apply(21 );
                2014-01-16  [Irrigation].Apply(24 );
                2014-01-20  [Irrigation].Apply(28 );
                2014-01-23  [Irrigation].Apply(21 );
                2014-01-27  [Irrigation].Apply(10 );
                2014-01-30  [Irrigation].Apply(25 );
                2014-02-03  [Irrigation].Apply(19.0 );
                2014-02-06  [Irrigation].Apply(17 );
                2014-02-10  [Irrigation].Apply(21 );
                2014-02-13  [Irrigation].Apply(9 );
                2014-02-17  [Irrigation].Apply(19.5 );
                2014-02-20  [Irrigation].Apply(20 );
                2014-02-27  [Irrigation].Apply(20 );
              Operations Nil_
            Factor Fertiliser_: Specifications=[Fertiliser_]
              Operations 300
                2013-11-19  [Fertiliser].Apply( 217.4,Fertiliser.Types.UreaN,0)
                2013-12-16  [Fertiliser].Apply( 217.4,Fertiliser.Types.UreaN,0)
                2014-01-20  [Fertiliser].Apply( 217.4,Fertiliser.Types.UreaN,0)
              Operations 150
                2013-11-19  [Fertiliser].Apply( 108.7,Fertiliser.Types.UreaN,0)
                2013-12-16  [Fertiliser].Apply( 108.7,Fertiliser.Types.UreaN,0)
                2014-01-20  [Fertiliser].Apply( 108.7,Fertiliser.Types.UreaN,0)
              Operations 75
                2013-11-19  [Fertiliser].Apply( 54.35,Fertiliser.Types.UreaN,0)
                2013-12-16  [Fertiliser].Apply( 54.35,Fertiliser.Types.UreaN,0)
                2014-01-20  [Fertiliser].Apply( 54.35,Fertiliser.Types.UreaN,0)
              Operations 0
          Simulation AD_Base
            Clock: StartDate=2013-09-01; EndDate=2014-06-30
            Summary summaryfile
            Weather: FileName=lincoln.met
            Zone paddock: Area=1; Slope=0
              Soil AshleyDean: Latitude=0; Longitude=0
                Analysis: Thickness=[100, 200, 300, 300, 300, 300]; PH=[6.6, 6.2, 5.7, 5.5, 5.5, 5.5]; PHUnits=Water; BoronUnits=HotWater
                InitialWater Initial water: PercentMethod=EvenlyDistributed; FractionFull=1; RelativeTo=KaleSoil
                Water: KS=[4832, 389, 16, 16, 98]
                  Thickness  BD     AirDry  LL15  DUL   SAT
                  100        1.17   0.05    0.06  0.3   0.42
                  150        1.1    0.05    0.06  0.25  0.37
                  300        0.7    0.05    0.06  0.15  0.22
                  300        0.455  0.05    0.06  0.14  0.21
                  300        0.25   0.05    0.06  0.13  0.2
                  300        0.25   0.05    0.06  0.12  0.18
                  SoilCrop KaleSoil: LL=[0.08, 0.07, 0.07, 0.09, 0.11, 0.11]; KL=[0.06, 0.06, 0.06, 0.06, 0.06, 0.06]; XF=[1, 1, 1, 1, 1, 1]
                SoilWater: SummerDate=1-Nov; SummerU=9; SummerCona=4.4; WinterDate=1-Apr; WinterU=9; WinterCona=4.4; DiffusConst=88; DiffusSlope=35.4; Salb=0.18; CN2Bare=68; CNRed=20; CNCov=0.8; max_pond=0; Thickness=[100, 200, 300, 300, 300, 300]; SWCON=[0.55, 0.55, 0.55, 0.55, 0.55, 0.55]; ResidueInterception=0
                SoilNitrogen: fom_type=[default, manure, mucuna, lablab, shemp, stable]; fract_carb=[0.2, 0.3, 0.54, 0.57, 0.45, 0]; fract_cell=[0.7, 0.3, 0.37, 0.37, 0.47, 0.1]; fract_lign=[0.1, 0.4, 0.09, 0.06, 0.08, 0.9]
                SoilOrganicMatter: RootCN=30; RootWt=3000; SoilCN=11.5; EnrACoeff=7.4; EnrBCoeff=0.2; OCUnits=Total
                  Thickness  OC    FBiom  FInert
                  100        1.82  0.025  0.3
                  200        1.47  0.025  0.4
                  300        1.2   0.015  0.75
                  300        1.03  0.01   0.9
                  300        0.47  0.01   0.96
                  300        0.47  0.01   0.96
                Sample: NO3Units=kgha; NH4Units=kgha; SWUnits=Volumetric; OCUnits=Total; PHUnits=Water
                  Thickness  NO3  NH4
                  150        78   0.1
                  150        58   0.1
                  300        5    0.1
                  300        5    0.1
                  300        5    0.1
                  300        5    0.1
                CERESSoilTemperature
              Plant Kale
              MicroClimate: a_interception=0; b_interception=1; c_interception=0; d_interception=0; soil_albedo=0.23; SoilHeatFluxFraction=0.4; NightInterceptionFraction=0.5; ReferenceHeight=2
              Irrigation
              Fertiliser
              Operations SowDateCv
                2013-10-26  [Kale].Sow(population:75, cultivar:"Grunner", depth:9, rowSpacing:150);
              SurfaceOrganicMatter surface organic matter: InitialResidueName=wheat; InitialResidueType=wheat; InitialResidueMass=0; InitialStandingFraction=0; InitialCPR=0; InitialCNR=80; FractionFaecesAdded=0.5
              Operations Irrigation_: same as KaleValidation.NZ.Lincoln.Ashley_Dean_2013_.Factors.Irrigation_.Full_
              Operations Fertiliser_
                2013-11-19  [Fertiliser].Apply( 217.4,Fertiliser.Types.UreaN,0)
                2013-12-16  [Fertiliser].Apply( 217.4,Fertiliser.Types.UreaN,0)
                2014-01-20  [Fertiliser].Apply( 217.4,Fertiliser.Types.UreaN,0)
              Manager ExtraVariables
```csharp
using System;
using Models.Core;
using System.Collections.Generic;
using System.Text;
using Models.Soils;
using Models.PMF;
using Models;
using System.Xml.Serialization;
using APSIM.Shared.Utilities;

namespace Models
{
    [Serializable] 
    public class Script : Model
    {
        [Link] Clock Clock;
        [Link] Soils.Soil Soil;
        [Link] Models.Surface.SurfaceOrganicMatter SOM;
        [Link] Weather Met;
        [Link] Fertiliser Fert;
        [Link] Irrigation Irrig;
        [Link] Plant Kale;
        [Link] Zone zone;
                    
        [XmlIgnore] public bool InitialDay { get; set; }
        
        [XmlIgnore] public double AccumPlantN { get; set; }
        [XmlIgnore] public double AccumMineralisation { get; set; }
        [XmlIgnore] public double AccumDenit { get; set; }
        [XmlIgnore] public double AccumFert { get; set; }
        [XmlIgnore] public double AccumLeach { get; set; }
        [XmlIgnore] public double AccumDetach { get; set; }
        [XmlIgnore] public double DeltaSoilOMN { get; set; }
        [XmlIgnore] public double DeltaSurfaceOMN { get; set; }
        [XmlIgnore] public double DeltaSoilMineralN { get; set; }
        [XmlIgnore] public double SoilNitrogenContent { get; set; }
        
        
        
        [XmlIgnore] public double AccumEO { get; set; }
        [XmlIgnore] public double AccumEP { get; set; }
        [XmlIgnore] public double AccumES { get; set; }
        [XmlIgnore] public double AccumDrainage { get; set; }
        [XmlIgnore] public double AccumRunoff { get; set; }
        [XmlIgnore] public double AccumOutflowLat { get; set; }
        [XmlIgnore] public double AccumIrrigation { get; set; }
        [XmlIgnore] public double AccumRainfall { get; set; }
        [XmlIgnore] public double SoilWaterDeficit { get; set; }
    
        [XmlIgnore] public double  InitialSoilOMN { get; set; }
        [XmlIgnore] public double  InitialSurfaceOMN { get; set; }
        [XmlIgnore] public double  InitialMineralN { get; set; }
        
        
        [XmlIgnore] public double SWC { get; set; }
        [XmlIgnore] public double DUL { get; set; }
        [XmlIgnore] public double OutFlowLat { get; set; }

        [XmlIgnore] public double FomN { get; set; }
        [XmlIgnore] public double BiomN { get; set; }
        [XmlIgnore] public double HumN { get; set; }
        [XmlIgnore] public double OrganicN { get; set; }
        [XmlIgnore] public double NO3N { get; set; }
        [XmlIgnore] public double NH4N { get; set; }
        [XmlIgnore] public double UreaN { get; set; }
        [XmlIgnore] public double MineralN { get; set; }
        [XmlIgnore] public double DltNMinRes { get; set; }
        [XmlIgnore] public double DltNMinTot { get; set; }
        [XmlIgnore] public double ResidueWt{ get; set; }
        
        
        [EventSubscribe("Commencing")]
        private void OnSimulationCommencing(object sender, EventArgs e)
        {
            InitialDay = true;
        }
        
        [EventSubscribe("DoManagement")]
        private void OnDoManagement(object sender, EventArgs e)
        {
            //!!!!!! Nitrogen balance components !!!!!!
            FomN = MathUtilities.Sum(Soil.SoilNitrogen.FOMN);
            HumN = MathUtilities.Sum(Soil.SoilNitrogen.HumicN);
            BiomN = MathUtilities.Sum(Soil.SoilNitrogen.MicrobialN);
            OrganicN = FomN + HumN + BiomN;
            NO3N = MathUtilities.Sum(Soil.NO3N);
            NH4N = MathUtilities.Sum(Soil.NH4N);
            UreaN = MathUtilities.Sum(Soil.SoilNitrogen.urea);
            MineralN = NO3N + NH4N + UreaN; 
            DltNMinRes = MathUtilities.Sum(Soil.SoilNitrogen.dlt_n_min_res);
            DltNMinTot = MathUtilities.Sum(Soil.SoilNitrogen.MineralisedN);
        
            //Residue components//
            ResidueWt = SOM.Wt;
            //MathUtilities.Sum(SOM.dlt_SurfaceOM_wt);    Failed:)
            
            int layers = Soil.Thickness.Length;
            if (InitialDay == true)
            {
                InitialSurfaceOMN = SOM.N;
                InitialSoilOMN = OrganicN;
                InitialMineralN = MineralN;
                InitialDay = false;
            }
            DeltaSurfaceOMN = SOM.N - InitialSurfaceOMN;
            //AccumLeach = AccumLeach + Soil.SoilWater.LeachNH4 + Soil.SoilWater.LeachNO3 + Soil.SoilWater.LeachUrea; //Fails
            AccumLeach = AccumLeach + Soil.SoilWater.LeachNO3;
            AccumMineralisation += MathUtilities.Sum(Soil.SoilNitrogen.MineralisedN);
            AccumDenit -= MathUtilities.Sum(Soil.SoilNitrogen.Denitrification);
            AccumPlantN += (double)zone.Get("Kale.Root.NUptake");
            DeltaSoilOMN = OrganicN - InitialSoilOMN;
            DeltaSoilMineralN = MineralN - InitialMineralN;
            SoilNitrogenContent = MineralN;
    
            
            
            //!!!!!! Water balance components !!!!!!
            //!!!!!!^^^^^^^^^^^^^^^^^^^^^^^^^^!!!!!!

            AccumRainfall += Met.Rain;
            //AccumEP -= (double)zone.Get("[Kale].Stover.Transpiration");
            AccumEP -= (double)zone.Get("Kale.Root.WaterUptake");
            SoilWaterDeficit = (DUL - SWC);
            double OutFlowLat = MathUtilities.Sum(Soil.SoilWater.LateralOutflow);
            AccumOutflowLat -= OutFlowLat;
        }
        
        [EventSubscribe("DoManagementCalculations")]
        private void OnDoManagementCalculations(object sender, EventArgs e)
        {
            FomN = MathUtilities.Sum(Soil.SoilNitrogen.FOMN);
            HumN = MathUtilities.Sum(Soil.SoilNitrogen.HumicN);
            BiomN = MathUtilities.Sum(Soil.SoilNitrogen.MicrobialN);
            AccumFert += Fert.NitrogenApplied;
            AccumIrrigation += Irrig.IrrigationApplied;
            
            
            AccumEO -= Soil.SoilWater.Eo;
            AccumES -= Soil.SoilWater.Es; 
            AccumDrainage += Soil.SoilWater.Drainage;
            AccumRunoff -= Soil.SoilWater.Runoff;
            SWC = MathUtilities.Sum(Soil.SoilWater.SWmm);
            DUL = MathUtilities.Sum(Soil.DULmm);
        }
        
        [EventSubscribe("PlantEnding")]
        private void OnPlantEnding(object sender, EventArgs e)
        {
            AccumFert = 0;
            AccumIrrigation = 0;
            
            
            AccumEO = 0;
            AccumES = 0;
            AccumDrainage = 0;
            AccumRunoff = 0;
            
            AccumLeach = 0;
            AccumMineralisation = 0;
            AccumDenit = 0;
            AccumPlantN = 0;
            
            AccumRainfall = 0;
            AccumEP = 0;
            AccumOutflowLat = 0;
            
        }
    }
}
```
              SoluteManager
              Report: EventNames=[Clock].DoReport
                VariableNames:
                  [Clock].Today
                  [Kale].AboveGround.N
                  [Kale].AboveGround.Wt
                  [Kale].AboveGroundDead.N
                  [Kale].AboveGroundDead.Wt
                  [Kale].AboveGroundLive.N
                  [Kale].AboveGroundLive.Wt
                  [Kale].Arbitrator.DM.TotalFixationSupply
                  [Kale].Arbitrator.DMDemand
                  [Kale].Leaf.AppearedCohortNo
                  [Kale].Leaf.CohortParameters.MaxArea.Value()
                  [Kale].Leaf.CoverDead
                  [Kale].Leaf.CoverGreen
                  [Kale].Leaf.CoverTotal
                  [Kale].Leaf.Dead.N
                  [Kale].Leaf.Dead.NConc
                  [Kale].Leaf.Dead.Wt
                  [Kale].Leaf.DeadCohortNo
                  [Kale].Leaf.ExpandedCohortNo
                  [Kale].Leaf.Fw
                  [Kale].Leaf.Height
                  [Kale].Leaf.InitialisedCohortNo
                  [Kale].Leaf.LAI
                  [Kale].Leaf.Live.N
                  [Kale].Leaf.Live.NConc
                  [Kale].Leaf.Live.Wt
                  [Kale].Leaf.Photosynthesis.RadnInt.Value()
                  [Kale].Leaf.Photosynthesis.RUEact.Value()
                  [Kale].Leaf.PlantAppearedGreenLeafNo
                  [Kale].Leaf.PlantsenescedLeafNo
                  [Kale].Leaf.SenescingCohortNo
                  [Kale].Leaf.SpecificArea
                  [Kale].Leaf.Transpiration
                  [Kale].Petiole.Live.NConc
                  [Kale].Petiole.Live.Wt
                  [Kale].Petiole.Live.N
                  [Kale].Petiole.NConc
                  [Kale].Petiole.PercentWSC
                  [Kale].Phenology.AccumulatedThermalTime.Value()
                  [Kale].Phenology.CurrentPhaseName
                  [Kale].Phenology.CurrentStageName
                  [Kale].Phenology.DailyVernalisation.Value()
                  [Kale].Phenology.FlagLeafDAS
                  [Kale].Phenology.FloweringDAS
                  [Kale].Phenology.MaturityDAS
                  [Kale].Phenology.MeanTemp.Value()
                  [Kale].Phenology.Photoperiod.Value()
                  [Kale].Phenology.PhotoPeriodDeltaFunction
                  [Kale].Phenology.SoilTemperatureFunction.Value()
                  [Kale].Phenology.Stage
                  [Kale].Phenology.ThermalTime.Value()
                  [Kale].Phenology.Vrn1.Value()
                  [Kale].Phenology.Vrn2.Value()
                  [Kale].Phenology.Vrn4.Value()
                  [Kale].Phenology.Zadok.Stage
                  [Kale].Root.Depth
                  [Kale].Root.Live.N
                  [Kale].Root.Live.NConc
                  [Kale].Root.N
                  [Kale].Root.Nconc
                  [Kale].Root.WaterUptake
                  [Kale].Root.Live.Wt
                  [Kale].SowingData.Cultivar
                  [Kale].StorageRoot.Live.NConc
                  [Kale].StorageRoot.Live.Wt
                  [Kale].StorageRoot.Live.N
                  [Kale].StorageRoot.NConc
                  [Kale].StorageRoot.Wt
                  [Kale].Structure.Height
                  [Kale].Structure.LeafTipsAppeared
                  [Kale].Structure.MainStemPopn
                  [Kale].Structure.TotalStemPopn
                  [Kale].Total.N
                  [Kale].Total.NConc
                  [Kale].Total.Wt
                  [Kale].TotalDead.N
                  [Kale].TotalDead.NConc
                  [Phenology].Photoperiod.Value()
                  [Soil].SoilWater.SW
                  [Soil].SoilWater.SWmm
                  [SurfaceOrganicMatter].Wt
                  [Weather].MeanT
                  sum([Soil].SoilNitrogen.NO3) as TotalSoilNitrogen
                  sum([Soil].SoilWater.SWmm) as ProfileWater
                  sum([Soil].SoilNitrogen.mineral_n) as ProfileN
                  [Soil].SoilWater.LeachNO3
                  [Weather].Rain
                  [Irrigation].IrrigationApplied
                  [Fertiliser].NitrogenApplied
            SoilArbitrator Soil Arbitrator
        Experiment Lincoln_Fert_2006_
          Factors
            Factor Sown: Specifications=[SowDateCv]
              Operations Oct
                2006-10-15  [Kale].Sow(population:45, cultivar:"Grunner", depth:10, rowSpacing:150);
              Operations Dec
                2006-12-01  [Kale].Sow(population:45, cultivar:"Grunner", depth:10, rowSpacing:150);
            Factor _Fert_: Specifications=[Irrigation_and_Fertiliser]
              Operations 500
                2006-10-24  [Fertiliser].Apply(100, Fertiliser.Types.UreaN, 0);
                2006-11-30  [Fertiliser].Apply(200, Fertiliser.Types.UreaN, 0);
                2006-12-29  [Fertiliser].Apply(300, Fertiliser.Types.UreaN, 0);
                2006-10-18  [Irrigation].Apply(5);
                2006-11-05  [Irrigation].Apply(10);
                2006-11-24  [Irrigation].Apply(25);
                2006-12-19  [Irrigation].Apply(25);
                2007-01-15  [Irrigation].Apply(25);
                2007-02-02  [Irrigation].Apply(30);
                2007-02-19  [Irrigation].Apply(60);
                2007-03-13  [Irrigation].Apply(30);
                2007-04-05  [Irrigation].Apply(40);
              Operations 150
                2006-10-24  [Fertiliser].Apply(50, Fertiliser.Types.UreaN, 0);
                2006-11-30  [Fertiliser].Apply(50, Fertiliser.Types.UreaN, 0);
                2006-12-29  [Fertiliser].Apply(50, Fertiliser.Types.UreaN, 0);
                2006-10-18  [Irrigation].Apply(5);
                2006-11-05  [Irrigation].Apply(10);
                2006-11-24  [Irrigation].Apply(25);
                2006-12-19  [Irrigation].Apply(25);
                2007-01-15  [Irrigation].Apply(25);
                2007-02-02  [Irrigation].Apply(30);
                2007-02-19  [Irrigation].Apply(60);
                2007-03-13  [Irrigation].Apply(30);
                2007-04-05  [Irrigation].Apply(40);
              Operations Nil
                2006-10-24  [Fertiliser].Apply(0, Fertiliser.Types.UreaN, 0);
                2006-11-30  [Fertiliser].Apply(0, Fertiliser.Types.UreaN, 0);
                2006-12-29  [Fertiliser].Apply(0, Fertiliser.Types.UreaN, 0);
                2006-10-18  [Irrigation].Apply(5);
                2006-11-05  [Irrigation].Apply(10);
                2006-11-24  [Irrigation].Apply(25);
                2006-12-19  [Irrigation].Apply(25);
                2007-01-15  [Irrigation].Apply(25);
                2007-02-02  [Irrigation].Apply(30);
                2007-02-19  [Irrigation].Apply(60);
                2007-03-13  [Irrigation].Apply(30);
                2007-04-05  [Irrigation].Apply(40);
          Simulation Base
            Clock: StartDate=2006-09-01; EndDate=2007-06-01
            Summary summaryfile
            Weather: FileName=lincoln.met
            Zone paddock: Area=1; Slope=0
              Soil TempletonABlock: Latitude=0; Longitude=0
                Analysis: Thickness=[100, 200, 300, 300, 300, 300]; PH=[6.6, 6.2, 5.7, 5.5, 5.5, 5.5]; PHUnits=Water; BoronUnits=HotWater
                InitialWater Initial water: PercentMethod=EvenlyDistributed; FractionFull=1
                Water: KS=[4832, 389, 16, 16, 98]
                  Thickness  BD    AirDry  LL15  DUL   SAT
                  100        1     0.05    0.1   0.27  0.42
                  200        1     0.05    0.1   0.27  0.4
                  300        1.59  0.16    0.16  0.29  0.36
                  300        1.57  0.17    0.17  0.3   0.37
                  300        1.6   0.17    0.17  0.3   0.37
                  300        1.6   0.12    0.12  0.3   0.32
                  SoilCrop KaleSoil: LL=[0.08, 0.07, 0.07, 0.09, 0.11, 0.11]; KL=[0.06, 0.06, 0.06, 0.06, 0.06, 0.06]; XF=[1, 1, 1, 1, 1, 1]
                SoilWater: same as KaleValidation.NZ.Lincoln.Ashley_Dean_2013_.AD_Base.paddock.AshleyDean.SoilWater
                SoilNitrogen: fom_type=[default, manure, mucuna, lablab, shemp, stable]; fract_carb=[0.2, 0.3, 0.54, 0.57, 0.45, 0]; fract_cell=[0.7, 0.3, 0.37, 0.37, 0.47, 0.1]; fract_lign=[0.1, 0.4, 0.09, 0.06, 0.08, 0.9]
                SoilOrganicMatter: same as KaleValidation.NZ.Lincoln.Ashley_Dean_2013_.AD_Base.paddock.AshleyDean.SoilOrganicMatter
                Sample: NO3Units=kgha; NH4Units=kgha; SWUnits=Volumetric; OCUnits=Total; PHUnits=Water
                  Thickness  NO3  NH4
                  150        68   0.1
                  150        74   0.1
                  300        26   0.1
                  300        5    0.1
                  300        3    0.1
                  300        2    0.1
                CERESSoilTemperature
              Plant Kale
              MicroClimate: a_interception=0; b_interception=1; c_interception=0; d_interception=0; soil_albedo=0.23; SoilHeatFluxFraction=0.4; NightInterceptionFraction=0.5; ReferenceHeight=2
              Irrigation
              Fertiliser
              Operations SowDateCv
                2006-10-06  [Kale].Sow(population:45, cultivar:"Grunner", depth:10, rowSpacing:150);
              SurfaceOrganicMatter surface organic matter: InitialResidueName=wheat; InitialResidueType=wheat; InitialResidueMass=0; InitialStandingFraction=0; InitialCPR=0; InitialCNR=80; FractionFaecesAdded=0.5
              Operations Irrigation_and_Fertiliser
                2006-10-24  [Fertiliser].Apply(100, Fertiliser.Types.UreaN, 0);
                2006-11-30  [Fertiliser].Apply(200, Fertiliser.Types.UreaN, 0);
                2006-12-29  [Fertiliser].Apply(200, Fertiliser.Types.UreaN, 0);
                2006-10-18  [Irrigation].Apply(5);
                2006-11-05  [Irrigation].Apply(10);
                2006-11-24  [Irrigation].Apply(25);
                2006-12-19  [Irrigation].Apply(25);
                2007-01-15  [Irrigation].Apply(25);
                2007-02-02  [Irrigation].Apply(30);
                2007-02-19  [Irrigation].Apply(60);
                2007-03-13  [Irrigation].Apply(30);
                2007-04-05  [Irrigation].Apply(40);
              Manager ExtraVariables
```csharp
using System;
using Models.Core;
using System.Collections.Generic;
using System.Text;
using Models.Soils;
using Models.PMF;
using Models;
using System.Xml.Serialization;
using APSIM.Shared.Utilities;

namespace Models
{
    [Serializable] 
    public class Script : Model
    {
        [Link] Clock Clock;
        [Link] Soils.Soil Soil;
        [Link] Models.Surface.SurfaceOrganicMatter SOM;
        [Link] Weather Met;
        [Link] Fertiliser Fert;
        [Link] Irrigation Irrig;
        [Link] Plant Kale;
        [Link] Zone zone;
                    
        [XmlIgnore] public bool InitialDay { get; set; }
        
        [XmlIgnore] public double AccumPlantN { get; set; }
        [XmlIgnore] public double AccumMineralisation { get; set; }
        [XmlIgnore] public double AccumDenit { get; set; }
        [XmlIgnore] public double AccumFert { get; set; }
        [XmlIgnore] public double AccumLeach { get; set; }
        [XmlIgnore] public double AccumDetach { get; set; }
        [XmlIgnore] public double DeltaSoilOMN { get; set; }
        [XmlIgnore] public double DeltaSurfaceOMN { get; set; }
        [XmlIgnore] public double DeltaSoilMineralN { get; set; }
        [XmlIgnore] public double SoilNitrogenContent { get; set; }
        
        
        
        [XmlIgnore] public double AccumEO { get; set; }
        [XmlIgnore] public double AccumEP { get; set; }
        [XmlIgnore] public double AccumES { get; set; }
        [XmlIgnore] public double AccumDrainage { get; set; }
        [XmlIgnore] public double AccumRunoff { get; set; }
        [XmlIgnore] public double AccumOutflowLat { get; set; }
        [XmlIgnore] public double AccumIrrigation { get; set; }
        [XmlIgnore] public double AccumRainfall { get; set; }
        [XmlIgnore] public double SoilWaterDeficit { get; set; }
    
        [XmlIgnore] public double  InitialSoilOMN { get; set; }
        [XmlIgnore] public double  InitialSurfaceOMN { get; set; }
        [XmlIgnore] public double  InitialMineralN { get; set; }
        
        
        [XmlIgnore] public double SWC { get; set; }
        [XmlIgnore] public double DUL { get; set; }
        [XmlIgnore] public double OutFlowLat { get; set; }

        [XmlIgnore] public double FomN { get; set; }
        [XmlIgnore] public double BiomN { get; set; }
        [XmlIgnore] public double HumN { get; set; }
        [XmlIgnore] public double OrganicN { get; set; }
        [XmlIgnore] public double NO3N { get; set; }
        [XmlIgnore] public double NH4N { get; set; }
        [XmlIgnore] public double UreaN { get; set; }
        [XmlIgnore] public double MineralN { get; set; }
        [XmlIgnore] public double DltNMinRes { get; set; }
        [XmlIgnore] public double DltNMinTot { get; set; }
        [XmlIgnore] public double ResidueWt{ get; set; }
        
        
        [EventSubscribe("Commencing")]
        private void OnSimulationCommencing(object sender, EventArgs e)
        {
            InitialDay = true;
        }
        
        [EventSubscribe("DoManagement")]
        private void OnDoManagement(object sender, EventArgs e)
        {
            //!!!!!! Nitrogen balance components !!!!!!
            FomN = MathUtilities.Sum(Soil.SoilNitrogen.FOMN);
            HumN = MathUtilities.Sum(Soil.SoilNitrogen.HumicN);
            BiomN = MathUtilities.Sum(Soil.SoilNitrogen.MicrobialN);
            OrganicN = FomN + HumN + BiomN;
            NO3N = MathUtilities.Sum(Soil.NO3N);
            NH4N = MathUtilities.Sum(Soil.NH4N);
            UreaN = MathUtilities.Sum(Soil.SoilNitrogen.urea);
            MineralN = NO3N + NH4N + UreaN; 
            DltNMinRes = MathUtilities.Sum(Soil.SoilNitrogen.dlt_n_min_res);
            DltNMinTot = MathUtilities.Sum(Soil.SoilNitrogen.MineralisedN);
        
            //Residue components//
            ResidueWt = SOM.Wt;
            //MathUtilities.Sum(SOM.dlt_SurfaceOM_wt);    Failed:)
            
            int layers = Soil.Thickness.Length;
            if (InitialDay == true)
            {
                InitialSurfaceOMN = SOM.N;
                InitialSoilOMN = OrganicN;
                InitialMineralN = MineralN;
                InitialDay = false;
            }
            DeltaSurfaceOMN = SOM.N - InitialSurfaceOMN;
            //AccumLeach = AccumLeach + Soil.SoilWater.LeachNH4 + Soil.SoilWater.LeachNO3 + Soil.SoilWater.LeachUrea; //Fails
            AccumLeach = AccumLeach + Soil.SoilWater.LeachNO3;
            AccumMineralisation += MathUtilities.Sum(Soil.SoilNitrogen.MineralisedN);
            AccumDenit -= MathUtilities.Sum(Soil.SoilNitrogen.Denitrification);
            AccumPlantN += (double)zone.Get("Kale.Root.NUptake");
            DeltaSoilOMN = OrganicN - InitialSoilOMN;
            DeltaSoilMineralN = MineralN - InitialMineralN;
            SoilNitrogenContent = MineralN;
    
            
            
            //!!!!!! Water balance components !!!!!!
            //!!!!!!^^^^^^^^^^^^^^^^^^^^^^^^^^!!!!!!

            AccumRainfall += Met.Rain;
            //AccumEP -= (double)zone.Get("[Kale].Stover.Transpiration");
            AccumEP -= (double)zone.Get("Kale.Root.WaterUptake");
            SoilWaterDeficit = (SWC - DUL);
            double OutFlowLat = MathUtilities.Sum(Soil.SoilWater.LateralOutflow);
            AccumOutflowLat -= OutFlowLat;
        }
        
        [EventSubscribe("DoManagementCalculations")]
        private void OnDoManagementCalculations(object sender, EventArgs e)
        {
            FomN = MathUtilities.Sum(Soil.SoilNitrogen.FOMN);
            HumN = MathUtilities.Sum(Soil.SoilNitrogen.HumicN);
            BiomN = MathUtilities.Sum(Soil.SoilNitrogen.MicrobialN);
            AccumFert += Fert.NitrogenApplied;
            AccumIrrigation += Irrig.IrrigationApplied;
            
            
            AccumEO -= Soil.SoilWater.Eo;
            AccumES -= Soil.SoilWater.Es; 
            AccumDrainage += Soil.SoilWater.Drainage;
            AccumRunoff -= Soil.SoilWater.Runoff;
            SWC = MathUtilities.Sum(Soil.SoilWater.SWmm);
            DUL = MathUtilities.Sum(Soil.DULmm);
        }
        
        [EventSubscribe("PlantEnding")]
        private void OnPlantEnding(object sender, EventArgs e)
        {
            AccumFert = 0;
            AccumIrrigation = 0;
            
            
            AccumEO = 0;
            AccumES = 0;
            AccumDrainage = 0;
            AccumRunoff = 0;
            
            AccumLeach = 0;
            AccumMineralisation = 0;
            AccumDenit = 0;
            AccumPlantN = 0;
            
            AccumRainfall = 0;
            AccumEP = 0;
            AccumOutflowLat = 0;
            
        }
    }
}
```
              SoluteManager
              Report: same as KaleValidation.NZ.Lincoln.Ashley_Dean_2013_.AD_Base.paddock.Report
            SoilArbitrator Soil Arbitrator
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