Simulations
  Replacements
    Plant Kale: CropType=Kale
      Cultivar Grunner
      Cultivar Kestral
      OrganArbitrator Arbitrator: NArbitrationOption=PriorityThenRelativeAllocation; DMArbitrationOption=PriorityThenRelativeAllocation
      Phenology: DaysAfterSowing=0
        MultiplyFunction ThermalTime
          PhaseLookup
            PhaseLookupValue SoilTemperature: Start=Sowing; End=Germination
              SoilTemperatureFunction ThermalTime: maxt_soil_surface=20; mint_soil_surface=10
                XYPairs: X=[0, 25, 30, 45]; Y=[0, 25, 25, 0]
              Memo
                Soil temperature may be extended beyond germination (e.g. based on leaf numbers) - need data to back up
            PhaseLookupValue AirTemperature: Start=Germination; End=Maturity
              AirTemperatureFunction ThermalTime
                XYPairs: X=[0, 20, 35, 45]; Y=[0, 18, 0, 0]
          AddFunction DroughtPhenologyAcelleration
            Constant One: Value=1
            MultiplyFunction Stress
              Constant StressResponseCoefficient: Value=2
              LinearInterpolationFunction StressFactor: XProperty=[Kale].WaterSupplyDemandRatio
                XYPairs: X=[0, 1]; Y=[0, 0]
        GerminatingPhase Planted: Start=Sowing; End=Germination
        EmergingPhase Germinating: Start=Germination; End=PreEmerge; ShootLag=1; ShootRate=40
          VariableReference ThermalTime: VariableName=[Phenology].ThermalTime.Value
          Memo
            Turned off the lag and used only the Tt per mm to empirically fit simulations to FRNL data of emergence.
        GenericPhase Emerging: Start=PreEmerge; End=Emergence
          Constant Target: Value=400
          VariableReference ThermalTime: VariableName=[Phenology].ThermalTime.Value
        GenericPhase Emerged: Start=Emergence; End=Expanding
          Constant Target: Value=350
          VariableReference ThermalTime: VariableName=[Phenology].ThermalTime.Value
        GenericPhase Expanding: Start=Expanding; End=Vegetative
          Constant Target: Value=500
          VariableReference ThermalTime: VariableName=[Phenology].ThermalTime.Value
        GenericPhase Vegetative: Start=Vegetative; End=Maturity
          Constant Target: Value=2000
          VariableReference ThermalTime: VariableName=[Phenology].ThermalTime.Value
        EndPhase Maturity: Start=Maturity; End=Unused
          Constant Target: Value=15000
          VariableReference ThermalTime: VariableName=[Phenology].ThermalTime.Value
        AccumulateFunction AccumulatedThermalTime: StartStageName=PreEmerge; EndStageName=Maturity
          VariableReference: VariableName=[Phenology].ThermalTime.Value
        PhotoperiodFunction Photoperiod: Twilight=-6; DayLength=0
      Structure: Initialised=false; Germinated=false; Emerged=false
        VariableReference ThermalTime: VariableName=[Phenology].ThermalTime.Value
        LinearInterpolationFunction HeightModel: XProperty=[Structure].LeafTipsAppeared
          XYPairs: X=[0, 24]; Y=[20, 2500]
        PhaseLookupValue MainStemPrimordiaInitiationRate: Start=PreEmerge; End=Maturity
          DivideFunction NodeInitiationRateFunction
            VariableReference Phyllochron: VariableName=[Structure].MainStemNodeAppearanceRate.Phyllochron.Value
            Constant PrimordiaPerMainstemNode: Value=2
        PhaseLookupValue MainStemNodeAppearanceRate: Start=PreEmerge; End=Maturity
          LinearInterpolationFunction Phyllochron: XProperty=[Kale].Structure.LeafTipsAppeared
            XYPairs: X=[0, 3, 100]; Y=[100, 100, 100]
            Memo
              Measured value of 45-53oCd/leaf from Emmanuel's data and FRNL data too.

              Two stage phyllochron (100oCd to 50oCd) is an empirical fix to get first leaves right. May be in fact response to soil temperature at later stages. To check.

              There seems to be a seasonal difference in leaf appearance rates across sowing dates. So we should check thermal-time model.
        Constant MainStemFinalNodeNumber: Value=400
        Constant DroughtInducedBranchMortality: Value=0
        Constant BranchingRate: Value=0
        Constant BranchMortality: Value=0
        Constant PlantMortality: Value=0
      Leaf: MaxCover=1; Albedo=0.2; Gsmax=0.015; R50=150; KDead=0.3; MaximumMainStemLeafNumber=80
        zero: MaintenanceRespiration, CurrentExpandingLeaf, StartFractionExpanded, FractionNextleafExpanded, DeadNodesYesterday, FRGR, PotentialEP, FudgeToGetETDemandRight, DMConversionEfficiency, GrowthRespiration, TipsAtEmergence, CohortsAtInitialisation, FractionDied
        LeafCohort InitialLeaves[1]: DeltaWaterConstrainedArea=0; DeltaCarbonConstrainedArea=0; Rank=1; Area=50; MaintenanceRespiration=0
        CompositeBiomass Live: Propertys=[[Leaf].CohortLive]
        CompositeBiomass Dead: Propertys=[[Leaf].CohortDead]
        CompositeBiomass Total: Propertys=[[Leaf].CohortLive, [Leaf].CohortDead]
        ArrayBiomass CohortArrayLive: Propertys=[[Leaf].Live]; ArraySize=[Leaf].MaxNodeNo
        ArrayBiomass CohortArrayDead: Propertys=[[Leaf].Dead]; ArraySize=[Leaf].MaxNodeNo
        VariableReference ThermalTime: VariableName=[Phenology].ThermalTime.Value
        RUEModel Photosynthesis
          Constant RUE: Value=1.6
          Constant FVPD: Value=1
          WeightedTemperatureFunction FT: MaximumTemperatureWeighting=1
            XYPairs: X=[0, 10, 18, 26, 38]; Y=[0.1, 1, 1, 1, 0]
          LinearInterpolationFunction FW: XProperty=[Leaf].Fw
            XYPairs: X=[0, 1, 1.5]; Y=[0, 1, 1]
          RUECO2Function FCO2: PhotosyntheticPathway=C3
          VariableReference RadnInt: VariableName=[Leaf].RadIntTot
          VariableReference RUEact: VariableName=[RUEModel].RueAct
          LinearInterpolationFunction FN: XProperty=[Leaf].Fn
            XYPairs: X=[0, 1, 1.5]; Y=[0, 1, 1]
        LinearInterpolationFunction FrostFraction: XProperty=[Weather].MinT
          XYPairs: X=[-1, 0]; Y=[0, 0]
        MultiplyFunction ExtinctionCoeff
          Constant PotentialExtinctionCoeff: Value=0.8
          LinearInterpolationFunction WaterStress: XProperty=[Kale].WaterSupplyDemandRatio
            XYPairs: X=[0, 1]; Y=[0.5, 1]
        LeafCohortParameters CohortParameters
          LinearInterpolationFunction MaxArea: XProperty=[Structure].LeafTipsAppeared
            XYPairs: X=[0, 2, 4, 6, 8, 30, -, 50]; Y=[500, 30000, 60000, 90000, 120000, 120000, -, 10000]
            Memo
              Pattern of max leaf area assumed from sugar beet: Milford et al. 1985
              Values from measurments A-Block FRNL experiment 2014-15 Plant & Food
          LinearInterpolationFunction GrowthDuration: XProperty=[Structure].LeafTipsAppeared
            XYPairs: X=[0, 6, 11, 15, 21, 35, 45, 50]; Y=[120, 120, 120, 120, 120, 120, 120, 120]
          LinearInterpolationFunction LagDuration: XProperty=[Plant].Leaf.LAI
            XYPairs: X=[0, 3.5, 9, 50, 200, -, -, 50]; Y=[300, 200, 100, 100, 100, -, -, 120]
            Memo
              Assumed shape as maize data (Teixeira et al 2011).
          Constant SenescenceDuration: Value=20
          Constant DetachmentLagDuration: Value=1000000
          Constant DetachmentDuration: Value=1000000
          Constant StructuralFraction: Value=0.1
          Constant SpecificLeafAreaMin: Value=12000
          Constant SpecificLeafAreaMax: Value=14000
          LinearInterpolationFunction ExpansionStress: XProperty=[Plant].WaterSupplyDemandRatio
            XYPairs: X=[0, 0, 0.325, 0.75, 1, 1.5]; Y=[0, 0, 0.5, 1, 1, 1]
          Constant MinimumNConc: Value=0.015
          Constant CriticalNConc: Value=0.02
          Constant MaximumNConc: Value=0.045
          Constant NReallocationFactor: Value=0.95
          Constant NRetranslocationFactor: Value=0.01
          Constant DMRetranslocationFactor: Value=0.95
          Constant DMReallocationFactor: Value=0.8
          Constant NonStructuralFraction: Value=0.2
          LinearInterpolationFunction ShadeInducedSenescenceRate: XProperty=[Leaf].CohortCurrentRankCoverAbove
            XYPairs: X=[0, 0.5, 0.95, 1]; Y=[0, 0, 0, 0.1]
          Constant InitialNConc: Value=0
          Constant SenessingLeafRelativeSize: Value=1; Units=0-1
        MinimumFunction FRGRFunction
          VariableReference RUE_FT: VariableName=[Leaf].Photosynthesis.FT.Value
          MinimumFunction Others
            VariableReference RUE_FN: VariableName=[Leaf].Photosynthesis.FN.Value
            VariableReference RUE_FVPD: VariableName=[Leaf].Photosynthesis.FVPD.Value
        Folder BiomassRemovalDefaults
          OrganBiomassRemovalType Harvest: FractionLiveToRemove=0; FractionDeadToRemove=0; FractionLiveToResidue=0; FractionDeadToResidue=0
          OrganBiomassRemovalType Cut: FractionLiveToRemove=0; FractionDeadToRemove=0; FractionLiveToResidue=0; FractionDeadToResidue=0
          OrganBiomassRemovalType Prune: FractionLiveToRemove=0; FractionDeadToRemove=0; FractionLiveToResidue=0; FractionDeadToResidue=0
          OrganBiomassRemovalType Graze: FractionLiveToRemove=0; FractionDeadToRemove=0; FractionLiveToResidue=0; FractionDeadToResidue=0
      GenericAboveGroundOrgan Stem: MaintenanceRespiration=0; GrowthRespiration=0
        Constant StructuralFraction: Value=0.2
        LinearInterpolationFunction MaximumNConc: XProperty=[Phenology].Stage
          XYPairs: X=[3, 4, 6]; Y=[0.06, 0.03, 0.02]
        Constant MinimumNConc: Value=0.006
        PhaseBasedSwitch NitrogenDemandSwitch: Start=Germination; End=Maturity
        Constant NRetranslocationFactor: Value=0.1
        Constant DMRetranslocationFactor: Value=0.05
        Biomass Live
        Biomass Dead
        Constant DMSinkCapacity: Value=1
        PartitionFractionDemandFunction DMDemandFunction
          PhaseLookup PartitionFraction
            PhaseLookupValue EarlyDMdemand: Start=Emergence; End=Vegetative
              AllometricDemandFunction: Const=32; Power=2.5; XProperty=[Leaf].LAI; YProperty=[Stem].Live.Wt
            PhaseLookupValue Maturity: Start=Vegetative; End=Maturity
              Constant: Value=0.8
            PhaseLookupValue PostMaturity: Start=Vegetative; End=Maturity
              Constant: Value=0.9
        Folder BiomassRemovalDefaults: same as Replacements.Kale.Leaf.BiomassRemovalDefaults
      Root: MaintenanceRespiration=0
        Constant SoilWaterEffect: Value=1
        PhaseLookup PartitionFraction
          PhaseLookupValue Emerging: Start=Sowing; End=Emergence
            Constant: Value=0
          PhaseLookupValue Growing: Start=Emergence; End=Maturity
            Constant: Value=0.05
        AirTemperatureFunction TemperatureEffect
          XYPairs: X=[0, 26, 35]; Y=[1, 1, 1]
        PhaseLookup RootFrontVelocity
          PhaseLookupValue: Start=Germination; End=Maturity
            Constant: Value=10
        Constant MaximumNConc: Value=0.01
        Constant MinimumNConc: Value=0.005
        PhaseBasedSwitch NitrogenDemandSwitch: Start=Emergence; End=Maturity
        LinearInterpolationFunction SenescenceRate: XProperty=[Leaf].FractionDied
          XYPairs: X=[0, 1]; Y=[0, 0.001]
        CompositeBiomass Live: Propertys=[[Root].LayerLive]
        CompositeBiomass Dead: Propertys=[[Root].LayerDead]
        Constant MaxDailyNUptakeConst: Value=7.5
        Constant InitialDM: Value=5; Units=g/plant
        Constant SpecificRootLength: Value=40; Units=m/g
        Constant StructuralFraction: Value=0.5
        Folder BiomassRemovalDefaults: same as Replacements.Kale.Leaf.BiomassRemovalDefaults
        LinearInterpolationFunction KNO3: XProperty=[Root].RootLengthDenisty
          XYPairs: X=[0, 0.003]; Y=[0.02, 0.02]
        LinearInterpolationFunction KNH4: XProperty=[Root].RootLengthDenisty
          XYPairs: X=[0, 0.003]; Y=[0, 0]
        LinearInterpolationFunction NUptakeSWFactor: XProperty=[Root].RWC
          XYPairs: X=[0, 1]; Y=[0, 1]
        LinearInterpolationFunction MaxDailyNUptake: XProperty=[Root].Depth
          XYPairs: X=[0, 150, 600, 900, 1200, 1500, 1800, 2100]; Y=[3, 3.5, 4.5, 6, 7.5, 7.5, 7.5, 7.5]
          Memo
            Pattern of max leaf area assumed from sugar beet: Milford et al. 1985
            Values from measurments A-Block FRNL experiment 2014-15 Plant & Food
        LinearInterpolationFunction KLModifier: XProperty=[Root].RootLengthDensity
          XYPairs: X=[0, 1]; Y=[1, 1]
        Constant MaximumRootDepth: Value=1500
      CompositeBiomass AboveGround: Propertys=[[Leaf].Live, [Leaf].Dead, [Stem].Live, [Stem].Dead]
      CompositeBiomass BelowGround: Propertys=[[Root].Live, [Root].Dead]
      CompositeBiomass Total
        Propertys=[[Leaf].Live, [Leaf].Dead, [Stem].Live, [Stem].Dead, [Root].Live, [Root].Dead]
      CompositeBiomass TotalLive: Propertys=[[Leaf].Live, [Stem].Live, [Root].Live]
      CompositeBiomass TotalDead: Propertys=[[Leaf].Dead, [Stem].Dead, [Root].Dead]
      CompositeBiomass AboveGroundLive: Propertys=[[Leaf].Live, [Stem].Live]
  DataStore
    Input Kale_calib: FileName=Observed\kale_observed_named.txt
      ErrorMessage:
        Invalid number of values on line: 35.05                             15.36                             19.69                             4.28                              5.02                              3.19
        in file: C:\GithubRepos\ApsimX\Prototypes\Kale\Observed\kale_observed_named.txt
    Input Ashley_Dean: FileName=Observed\Ashley_DEAN Seq.txt
      ErrorMessage=The process cannot access the file 'C:\ApsimX\Prototypes\Kale\Observed\kale_observed.prn' because it is being used by another process.
    Input Ashley_Dean_LAI: FileName=Observed\Ashley_DEAN LAI.txt
      ErrorMessage=The process cannot access the file 'C:\ApsimX\Prototypes\Kale\Observed\kale_observed.prn' because it is being used by another process.
  Experiment Kale
    Factors
      Factor _Sown_1Oct06: Specifications=[SowDateCv]
        Operations S1
          2006-10-06  [Kale].Sow(population:45, cultivar:"Grunner", depth:10, rowSpacing:150);
      Factor _Fert_: Specifications=[Irrigation_and_Fertiliser]
        Operations 500
          2006-10-24  [Fertiliser].Apply(100, Fertiliser.Types.UreaN, 0);
          2006-11-30  [Fertiliser].Apply(200, Fertiliser.Types.UreaN, 0);
          2006-12-29  [Fertiliser].Apply(200, Fertiliser.Types.UreaN, 0);
          2006-10-18  [Irrigation].Apply(5);
          2006-11-05  [Irrigation].Apply(10);
          2006-11-24  [Irrigation].Apply(25);
          2006-12-19  [Irrigation].Apply(25);
          2007-01-15  [Irrigation].Apply(25);
          2007-02-02  [Irrigation].Apply(30);
          2007-02-19  [Irrigation].Apply(60);
          2007-03-13  [Irrigation].Apply(30);
          2007-04-05  [Irrigation].Apply(40);
        Operations 150
          2006-10-24  [Fertiliser].Apply(50, Fertiliser.Types.UreaN, 0);
          2006-11-30  [Fertiliser].Apply(50, Fertiliser.Types.UreaN, 0);
          2006-12-29  [Fertiliser].Apply(50, Fertiliser.Types.UreaN, 0);
          2006-10-18  [Irrigation].Apply(5);
          2006-11-05  [Irrigation].Apply(10);
          2006-11-24  [Irrigation].Apply(25);
          2006-12-19  [Irrigation].Apply(25);
          2007-01-15  [Irrigation].Apply(25);
          2007-02-02  [Irrigation].Apply(30);
          2007-02-19  [Irrigation].Apply(60);
          2007-03-13  [Irrigation].Apply(30);
          2007-04-05  [Irrigation].Apply(40);
        Operations nil
          2006-10-24  [Fertiliser].Apply(0, Fertiliser.Types.UreaN, 0);
          2006-11-30  [Fertiliser].Apply(0, Fertiliser.Types.UreaN, 0);
          2006-12-29  [Fertiliser].Apply(0, Fertiliser.Types.UreaN, 0);
          2006-10-18  [Irrigation].Apply(5);
          2006-11-05  [Irrigation].Apply(10);
          2006-11-24  [Irrigation].Apply(25);
          2006-12-19  [Irrigation].Apply(25);
          2007-01-15  [Irrigation].Apply(25);
          2007-02-02  [Irrigation].Apply(30);
          2007-02-19  [Irrigation].Apply(60);
          2007-03-13  [Irrigation].Apply(30);
          2007-04-05  [Irrigation].Apply(40);
    Simulation Base: Area=0; Slope=0
      Clock: StartDate=2006-09-01; EndDate=2007-06-01
      Summary summaryfile
      Weather: FileName=C:\apsim_dev\Data\MetFiles\lincoln.met
      Zone paddock: Area=1; Slope=0
        Soil TempletonABlock: Latitude=0; Longitude=0; Area=0
          Analysis: Thickness=[100, 200, 300, 300, 300, 300]; PH=[6.6, 6.2, 5.7, 5.5, 5.5, 5.5]; PHUnits=Water; BoronUnits=HotWater
          InitialWater Initial water: PercentMethod=EvenlyDistributed; FractionFull=1
          Water: KS=[4832, 389, 16, 16, 98]
            Thickness  BD    AirDry  LL15  DUL   SAT
            100        1     0.05    0.1   0.27  0.42
            200        1     0.05    0.1   0.27  0.4
            300        1.59  0.16    0.16  0.29  0.36
            300        1.57  0.17    0.17  0.3   0.37
            300        1.6   0.17    0.17  0.3   0.37
            300        1.6   0.12    0.12  0.3   0.32
            SoilCrop KaleSoil: LL=[0.08, 0.07, 0.07, 0.09, 0.11, 0.11]; KL=[0.06, 0.06, 0.06, 0.06, 0.06, 0.06]; XF=[1, 1, 1, 1, 1, 1]
          SoilWater: SummerDate=1-Nov; SummerU=9; SummerCona=4.4; WinterDate=1-Apr; WinterU=9; WinterCona=4.4; DiffusConst=88; DiffusSlope=35.4; Salb=0.18; CN2Bare=68; CNRed=20; CNCov=0.8; max_pond=0; Thickness=[100, 200, 300, 300, 300, 300]; SWCON=[0.55, 0.55, 0.55, 0.55, 0.55, 0.55]; residueinterception=0
          SoilNitrogen: fom_type=[default, manure, mucuna, lablab, shemp, stable]; fract_carb=[0.2, 0.3, 0.54, 0.57, 0.45, 0]; fract_cell=[0.7, 0.3, 0.37, 0.37, 0.47, 0.1]; fract_lign=[0.1, 0.4, 0.09, 0.06, 0.08, 0.9]; wfpsN2N2O_x=[22, 88]; wfpsN2N2O_y=[0.1, 1]
          SoilOrganicMatter: RootCN=30; RootWt=3000; SoilCN=11.5; EnrACoeff=7.4; EnrBCoeff=0.2; OCUnits=Total
            Thickness  OC    FBiom  FInert
            100        1.82  0.025  0.3
            200        1.47  0.025  0.4
            300        1.2   0.015  0.75
            300        1.03  0.01   0.9
            300        0.47  0.01   0.96
            300        0.47  0.01   0.96
          Sample: NO3Units=kgha; NH4Units=kgha; SWUnits=Volumetric; OCUnits=Total; PHUnits=Water
            Thickness  NO3  NH4
            150        68   0.1
            150        74   0.1
            300        26   0.1
            300        5    0.1
            300        3    0.1
            300        2    0.1
        Plant Kale
        MicroClimate: a_interception=0; b_interception=1; c_interception=0; d_interception=0; soil_albedo=0.23; air_pressure=1010; soil_emissivity=0.96; sun_angle=15; soil_heat_flux_fraction=0.4; night_interception_fraction=0.5; windspeed_default=3; refheight=2; albedo=0.26; emissivity=0.96; gsmax=0.01; r50=200
        Irrigation
        Fertiliser
        Operations SowDateCv
          2006-10-06  [Kale].Sow(population:45, cultivar:"Grunner", depth:10, rowSpacing:150);
        SurfaceOrganicMatter surface organic matter: PoolName=wheat; type=wheat; mass=0; standing_fraction=0; cnr=80; CriticalResidueWeight=2000; OptimumDecompTemp=20; MaxCumulativeEOS=20; CNRatioDecompCoeff=0.277; CNRatioDecompThreshold=25; TotalLeachRain=25; MinRainToLeach=10; CriticalMinimumOrganicC=0.004; DefaultCPRatio=0; DefaultStandingFraction=0; StandingExtinctCoeff=0.5; FractionFaecesAdded=0.5
          Pools:
            {PoolName=wheat, ResidueType=wheat, Mass=0, CNRatio=80, StandingFraction=0}
          ResidueTypes ResidueTypesList: LoadFromResource=ResidueTypes
        Report Kale_Calib_Report: EventNames=[Clock].DoReport
          VariableNames:
            [Clock].Today
            [Kale].Leaf.Fw
            [Kale].Leaf.Fn
            [Kale].Phenology.CurrentPhaseName
            [Kale].Phenology.Stage
            [Kale].Phenology.ThermalTime.Value
            [Kale].Phenology.AccumulatedThermalTime.Value
            [Kale].Leaf.Live.Wt
            [Kale].Leaf.Dead.Wt
            [Kale].TotalDead.Wt
            [Kale].Total.Wt
            [Kale].Stem.Live.Wt
            [Kale].Leaf.LAI
            [Kale].Structure.LeafTipsAppeared
            [Kale].Leaf.PlantAppearedLeafNo
            [Kale].Leaf.PlantAppearedGreenLeafNo
            [Kale].Leaf.PlantsenescedLeafNo
            [Kale].Leaf.CoverGreen
            [Kale].Leaf.CohortParameters.MaxArea.Value
            [Phenology].Photoperiod.Value
            [Kale].AboveGround.Wt
            [Kale].AboveGroundLive.Wt
            [Kale].Leaf.Photosynthesis.RadnInt.Value
            [Kale].Leaf.Photosynthesis.RUEact.Value
            [ExtraVariables].Script.AccumPlantN
            [Kale].Leaf.Live.N
            [Kale].Root.Live.N
            [Kale].Stem.Live.N
            [Kale].AboveGround.N
            [Kale].AboveGroundLive.N
            [Kale].Leaf.Live.NConc
            [Kale].Stem.Live.NConc
            [Kale].Root.Live.NConc
            [Kale].Leaf.Fn
        Operations Irrigation_and_Fertiliser: same as Kale.Factors._Fert_.500
        Manager ExtraVariables
```csharp
using System;
using Models.Core;
using System.Collections.Generic;
using System.Text;
using Models.Soils;
using Models.PMF;
using Models;
using System.Xml.Serialization;
using APSIM.Shared.Utilities;

namespace Models
{
	[Serializable] 
	public class Script : Model
	{
		[Link] Clock Clock;
		[Link] Soils.Soil Soil;
		[Link] Models.SurfaceOM.SurfaceOrganicMatter SOM;
		[Link] Weather Met;
		[Link] Fertiliser Fert;
		[Link] Irrigation Irrig;
		[Link] Plant Kale;
		[Link] Zone zone;
					
		[XmlIgnore] public bool InitialDay { get; set; }
		
		[XmlIgnore] public double AccumPlantN { get; set; }
		[XmlIgnore] public double AccumMineralisation { get; set; }
		[XmlIgnore] public double AccumDenit { get; set; }
		[XmlIgnore] public double AccumFert { get; set; }
		[XmlIgnore] public double AccumLeach { get; set; }
		[XmlIgnore] public double AccumDetach { get; set; }
		[XmlIgnore] public double DeltaSoilOMN { get; set; }
		[XmlIgnore] public double DeltaSurfaceOMN { get; set; }
		[XmlIgnore] public double DeltaSoilMineralN { get; set; }
		[XmlIgnore] public double SoilNitrogenContent { get; set; }
		
		
		
		[XmlIgnore] public double AccumEO { get; set; }
		[XmlIgnore] public double AccumEP { get; set; }
		[XmlIgnore] public double AccumES { get; set; }
		[XmlIgnore] public double AccumDrainage { get; set; }
		[XmlIgnore] public double AccumRunoff { get; set; }
		[XmlIgnore] public double AccumOutflowLat { get; set; }
		[XmlIgnore] public double AccumIrrigation { get; set; }
		[XmlIgnore] public double AccumRainfall { get; set; }
		[XmlIgnore] public double SoilWaterDeficit { get; set; }
	
		[XmlIgnore] public double  InitialSoilOMN { get; set; }
		[XmlIgnore] public double  InitialSurfaceOMN { get; set; }
		[XmlIgnore] public double  InitialMineralN { get; set; }
		
		
		[XmlIgnore] public double SWC { get; set; }
		[XmlIgnore] public double DUL { get; set; }
		[XmlIgnore] public double OutFlowLat { get; set; }

		[XmlIgnore] public double FomN { get; set; }
		[XmlIgnore] public double BiomN { get; set; }
		[XmlIgnore] public double HumN { get; set; }
		[XmlIgnore] public double OrganicN { get; set; }
		[XmlIgnore] public double NO3N { get; set; }
		[XmlIgnore] public double NH4N { get; set; }
		[XmlIgnore] public double UreaN { get; set; }
		[XmlIgnore] public double MineralN { get; set; }
		[XmlIgnore] public double DltNMinRes { get; set; }
		[XmlIgnore] public double DltNMinTot { get; set; }
		[XmlIgnore] public double ResidueWt{ get; set; }
		
		
		[EventSubscribe("Commencing")]
		private void OnSimulationCommencing(object sender, EventArgs e)
		{
			InitialDay = true;
		}
		
		[EventSubscribe("DoManagement")]
		private void OnDoManagement(object sender, EventArgs e)
		{
			//!!!!!! Nitrogen balance components !!!!!!
			FomN = MathUtilities.Sum(Soil.SoilNitrogen.FOMN);
			HumN = MathUtilities.Sum(Soil.SoilNitrogen.HumicN);
			BiomN = MathUtilities.Sum(Soil.SoilNitrogen.MicrobialN);
			OrganicN = FomN + HumN + BiomN;
			NO3N = MathUtilities.Sum(Soil.NO3N);
			NH4N = MathUtilities.Sum(Soil.NH4N);
			UreaN = MathUtilities.Sum(Soil.SoilNitrogen.urea);
			MineralN = NO3N + NH4N + UreaN; 
			DltNMinRes = MathUtilities.Sum(Soil.SoilNitrogen.dlt_n_min_res);
			DltNMinTot = MathUtilities.Sum(Soil.SoilNitrogen.MineralisedN);
		
			//Residue components//
			ResidueWt = SOM.Wt;
			//MathUtilities.Sum(SOM.dlt_SurfaceOM_wt);	Failed:)
			
			int layers = Soil.Thickness.Length;
			if (InitialDay == true)
			{
				InitialSurfaceOMN = SOM.N;
				InitialSoilOMN = OrganicN;
				InitialMineralN = MineralN;
				InitialDay = false;
			}
			DeltaSurfaceOMN = SOM.N - InitialSurfaceOMN;
			//AccumLeach = AccumLeach + Soil.SoilWater.LeachNH4 + Soil.SoilWater.LeachNO3 + Soil.SoilWater.LeachUrea; //Fails
			AccumLeach = AccumLeach + Soil.SoilWater.LeachNO3;
			AccumMineralisation += MathUtilities.Sum(Soil.SoilNitrogen.MineralisedN);
			AccumDenit -= MathUtilities.Sum(Soil.SoilNitrogen.Denitrification);
			AccumPlantN += (double)zone.Get("Kale.Root.NUptake");
			DeltaSoilOMN = OrganicN - InitialSoilOMN;
			DeltaSoilMineralN = MineralN - InitialMineralN;
			SoilNitrogenContent = MineralN;
	
			
			
			//!!!!!! Water balance components !!!!!!
			//!!!!!!^^^^^^^^^^^^^^^^^^^^^^^^^^!!!!!!

			AccumRainfall += Met.Rain;
			//AccumEP -= (double)zone.Get("[Kale].Stover.Transpiration");
			AccumEP -= (double)zone.Get("Kale.Root.WaterUptake");
			SoilWaterDeficit = (SWC - DUL);
			double OutFlowLat = MathUtilities.Sum(Soil.SoilWater.outflow_lat);
			AccumOutflowLat -= OutFlowLat;
		}
		
		[EventSubscribe("DoManagementCalculations")]
		private void OnDoManagementCalculations(object sender, EventArgs e)
		{
			FomN = MathUtilities.Sum(Soil.SoilNitrogen.FOMN);
			HumN = MathUtilities.Sum(Soil.SoilNitrogen.HumicN);
			BiomN = MathUtilities.Sum(Soil.SoilNitrogen.MicrobialN);
			AccumFert += Fert.NitrogenApplied;
			AccumIrrigation += Irrig.IrrigationApplied;
			
			
			AccumEO -= Soil.SoilWater.Eo;
			AccumES -= Soil.SoilWater.Es; 
			AccumDrainage += Soil.SoilWater.Drainage;
			AccumRunoff -= Soil.SoilWater.Runoff;
			SWC = MathUtilities.Sum(Soil.SoilWater.SWmm);
			DUL = MathUtilities.Sum(Soil.SoilWater.DULmm);
		}
		
		[EventSubscribe("PlantEnding")]
		private void OnPlantEnding(object sender, EventArgs e)
		{
			AccumFert = 0;
			AccumIrrigation = 0;
			
			
			AccumEO = 0;
			AccumES = 0;
			AccumDrainage = 0;
			AccumRunoff = 0;
			
			AccumLeach = 0;
			AccumMineralisation = 0;
			AccumDenit = 0;
			AccumPlantN = 0;
			
			AccumRainfall = 0;
			AccumEP = 0;
			AccumOutflowLat = 0;
			
		}
	}
}
```
      SoilArbitrator Soil Arbitrator
  Experiment Ashley_Dean_2013_
    Factors
      Factor Irrigation_: Specifications=[Irrigation_]
        Operations Full_
          2013-11-21  [Irrigation].Apply(15 );
          2013-11-25  [Irrigation].Apply(15 );
          2013-12-02  [Irrigation].Apply(15 );
          2013-12-05  [Irrigation].Apply(15.8 );
          2013-12-09  [Irrigation].Apply(10 );
          2013-12-12  [Irrigation].Apply(14 );
          2013-12-16  [Irrigation].Apply(20 );
          2013-12-23  [Irrigation].Apply(14.5 );
          2014-01-06  [Irrigation].Apply(29 );
          2014-01-09  [Irrigation].Apply(23 );
          2014-01-13  [Irrigation].Apply(21 );
          2014-01-16  [Irrigation].Apply(24 );
          2014-01-20  [Irrigation].Apply(28 );
          2014-01-23  [Irrigation].Apply(21 );
          2014-01-27  [Irrigation].Apply(10 );
          2014-01-30  [Irrigation].Apply(25 );
          2014-02-03  [Irrigation].Apply(19.0 );
          2014-02-06  [Irrigation].Apply(17 );
          2014-02-10  [Irrigation].Apply(21 );
          2014-02-13  [Irrigation].Apply(9 );
          2014-02-17  [Irrigation].Apply(19.5 );
          2014-02-20  [Irrigation].Apply(20 );
          2014-02-27  [Irrigation].Apply(20 );
        Operations Nil_
      Factor Fertiliser_: Specifications=[Fertiliser_]
        Operations 300
          2013-11-19  [Fertiliser].Apply( 217.4,Fertiliser.Types.UreaN,0)
          2013-12-16  [Fertiliser].Apply( 217.4,Fertiliser.Types.UreaN,0)
          2014-01-20  [Fertiliser].Apply( 217.4,Fertiliser.Types.UreaN,0)
        Operations 150
          2013-11-19  [Fertiliser].Apply( 108.7,Fertiliser.Types.UreaN,0)
          2013-12-16  [Fertiliser].Apply( 108.7,Fertiliser.Types.UreaN,0)
          2014-01-20  [Fertiliser].Apply( 108.7,Fertiliser.Types.UreaN,0)
        Operations 75
          2013-11-19  [Fertiliser].Apply( 54.35,Fertiliser.Types.UreaN,0)
          2013-12-16  [Fertiliser].Apply( 54.35,Fertiliser.Types.UreaN,0)
          2014-01-20  [Fertiliser].Apply( 54.35,Fertiliser.Types.UreaN,0)
        Operations 0
    Simulation AD_Base: Area=0; Slope=0
      Clock: StartDate=2013-09-01; EndDate=2014-06-30
      Summary summaryfile
      Weather: FileName=C:\apsim_dev\Data\MetFiles\lincoln.met
      Zone paddock: Area=1; Slope=0
        Soil AshleyDean: Latitude=0; Longitude=0; Area=0
          Analysis: Thickness=[100, 200, 300, 300, 300, 300]; PH=[6.6, 6.2, 5.7, 5.5, 5.5, 5.5]; PHUnits=Water; BoronUnits=HotWater
          InitialWater Initial water: PercentMethod=EvenlyDistributed; FractionFull=1; RelativeTo=KaleSoil
          Water: KS=[4832, 389, 16, 16, 98]
            Thickness  BD     AirDry  LL15  DUL   SAT
            100        1.17   0.05    0.06  0.3   0.42
            150        1.1    0.05    0.06  0.25  0.37
            300        0.7    0.05    0.06  0.15  0.22
            300        0.455  0.05    0.06  0.14  0.21
            300        0.25   0.05    0.06  0.13  0.2
            300        0.25   0.05    0.06  0.12  0.18
            SoilCrop KaleSoil: LL=[0.08, 0.07, 0.07, 0.09, 0.11, 0.11]; KL=[0.06, 0.06, 0.06, 0.06, 0.06, 0.06]; XF=[1, 1, 1, 1, 1, 1]
          SoilWater: same as Kale.Base.paddock.TempletonABlock.SoilWater
          SoilNitrogen: fom_type=[default, manure, mucuna, lablab, shemp, stable]; fract_carb=[0.2, 0.3, 0.54, 0.57, 0.45, 0]; fract_cell=[0.7, 0.3, 0.37, 0.37, 0.47, 0.1]; fract_lign=[0.1, 0.4, 0.09, 0.06, 0.08, 0.9]; wfpsN2N2O_x=[22, 88]; wfpsN2N2O_y=[0.1, 1]
          SoilOrganicMatter: same as Kale.Base.paddock.TempletonABlock.SoilOrganicMatter
          Sample: NO3Units=kgha; NH4Units=kgha; SWUnits=Volumetric; OCUnits=Total; PHUnits=Water
            Thickness  NO3  NH4
            150        78   0.1
            150        58   0.1
            300        5    0.1
            300        5    0.1
            300        5    0.1
            300        5    0.1
        Plant Kale
        MicroClimate: same as Kale.Base.paddock.MicroClimate
        Irrigation
        Fertiliser
        Operations SowDateCv
          2013-10-26  [Kale].Sow(population:75, cultivar:"Grunner", depth:9, rowSpacing:150);
          2014-07-02  [Kale].EndCrop
        SurfaceOrganicMatter surface organic matter: same as Kale.Base.paddock.surface organic matter
        Report Ashley_Dean_Report: EventNames=[Clock].DoReport
          VariableNames:
            [Clock].Today
            [Kale].Leaf.Fw
            [Kale].Leaf.Fn
            [Kale].Phenology.CurrentPhaseName
            [Kale].Phenology.Stage
            [Kale].Phenology.ThermalTime.Value
            [Kale].Phenology.AccumulatedThermalTime.Value
            [Kale].AboveGroundLive.Wt
            [Kale].Leaf.Live.Wt
            [Kale].Leaf.Dead.Wt
            [Kale].TotalDead.Wt
            [Kale].Total.Wt
            [Kale].Stem.Live.Wt
            [Kale].Leaf.LAI
            [Kale].Structure.LeafTipsAppeared
            [Kale].Leaf.PlantAppearedLeafNo
            [Kale].Leaf.PlantAppearedGreenLeafNo
            [Kale].Leaf.PlantsenescedLeafNo
            [Kale].Leaf.CoverGreen
            [Kale].Leaf.CohortParameters.MaxArea.Value
            [Phenology].Photoperiod.Value
            [Kale].AboveGround.Wt
            [Kale].Leaf.Photosynthesis.RadnInt.Value
            [Kale].Leaf.Photosynthesis.RUEact.Value
            [ExtraVariables].Script.AccumPlantN
            [Kale].Leaf.Live.N
            [Kale].Root.Live.N
            [Kale].Stem.Live.N
            [Kale].AboveGround.N
            [Kale].AboveGroundLive.N
            [Kale].Leaf.Live.NConc
            [Kale].Stem.Live.NConc
            [Kale].Root.Live.NConc
            [Kale].Leaf.Fn
            [Kale].WaterSupplyDemandRatio
            [Kale].Root.WaterUptake
            [Kale].Leaf.WaterDemand
            [Kale].Leaf.PotentialEP
            [Script].SoilWaterDeficit
            [Root].Depth
            [Root].PAWPC
        Operations Irrigation_: same as Ashley_Dean_2013_.Factors.Irrigation_.Full_
        Operations Fertiliser_
          2013-11-19  [Fertiliser].Apply( 217.4,Fertiliser.Types.UreaN,0)
          2013-12-16  [Fertiliser].Apply( 217.4,Fertiliser.Types.UreaN,0)
          2014-01-20  [Fertiliser].Apply( 217.4,Fertiliser.Types.UreaN,0)
        Manager ExtraVariables
```csharp
using System;
using Models.Core;
using System.Collections.Generic;
using System.Text;
using Models.Soils;
using Models.PMF;
using Models;
using System.Xml.Serialization;
using APSIM.Shared.Utilities;

namespace Models
{
	[Serializable] 
	public class Script : Model
	{
		[Link] Clock Clock;
		[Link] Soils.Soil Soil;
		[Link] Models.SurfaceOM.SurfaceOrganicMatter SOM;
		[Link] Weather Met;
		[Link] Fertiliser Fert;
		[Link] Irrigation Irrig;
		[Link] Plant Kale;
		[Link] Zone zone;
					
		[XmlIgnore] public bool InitialDay { get; set; }
		
		[XmlIgnore] public double AccumPlantN { get; set; }
		[XmlIgnore] public double AccumMineralisation { get; set; }
		[XmlIgnore] public double AccumDenit { get; set; }
		[XmlIgnore] public double AccumFert { get; set; }
		[XmlIgnore] public double AccumLeach { get; set; }
		[XmlIgnore] public double AccumDetach { get; set; }
		[XmlIgnore] public double DeltaSoilOMN { get; set; }
		[XmlIgnore] public double DeltaSurfaceOMN { get; set; }
		[XmlIgnore] public double DeltaSoilMineralN { get; set; }
		[XmlIgnore] public double SoilNitrogenContent { get; set; }
		
		
		
		[XmlIgnore] public double AccumEO { get; set; }
		[XmlIgnore] public double AccumEP { get; set; }
		[XmlIgnore] public double AccumES { get; set; }
		[XmlIgnore] public double AccumDrainage { get; set; }
		[XmlIgnore] public double AccumRunoff { get; set; }
		[XmlIgnore] public double AccumOutflowLat { get; set; }
		[XmlIgnore] public double AccumIrrigation { get; set; }
		[XmlIgnore] public double AccumRainfall { get; set; }
		[XmlIgnore] public double SoilWaterDeficit { get; set; }
	
		[XmlIgnore] public double  InitialSoilOMN { get; set; }
		[XmlIgnore] public double  InitialSurfaceOMN { get; set; }
		[XmlIgnore] public double  InitialMineralN { get; set; }
		
		
		[XmlIgnore] public double SWC { get; set; }
		[XmlIgnore] public double DUL { get; set; }
		[XmlIgnore] public double OutFlowLat { get; set; }

		[XmlIgnore] public double FomN { get; set; }
		[XmlIgnore] public double BiomN { get; set; }
		[XmlIgnore] public double HumN { get; set; }
		[XmlIgnore] public double OrganicN { get; set; }
		[XmlIgnore] public double NO3N { get; set; }
		[XmlIgnore] public double NH4N { get; set; }
		[XmlIgnore] public double UreaN { get; set; }
		[XmlIgnore] public double MineralN { get; set; }
		[XmlIgnore] public double DltNMinRes { get; set; }
		[XmlIgnore] public double DltNMinTot { get; set; }
		[XmlIgnore] public double ResidueWt{ get; set; }
		
		
		[EventSubscribe("Commencing")]
		private void OnSimulationCommencing(object sender, EventArgs e)
		{
			InitialDay = true;
		}
		
		[EventSubscribe("DoManagement")]
		private void OnDoManagement(object sender, EventArgs e)
		{
			//!!!!!! Nitrogen balance components !!!!!!
			FomN = MathUtilities.Sum(Soil.SoilNitrogen.FOMN);
			HumN = MathUtilities.Sum(Soil.SoilNitrogen.HumicN);
			BiomN = MathUtilities.Sum(Soil.SoilNitrogen.MicrobialN);
			OrganicN = FomN + HumN + BiomN;
			NO3N = MathUtilities.Sum(Soil.NO3N);
			NH4N = MathUtilities.Sum(Soil.NH4N);
			UreaN = MathUtilities.Sum(Soil.SoilNitrogen.urea);
			MineralN = NO3N + NH4N + UreaN; 
			DltNMinRes = MathUtilities.Sum(Soil.SoilNitrogen.dlt_n_min_res);
			DltNMinTot = MathUtilities.Sum(Soil.SoilNitrogen.MineralisedN);
		
			//Residue components//
			ResidueWt = SOM.Wt;
			//MathUtilities.Sum(SOM.dlt_SurfaceOM_wt);	Failed:)
			
			int layers = Soil.Thickness.Length;
			if (InitialDay == true)
			{
				InitialSurfaceOMN = SOM.N;
				InitialSoilOMN = OrganicN;
				InitialMineralN = MineralN;
				InitialDay = false;
			}
			DeltaSurfaceOMN = SOM.N - InitialSurfaceOMN;
			//AccumLeach = AccumLeach + Soil.SoilWater.LeachNH4 + Soil.SoilWater.LeachNO3 + Soil.SoilWater.LeachUrea; //Fails
			AccumLeach = AccumLeach + Soil.SoilWater.LeachNO3;
			AccumMineralisation += MathUtilities.Sum(Soil.SoilNitrogen.MineralisedN);
			AccumDenit -= MathUtilities.Sum(Soil.SoilNitrogen.Denitrification);
			AccumPlantN += (double)zone.Get("Kale.Root.NUptake");
			DeltaSoilOMN = OrganicN - InitialSoilOMN;
			DeltaSoilMineralN = MineralN - InitialMineralN;
			SoilNitrogenContent = MineralN;
	
			
			
			//!!!!!! Water balance components !!!!!!
			//!!!!!!^^^^^^^^^^^^^^^^^^^^^^^^^^!!!!!!

			AccumRainfall += Met.Rain;
			//AccumEP -= (double)zone.Get("[Kale].Stover.Transpiration");
			AccumEP -= (double)zone.Get("Kale.Root.WaterUptake");
			SoilWaterDeficit = (DUL - SWC);
			double OutFlowLat = MathUtilities.Sum(Soil.SoilWater.outflow_lat);
			AccumOutflowLat -= OutFlowLat;
		}
		
		[EventSubscribe("DoManagementCalculations")]
		private void OnDoManagementCalculations(object sender, EventArgs e)
		{
			FomN = MathUtilities.Sum(Soil.SoilNitrogen.FOMN);
			HumN = MathUtilities.Sum(Soil.SoilNitrogen.HumicN);
			BiomN = MathUtilities.Sum(Soil.SoilNitrogen.MicrobialN);
			AccumFert += Fert.NitrogenApplied;
			AccumIrrigation += Irrig.IrrigationApplied;
			
			
			AccumEO -= Soil.SoilWater.Eo;
			AccumES -= Soil.SoilWater.Es; 
			AccumDrainage += Soil.SoilWater.Drainage;
			AccumRunoff -= Soil.SoilWater.Runoff;
			SWC = MathUtilities.Sum(Soil.SoilWater.SWmm);
			DUL = MathUtilities.Sum(Soil.SoilWater.DULmm);
		}
		
		[EventSubscribe("PlantEnding")]
		private void OnPlantEnding(object sender, EventArgs e)
		{
			AccumFert = 0;
			AccumIrrigation = 0;
			
			
			AccumEO = 0;
			AccumES = 0;
			AccumDrainage = 0;
			AccumRunoff = 0;
			
			AccumLeach = 0;
			AccumMineralisation = 0;
			AccumDenit = 0;
			AccumPlantN = 0;
			
			AccumRainfall = 0;
			AccumEP = 0;
			AccumOutflowLat = 0;
			
		}
	}
}
```
      SoilArbitrator Soil Arbitrator
  Experiment Kale_Sown_9Nov05
    Factors
      Factor _Fert_: Specifications=[Irrigation_and_Fertiliser]
        Operations nil: same as Kale.Factors._Fert_.nil
        Operations 50
          2006-10-24  [Fertiliser].Apply(50, Fertiliser.Types.UreaN, 0);
          2006-11-30  [Fertiliser].Apply(0, Fertiliser.Types.UreaN, 0);
          2006-12-29  [Fertiliser].Apply(0, Fertiliser.Types.UreaN, 0);
          2006-10-18  [Irrigation].Apply(5);
          2006-11-05  [Irrigation].Apply(10);
          2006-11-24  [Irrigation].Apply(25);
          2006-12-19  [Irrigation].Apply(25);
          2007-01-15  [Irrigation].Apply(25);
          2007-02-02  [Irrigation].Apply(30);
          2007-02-19  [Irrigation].Apply(60);
          2007-03-13  [Irrigation].Apply(30);
          2007-04-05  [Irrigation].Apply(40);
        Operations 150
          2005-11-22  [Fertiliser].Apply(50, Fertiliser.Types.UreaN, 0);
          2005-12-29  [Fertiliser].Apply(100, Fertiliser.Types.UreaN, 0);
          2005-11-10  [Irrigation].Apply(5);
          2005-12-12  [Irrigation].Apply(25);
          2005-12-25  [Irrigation].Apply(15);
          2006-01-04  [Irrigation].Apply(25);
          2006-01-24  [Irrigation].Apply(40);
          2006-02-17  [Irrigation].Apply(30);
          2006-04-20  [Irrigation].Apply(70);
        Operations 250
          2005-11-22  [Fertiliser].Apply(50, Fertiliser.Types.UreaN, 0);
          2005-12-29  [Fertiliser].Apply(100, Fertiliser.Types.UreaN, 0);
          2006-02-08  [Fertiliser].Apply(100, Fertiliser.Types.UreaN, 0);
          2005-11-10  [Irrigation].Apply(5);
          2005-12-12  [Irrigation].Apply(25);
          2005-12-25  [Irrigation].Apply(15);
          2006-01-04  [Irrigation].Apply(25);
          2006-01-24  [Irrigation].Apply(40);
          2006-02-17  [Irrigation].Apply(30);
          2006-04-20  [Irrigation].Apply(70);
        Operations 500
          2005-11-22  [Fertiliser].Apply(100, Fertiliser.Types.UreaN, 0);
          2005-12-29  [Fertiliser].Apply(200, Fertiliser.Types.UreaN, 0);
          2006-02-08  [Fertiliser].Apply(200, Fertiliser.Types.UreaN, 0);
          2005-11-10  [Irrigation].Apply(5);
          2005-12-12  [Irrigation].Apply(25);
          2005-12-25  [Irrigation].Apply(15);
          2006-01-04  [Irrigation].Apply(25);
          2006-01-24  [Irrigation].Apply(40);
          2006-02-17  [Irrigation].Apply(30);
          2006-04-20  [Irrigation].Apply(70);
    Simulation Base_9Nov05: Area=0; Slope=0
      Clock: StartDate=2005-11-08; EndDate=2006-08-01
      Summary summaryfile
      Weather: FileName=C:\apsim_dev\Data\MetFiles\lincoln.met
      Zone paddock: Area=1; Slope=0
        Soil TempletonABlock: same as Kale.Base.paddock.TempletonABlock
        Plant Kale
        MicroClimate: same as Kale.Base.paddock.MicroClimate
        Irrigation
        Fertiliser
        Operations SowDateCv
          2005-11-09  [Kale].Sow(population:70, cultivar:"Grunner", depth:7, rowSpacing:150);
        SurfaceOrganicMatter surface organic matter: same as Kale.Base.paddock.surface organic matter
        Report Kale_05_Report: same as Kale.Base.paddock.Kale_Calib_Report
        Operations Irrigation_and_Fertiliser: same as Kale_Sown_9Nov05.Factors._Fert_.500
        Manager ExtraVariables: same as Kale.Base.paddock.ExtraVariables
      SoilArbitrator Soil Arbitrator
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