Simulations: Version=2
  Replacements
    Plant Onion: CropType=Onion
      Cultivar LongKeeper
      OrganArbitrator Arbitrator: NArbitrationOption=RelativeAllocation; DMArbitrationOption=RelativeAllocation
      Phenology
        PhotoperiodFunction Photoperiod: Twilight=-6
        AirTemperatureFunction ThermalTime
          XYPairs: X=[5, 27, 35, 40]; Y=[0, 26, 20, 0]
        GerminatingPhase Planted: Start=Sowing; End=Germination
        EmergingPhase Germinating: Start=Germination; End=PreEmerge; ShootLag=500; ShootRate=0.7
          VariableReference ThermalTime: VariableName=[Phenology].ThermalTime.Value
        GenericPhase Emerging: Start=PreEmerge; End=Established
          Constant Target: Value=200
          AirTemperatureFunction ThermalTime
            XYPairs: X=[0, 1.4, 15, 30]; Y=[0, 0, 13.6, 28.6]
        GenericPhase PreBulb: Start=Established; End=BulbStart
          Constant Target: Value=90
          MultiplyFunction ThermalTime
            SubtractFunction Ptime
              VariableReference Photo: VariableName=[Phenology].Photoperiod.Value
              Constant PB_bulb: Value=9
            AddFunction
              Constant One: Value=0
              AirTemperatureFunction ft
                XYPairs: X=[5, 27, 32, 40]; Y=[0, 1, 1.2, 1.75]
        GenericPhase Bulbing: Start=BulbStart; End=Topdown
          Constant Target: Value=500
          AirTemperatureFunction ThermalTime
            XYPairs: X=[0, 5, 50]; Y=[0, 0, 45]
        GenericPhase TopDown: Start=Topdown; End=Down
          Constant Target: Value=500
          AddFunction DVS
            Constant: Value=1
            DivideFunction
              VariableReference: VariableName=TopDownATT
              Constant: Value=1000
          AirTemperatureFunction ThermalTime
            XYPairs: X=[0, 5, 50]; Y=[0, 0, 45]
        EndPhase Maturity: Start=Down; End=Maturity
          Constant Target: Value=1000
          VariableReference ThermalTime: VariableName=[Phenology].AccumulatedThermalTime.Value
          AddFunction DVS: same as Replacements.Onion.Phenology.TopDown.DVS
        AccumulateFunction AccumulatedThermalTime: StartStageName=PreEmerge; EndStageName=Maturity
          VariableReference: VariableName=[Phenology].ThermalTime.Value
        AccumulateFunction PhotoThermal: StartStageName=PreEmerge; EndStageName=Maturity
          MultiplyFunction: same as Replacements.Onion.Phenology.PreBulb.ThermalTime
        AccumulateFunction TopDownATT: StartStageName=Topdown; EndStageName=Maturity
          AirTemperatureFunction
            XYPairs: X=[0, 5, 50]; Y=[0, 0, 45]
        AccumulateFunction BulbGrowthATT: StartStageName=BulbStart; EndStageName=Maturity
          AirTemperatureFunction
            XYPairs: X=[0, 5, 50]; Y=[0, 0, 45]
      SimpleLeaf Leaf: CohortsInitialised=false
        zero: BiomassYesterday, PlantAppearedLeafNo, Albedo, Gsmax, R50, LAI, Height, FRGR, PotentialEP, K, KDead, DeltaBiomass, LAIDead, WaterAllocation
        Biomass Live
        Biomass Dead
        PhaseLookup LAIFunction
          PhaseLookupValue UnderGround: Start=Sowing; End=Established
            Constant: Value=0
          PhaseLookupValue Emergence: Start=Established; End=BulbStart
            SubtractFunction LaiFunction
              AddFunction
                VariableReference PrevLAI: VariableName=[Leaf].LAI
                AddFunction NewGrowth
                  MultiplyFunction DL
                    VariableReference pop: VariableName=[Plant].Population
                    Constant Linit: Value=0.0005
                  MultiplyFunction NG
                    VariableReference Agrowth: VariableName=[Leaf].AS1.Value
                    VariableReference gprime: VariableName=[Leaf].TPrime.Value
                    MultiplyFunction growth
                      VariableReference PrevLAI: VariableName=[Leaf].LAI
                      SubtractFunction ng
                        Constant One: Value=1
                        DivideFunction pg
                          VariableReference PrevLAI: VariableName=[Leaf].LAI
                          MultiplyFunction Lmax
                            VariableReference pop: VariableName=[Plant].Population
                            VariableReference lpot: VariableName=[Leaf].Lpot.Value
              Constant Senesce: Value=0
          PhaseLookupValue BulbGrowth: Start=BulbStart; End=Topdown
            SubtractFunction LaiFunction
              AddFunction
                VariableReference PrevLAI: VariableName=[Leaf].LAI
                AddFunction NewGrowth
                  MultiplyFunction DL
                    VariableReference pop: VariableName=[Plant].Population
                    Constant Linit: Value=0.0005
                  MultiplyFunction NG
                    VariableReference Agrowth: VariableName=[Leaf].AS2.Value
                    VariableReference gprime: VariableName=[Leaf].TPrime.Value
                    MultiplyFunction growth
                      VariableReference PrevLAI: VariableName=[Leaf].LAI
                      SubtractFunction ng
                        Constant One: Value=1
                        DivideFunction pg
                          VariableReference PrevLAI: VariableName=[Leaf].LAI
                          MultiplyFunction Lmax
                            VariableReference pop: VariableName=[Plant].Population
                            VariableReference lpot: VariableName=[Leaf].Lpotx.Value
              Constant Senesce: Value=0
          PhaseLookupValue TDown: Start=Topdown; End=Maturity
            MultiplyFunction LaiFunction
              SubtractFunction LaiFunction
                AddFunction: same as Replacements.Onion.Leaf.LAIFunction.Emergence.LaiFunction.AddFunction
              SubtractFunction
                Constant One: Value=1
                DivideFunction
                  VariableReference: VariableName=[Phenology].TopDownATT.Value
                  VariableReference VariableReference1: VariableName=[Phenology].TopDown.Target.Value
        Constant NConc: Value=0.03
        PhaseLookup NitrogenDemandSwitch
          PhaseLookupValue PreEmergence: Start=Sowing; End=PreEmerge
            Constant Zero: Value=0
          PhaseLookupValue Emergence: Start=PreEmerge; End=BulbStart
            Constant One: Value=1
          PhaseLookupValue BulbGrowth: Start=BulbStart; End=Topdown
            Constant One: Value=1
          PhaseLookupValue TDown: Start=Topdown; End=Maturity
            Constant Zero: Value=0
        RUEModel Photosynthesis
          Constant RUE: Value=1.1
          RUECO2Function FCO2: PhotosyntheticPathway=C3
          LinearInterpolationFunction FVPD: XProperty=[Leaf].Photosynthesis.VPD
            XYPairs: X=[0, 100]; Y=[1, 1]
          LinearInterpolationFunction FN: XProperty=[Leaf].Fn
            XYPairs: X=[5, 40]; Y=[1, 1]
          LinearInterpolationFunction FW: XProperty=[Leaf].Fw
            XYPairs: X=[5, 40]; Y=[1, 1]
          WeightedTemperatureFunction FT: MaximumTemperatureWeighting=1
            XYPairs: X=[0, 40]; Y=[1, 1]
        Constant DMSinkCapacity: Value=0
        MultiplyFunction ExtinctionCoefficientFunction
          Constant Potential: Value=0.41
          Constant One: Value=1
        PartitionFractionDemandFunction DMDemandFunction
          PhaseLookup PartitionFraction
            PhaseLookupValue PreEmergence: Start=Sowing; End=PreEmerge
              Constant Zero: Value=0
            PhaseLookupValue Emergence: Start=PreEmerge; End=BulbStart
              Constant Zero: Value=0.9
            PhaseLookupValue BulbGrowth: Start=BulbStart; End=Topdown
              MaximumFunction
                Constant Zero: Value=0
                SubtractFunction
                  Constant: Value=0.9
                  VariableReference: VariableName=[Bulb].DMDemandFunction.PartitionFraction.BulbGrowth.Value
            PhaseLookupValue TDown: Start=Topdown; End=Maturity
              Constant nearall: Value=0.1
        Constant Lpot: Value=0.05
        Constant Lpotx: Value=9
        Constant AS1: Value=0.319
        Constant AS2: Value=0.0107
        SubtractFunction TPrime
          MultiplyFunction pg
            AddFunction
              Constant one: Value=1
              VariableReference G: VariableName=[Leaf].gamma.Value
            PowerFunction: Exponent=0.96
              VariableReference TT: VariableName=[Leaf].TX.Value
          MultiplyFunction gp
            VariableReference G: VariableName=[Leaf].gamma.Value
            PowerFunction: Exponent=1.96
              VariableReference TT: VariableName=[Leaf].TX.Value
        Constant gamma: Value=0.96
        AirTemperatureFunction FRGRFunction
          XYPairs: X=[0, 10, 25, 35]; Y=[0, 1, 1, 0]
        Constant MaximumNConc: Value=0.04
        Constant MinimumNConc: Value=0.03
        MaximumFunction RadnInt
          Constant: Value=0
          MultiplyFunction
            ExponentialFunction RadnIntDir: A=1; B=-1; C=-0.41
              VariableReference: VariableName=[Leaf].LAI
            VariableReference DailyRad: VariableName=[Weather].Radn
        AirTemperatureFunction TX
          XYPairs: X=[5, 27, 35, 40]; Y=[0, 1, 1.4, 1.8]
        AddFunction RadnInt2
          MultiplyFunction RadnInt
            ExponentialFunction RadnIntDir: A=1; B=-1; C=-0.41
              VariableReference: VariableName=[Leaf].LAI
            ExponentialFunction RadnIntDir1: A=1; B=-1; C=-0.33
              VariableReference: VariableName=[Leaf].LAI
      Structure: InitialiseStage=PreEmerge; PrimaryBudNo=1
        VariableReference ThermalTime: VariableName=[Phenology].ThermalTime.Value
        PhaseLookupValue MainStemPrimordiaInitiationRate: Start=PreEmerge; End=Maturity
          DivideFunction NodeInitiationRateFunction
            VariableReference Phyllochron: VariableName=[Structure].MainStemNodeAppearanceRate.Value
            Constant PrimordiaPerMainstemNode: Value=1
        PhaseLookupValue MainStemNodeAppearanceRate: Start=PreEmerge; End=Maturity
          Constant: Value=50
        Constant MainStemFinalNodeNumber: Value=80
        Constant DroughtInducedBranchMortality: Value=0
        Constant BranchingRate: Value=0
        Constant ShadeInducedBranchMortality: Value=0
        Constant Density: Value=30
        Constant DensityPot: Value=60
        Constant PlantMortality: Value=0
        LinearInterpolationFunction HeightModel: XProperty=[Structure].MainStemNodeNo
          XYPairs: X=[0, 40]; Y=[20, 2500]
        Constant BranchMortality: Value=0
      Root: InitialDM=0.01; SpecificRootLength=40000; NuptakeSupply=0
        Constant KLModifier: Value=1
        Constant SoilWaterEffect: Value=1
        Constant PartitionFraction: Value=0.05
        AirTemperatureFunction TemperatureEffect
          XYPairs: X=[0, 25, 35]; Y=[1, 1, 1]
        Constant MaximumNConc: Value=0.01
        Constant MinimumNConc: Value=0.03
        PhaseBasedSwitch NitrogenDemandSwitch: Start=PreEmerge; End=Maturity
        CompositeBiomass Live: Propertys=[[Root].LayerLive]
        CompositeBiomass Dead: Propertys=[[Root].LayerDead]
        Constant MaxDailyNUptake: Value=7.5
        Constant StructuralFraction: Value=0.8
        PhaseLookup SenescenceRate
          PhaseLookupValue PreEmergence: Start=Sowing; End=PreEmerge
            Constant Zero: Value=0
          PhaseLookupValue Emergence: Start=PreEmerge; End=BulbStart
            Constant C: Value=0
          PhaseLookupValue BulbGrowth: Start=BulbStart; End=Topdown
            Constant C: Value=0
          PhaseLookupValue TDown: Start=Topdown; End=Maturity
            Constant C: Value=0.05
        LinearInterpolationFunction KNO3: XProperty=[Root].RootLengthDensity
          XYPairs: X=[0, 0.003]; Y=[0.02, 0.02]
        LinearInterpolationFunction KNH4: XProperty=[Root].RootLengthDenisty
          XYPairs: X=[0, 0.03]; Y=[0, 0]
        LinearInterpolationFunction NUptakeSWFactor: XProperty=[Root].RWC
          XYPairs: X=[0, 1]; Y=[0, 1]
        Constant RootFrontVelocity: Value=10
      GenericAboveGroundOrgan Bulb
        Constant StructuralFraction: Value=0.95
        Constant MaximumNConc: Value=0.04
        Constant MinimumNConc: Value=0.01
        PhaseBasedSwitch NitrogenDemandSwitch: Start=Germination; End=Maturity
        Constant NRetranslocationFactor: Value=0.05
        Constant DMRetranslocationFactor: Value=0.05
        Biomass Live
        Biomass Dead
        Constant DMSinkCapacity: Value=1
        PartitionFractionDemandFunction DMDemandFunction
          PhaseLookup PartitionFraction
            PhaseLookupValue PreEmergence: Start=Sowing; End=PreEmerge
              Constant Zero: Value=0
            PhaseLookupValue Emergence: Start=PreEmerge; End=BulbStart
              Constant C: Value=0
            PhaseLookupValue BulbGrowth: Start=BulbStart; End=Topdown
              SubtractFunction BP
                Constant C: Value=0.9
                SubtractFunction LP
                  Constant: Value=0.38
                  MultiplyFunction
                    Constant: Value=0.0006
                    VariableReference: VariableName=[Phenology].BulbGrowthATT.Value
            PhaseLookupValue TDown: Start=Topdown; End=Maturity
              SubtractFunction
                Constant C: Value=0.9
                VariableReference LBG: VariableName=[Leaf].DMDemandFunction.PartitionFraction.TDown.Value
      CompositeBiomass AboveGround: Propertys=[[Leaf].Live, [Leaf].Dead, [Bulb].Live, [Bulb].Dead]
      CompositeBiomass BelowGround: Propertys=[[Root].Live, [Root].Dead]
      CompositeBiomass Total
        Propertys=[[Leaf].Live, [Leaf].Dead, [Bulb].Live, [Bulb].Dead, [Root].Live, [Root].Dead]
      CompositeBiomass TotalLive: Propertys=[[Leaf].Live, [Bulb].Live, [Root].Live]
      CompositeBiomass TotalDead: Propertys=[[Leaf].Dead, [Bulb].Dead, [Root].Dead]
  DataStore
    Input SD1_observed: FileName=Observations\SD1 expt data OnionFT.txt
  Experiment SD1
    Factors
      Factor _SowRate_: Specifications=[SowRate]
        Factor 15: Specifications=[SowRate]
          Operations SowRate
            2000-08-17  [Onion].Sow(population:15, cultivar:"LongKeeper", depth:10, rowSpacing:700);
        Factor 30: Specifications=[SowRate]
          Operations SowRate
            2000-08-17  [Onion].Sow(population:30, cultivar:"LongKeeper", depth:10, rowSpacing:700);
    Simulation SDBase: Area=0; Slope=0
      Clock: StartDate=2000-08-01; EndDate=2001-02-28
      Summary summaryfile
      Weather: FileName=C:\apsim_dev\Data\MetFiles\LawnRoad.met
      Zone paddock: Area=1; Slope=0
        Soil TempletonABlock: Latitude=0; Longitude=0
          Analysis: Thickness=[100, 200, 300, 300, 300, 300]; PH=[6.6, 6.2, 5.7, 5.5, 5.5, 5.5]; PHUnits=Water; BoronUnits=HotWater
          InitialWater Initial water: PercentMethod=EvenlyDistributed; FractionFull=1
          Water: KS=[4832, 389, 16, 16, 98]
            Thickness  BD    AirDry  LL15  DUL   SAT
            100        1     0.05    0.1   0.27  0.42
            200        1     0.05    0.1   0.27  0.4
            300        1.59  0.16    0.16  0.29  0.36
            300        1.57  0.17    0.17  0.3   0.37
            300        1.6   0.17    0.17  0.3   0.37
            300        1.6   0.12    0.12  0.3   0.32
            SoilCrop OnionSoil: LL=[0.13, 0.13, 0.1, 0.08, 0.11, 0.11]; KL=[0.06, 0.06, 0.06, 0.06, 0.06, 0.06]; XF=[1, 1, 1, 1, 1, 1]
          SoilWater: residueinterception=0; SummerDate=1-Nov; SummerU=9; SummerCona=4.4; WinterDate=1-Apr; WinterU=9; WinterCona=4.4; DiffusConst=88; DiffusSlope=35.4; Salb=0.18; CN2Bare=68; CNRed=20; CNCov=0.8; max_pond=0; Thickness=[100, 200, 300, 300, 300, 300]; SWCON=[0.55, 0.55, 0.55, 0.55, 0.55, 0.55]
          SoilNitrogen: fom_type=[default, manure, mucuna, lablab, shemp, stable]; fract_carb=[0.2, 0.3, 0.54, 0.57, 0.45, 0]; fract_cell=[0.7, 0.3, 0.37, 0.37, 0.47, 0.1]; fract_lign=[0.1, 0.4, 0.09, 0.06, 0.08, 0.9]; wfpsN2N2O_x=[22, 88]; wfpsN2N2O_y=[0.1, 1]
          SoilOrganicMatter: RootCN=30; RootWt=3000; SoilCN=11.5; EnrACoeff=7.4; EnrBCoeff=0.2; OCUnits=Total
            Thickness  OC    FBiom  FInert
            100        1.82  0.025  0.3
            200        1.47  0.025  0.4
            300        1.2   0.015  0.75
            300        1.03  0.01   0.9
            300        0.47  0.01   0.96
            300        0.47  0.01   0.96
          Sample: NO3Units=kgha; NH4Units=ppm; SWUnits=Volumetric; OCUnits=Total; PHUnits=Water
            Thickness  NO3  NH4
            100        217  0
            200        30   0
            300        5    0
            300        5    0
            300        0    0
            300        0    0
        Plant Onion: CropType=Onion
        MicroClimate: a_interception=0; b_interception=1; c_interception=0; d_interception=0; soil_albedo=0.23; air_pressure=1010; soil_emissivity=0.96; sun_angle=15; soil_heat_flux_fraction=0.4; night_interception_fraction=0.5; windspeed_default=3; refheight=2; albedo=0.26; emissivity=0.96; gsmax=0.01; r50=200
        Irrigation
        Fertiliser
        Operations SowRate
          2000-08-17  [Onion].Sow(population:60, cultivar:"LongKeeper", depth:10, rowSpacing:700);
        SurfaceOrganicMatter surface organic matter: PoolName=wheat; type=wheat; mass=0; standing_fraction=0; cnr=80; CriticalResidueWeight=2000; OptimumDecompTemp=20; MaxCumulativeEOS=20; CNRatioDecompCoeff=0.277; CNRatioDecompThreshold=25; TotalLeachRain=25; MinRainToLeach=10; CriticalMinimumOrganicC=0.004; DefaultCPRatio=0; DefaultStandingFraction=0; StandingExtinctCoeff=0.5; FractionFaecesAdded=0.5
          Pools:
            {PoolName=wheat, ResidueType=wheat, Mass=0, CNRatio=80, StandingFraction=0}
          ResidueTypes ResidueTypesList: LoadFromResource=ResidueTypes
        Operations Irrigation_and_Fertiliser
          2000-08-16  [Fertiliser].Apply(250, Fertiliser.Types.UreaN, 0);
        Manager ExtraVariables
```csharp
using System;
using Models.Core;
using System.Collections.Generic;
using System.Text;
using Models.Soils;
using Models.PMF;
using Models;
using System.Xml.Serialization;
using APSIM.Shared.Utilities;

namespace Models
{
	[Serializable] 
	public class Script : Model
	{
		[Link] Clock Clock;
		[Link] Soils.Soil Soil;
		[Link] Models.SurfaceOM.SurfaceOrganicMatter SOM;
		[Link] Weather Met;
		[Link] Fertiliser Fert;
		[Link] Irrigation Irrig;
		[Link] Plant Onion;
		[Link] Zone zone;
					
		[XmlIgnore] public bool InitialDay { get; set; }
		
		[XmlIgnore] public double AccumPlantN { get; set; }
		[XmlIgnore] public double AccumMineralisation { get; set; }
		[XmlIgnore] public double AccumDenit { get; set; }
		[XmlIgnore] public double AccumFert { get; set; }
		[XmlIgnore] public double AccumLeach { get; set; }
		[XmlIgnore] public double AccumDetach { get; set; }
		[XmlIgnore] public double DeltaSoilOMN { get; set; }
		[XmlIgnore] public double DeltaSurfaceOMN { get; set; }
		[XmlIgnore] public double DeltaSoilMineralN { get; set; }
		[XmlIgnore] public double SoilNitrogenContent { get; set; }
		
		
		
		[XmlIgnore] public double AccumEO { get; set; }
		[XmlIgnore] public double AccumEP { get; set; }
		[XmlIgnore] public double AccumES { get; set; }
		[XmlIgnore] public double AccumDrainage { get; set; }
		[XmlIgnore] public double AccumRunoff { get; set; }
		[XmlIgnore] public double AccumOutflowLat { get; set; }
		[XmlIgnore] public double AccumIrrigation { get; set; }
		[XmlIgnore] public double AccumRainfall { get; set; }
		[XmlIgnore] public double SoilWaterDeficit { get; set; }
	
		[XmlIgnore] public double  InitialSoilOMN { get; set; }
		[XmlIgnore] public double  InitialSurfaceOMN { get; set; }
		[XmlIgnore] public double  InitialMineralN { get; set; }
		
		
		[XmlIgnore] public double SWC { get; set; }
		[XmlIgnore] public double DUL { get; set; }
		[XmlIgnore] public double OutFlowLat { get; set; }

		[XmlIgnore] public double FomN { get; set; }
		[XmlIgnore] public double BiomN { get; set; }
		[XmlIgnore] public double HumN { get; set; }
		[XmlIgnore] public double OrganicN { get; set; }
		[XmlIgnore] public double NO3N { get; set; }
		[XmlIgnore] public double NH4N { get; set; }
		[XmlIgnore] public double UreaN { get; set; }
		[XmlIgnore] public double MineralN { get; set; }
		[XmlIgnore] public double DltNMinRes { get; set; }
		[XmlIgnore] public double DltNMinTot { get; set; }
		[XmlIgnore] public double ResidueWt{ get; set; }
		
		
		[EventSubscribe("Commencing")]
		private void OnSimulationCommencing(object sender, EventArgs e)
		{
			InitialDay = true;
		}
		
		[EventSubscribe("DoManagement")]
		private void OnDoManagement(object sender, EventArgs e)
		{
			//!!!!!! Nitrogen balance components !!!!!!
			FomN = MathUtilities.Sum(Soil.SoilNitrogen.FOMN);
			HumN = MathUtilities.Sum(Soil.SoilNitrogen.HumicN);
			BiomN = MathUtilities.Sum(Soil.SoilNitrogen.MicrobialN);
			OrganicN = FomN + HumN + BiomN;
			NO3N = MathUtilities.Sum(Soil.NO3N);
			NH4N = MathUtilities.Sum(Soil.NH4N);
			UreaN = MathUtilities.Sum(Soil.SoilNitrogen.urea);
			MineralN = NO3N + NH4N + UreaN; 
			DltNMinRes = MathUtilities.Sum(Soil.SoilNitrogen.dlt_n_min_res);
			DltNMinTot = MathUtilities.Sum(Soil.SoilNitrogen.MineralisedN);
		
			//Residue components//
			ResidueWt = SOM.Wt;
			//MathUtilities.Sum(SOM.dlt_SurfaceOM_wt);	Failed:)
			
			int layers = Soil.Thickness.Length;
			if (InitialDay == true)
			{
				InitialSurfaceOMN = SOM.N;
				InitialSoilOMN = OrganicN;
				InitialMineralN = MineralN;
				InitialDay = false;
			}
			DeltaSurfaceOMN = SOM.N - InitialSurfaceOMN;
			//AccumLeach = AccumLeach + Soil.SoilWater.LeachNH4 + Soil.SoilWater.LeachNO3 + Soil.SoilWater.LeachUrea; //Fails
			AccumLeach = AccumLeach + Soil.SoilWater.LeachNO3;
			AccumMineralisation += MathUtilities.Sum(Soil.SoilNitrogen.MineralisedN);
			AccumDenit -= MathUtilities.Sum(Soil.SoilNitrogen.Denitrification);
			AccumPlantN += (double)zone.Get("Onion.Root.NUptake");
			DeltaSoilOMN = OrganicN - InitialSoilOMN;
			DeltaSoilMineralN = MineralN - InitialMineralN;
			SoilNitrogenContent = MineralN;
	
			
			
			//!!!!!! Water balance components !!!!!!
			//!!!!!!^^^^^^^^^^^^^^^^^^^^^^^^^^!!!!!!

			AccumRainfall += Met.Rain;
			//AccumEP -= (double)zone.Get("[Onion].Stover.Transpiration");
			AccumEP -= (double)zone.Get("Onion.Root.WaterUptake");
			SoilWaterDeficit = (SWC - DUL);
			double OutFlowLat = MathUtilities.Sum(Soil.SoilWater.outflow_lat);
			AccumOutflowLat -= OutFlowLat;
		}
		
		[EventSubscribe("DoManagementCalculations")]
		private void OnDoManagementCalculations(object sender, EventArgs e)
		{
			FomN = MathUtilities.Sum(Soil.SoilNitrogen.FOMN);
			HumN = MathUtilities.Sum(Soil.SoilNitrogen.HumicN);
			BiomN = MathUtilities.Sum(Soil.SoilNitrogen.MicrobialN);
			AccumFert += Fert.NitrogenApplied;
			AccumIrrigation += Irrig.IrrigationApplied;
			
			
			AccumEO -= Soil.SoilWater.Eo;
			AccumES -= Soil.SoilWater.Es; 
			AccumDrainage += Soil.SoilWater.Drainage;
			AccumRunoff -= Soil.SoilWater.Runoff;
			SWC = MathUtilities.Sum(Soil.SoilWater.SWmm);
			DUL = MathUtilities.Sum(Soil.SoilWater.DULmm);
		}
		
		[EventSubscribe("PlantEnding")]
		private void OnPlantEnding(object sender, EventArgs e)
		{
			AccumFert = 0;
			AccumIrrigation = 0;
			
			
			AccumEO = 0;
			AccumES = 0;
			AccumDrainage = 0;
			AccumRunoff = 0;
			
			AccumLeach = 0;
			AccumMineralisation = 0;
			AccumDenit = 0;
			AccumPlantN = 0;
			
			AccumRainfall = 0;
			AccumEP = 0;
			AccumOutflowLat = 0;
			
		}
	}
}
```
      SoilArbitrator Soil Arbitrator
      Report: EventNames=[Clock].DoReport
        VariableNames:
          [Clock].Today
          [Phenology].Photoperiod.Value
          [Phenology].AccumulatedThermalTime.Value
          [Phenology].TopDownATT.Value
          [Phenology].TopDown.ThermalTime.Value
          [Phenology].Bulbing.ThermalTime.Value
          [Phenology].PreBulb.ThermalTime.Value
          [Phenology].Emerging.ThermalTime.Value
          [Leaf].DMDemandFunction.PartitionFraction.Value
          [Bulb].DMDemandFunction.PartitionFraction.Value
          [Onion].Leaf.Fw
          [Onion].Leaf.Fn
          [Onion].Leaf.PhotoSynthesis.Value
          [Onion].Leaf.RadnInt.Value
          [Weather].Radn
          [Onion].Phenology.CurrentPhaseName
          [Onion].Phenology.Stage
          [Onion].Phenology.ThermalTime.Value
          [Onion].Phenology.Photoperiod.Value
          [Onion].Phenology.AccumulatedThermalTime.Value
          [Onion].Phenology.PhotoThermal.Value
          [Onion].Phenology.TopDownATT.Value
          [Onion].Leaf.Live.Wt
          [Onion].Root.Live.Wt
          [Onion].Total.Wt
          [Onion].Bulb.Live.Wt
          [Onion].Leaf.LAI
          [Onion].Structure.MainStemNodeNo
          [Onion].Leaf.PlantAppearedLeafNo
          [Onion].Leaf.PlantAppearedGreenLeafNo
          [Onion].Leaf.PlantsenescedLeafNo
          [Onion].Leaf.CoverGreen
          [Onion].Leaf.N
          [Onion].Bulb.N
          [Onion].Root.NUptake
          [Onion].Leaf.CohortParameters.MaxArea.Value
          [Onion].AboveGround.Wt
          [Onion].Leaf.Photosynthesis.RadnInt.Value
          [Onion].Leaf.Photosynthesis.RUEact.Value
          [ExtraVariables].Script.AccumPlantN
          [Onion].Leaf.Live.N
          [Onion].Root.Live.N
          [Onion].Bulb.Live.N
          [Onion].Leaf.Live.NConc
          [Onion].Root.Live.NConc
  Experiment NResponse
    Factors
      Factor _SowRate_: same as SD1.Factors._SowRate_
      Factor _Fertiliser_: Specifications=[Irrigation_and_Fertiliser]
        Factor N0: Specifications=[Irrigation_and_Fertiliser]
          Operations Irrigation_and_Fertiliser
            2000-08-16  [Fertiliser].Apply(0, Fertiliser.Types.UreaN, 0);
        Factor N250: Specifications=[Irrigation_and_Fertiliser]
          Operations Irrigation_and_Fertiliser
            2000-08-16  [Fertiliser].Apply(250, Fertiliser.Types.UreaN, 0);
    Simulation NRBase: same as SD1.SDBase
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