Simulations: Version=216
  DataStore
  Simulation
    Zone Field: Area=1; Slope=0; AspectAngle=0; Altitude=50
      Soil Oropi_1a1: SoilType=Buried-allophanic Orthic Pumice Soils; LocalName=Oropi_1a1; Latitude=-41; Longitude=174
        DataSource=Profile descriptions provided by Smap based on the work done by Trevor Webb.
        Physical
          Thickness  ParticleSizeSand  ParticleSizeSilt  ParticleSizeClay  Rocks  BD     AirDry  LL15   DUL    SAT    KS
          180        57.5              34                8.5               0      0.894  0.082   0.165  0.395  0.591  1920
          180        64                29.5              6.5               0      1.043  0.074   0.111  0.299  0.534  1200
          475        56.5              32                11.5              0      0.96   0.16    0.16   0.361  0.566  1920
          388.3      54.5              35                10.5              0      0.984  0.162   0.162  0.392  0.557  1440
          388.3      54.5              35                10.5              0      0.984  0.162   0.162  0.392  0.557  1440
          388.3      54.5              35                10.5              0      0.984  0.162   0.162  0.392  0.557  1440
          Rocks source: Calculated
          SoilCrop BarleySoil: LL=[0.165, 0.111, 0.16, 0.162, 0.162, 0.162]; KL=[0.116008, 0.076575, 0.0419573, 0.0132817, 0.00542116, 0]; XF=[1, 1, 1, 1, 1, 1]
          SoilCrop CanolaSoil: LL=[0.165, 0.111, 0.16, 0.162, 0.162, 0.162]; KL=[0.112966, 0.0675453, 0.0309148, 0.00771988, 0.00221652, 0]; XF=[1, 0.49, 1, 1, 1, 1]
          SoilCrop ChickpeaSoil: LL=[0.165, 0.111, 0.16, 0.162, 0.162, 0.162]; KL=[0.120171, 0.0555614, 0.0159278, 0.00246678, 0, 0]; XF=[1, 1, 1, 1, 1, 1]
          SoilCrop ChicorySoil
            LL=[0.165, 0.111, 0.16, 0.162, 0.162, 0.162]
            KL=[0.0865711, 0.0684555, 0.0520998, 0.0254315, 0.0153254, 0.00923529]
            XF=[1, 1, 1, 1, 1, 1]
          SoilCrop FababeanSoil: LL=[0.165, 0.111, 0.16, 0.162, 0.162, 0.162]; KL=[0.142993, 0.0581368, 0.0131899, 0, 0, 0]; XF=[1, 0.49, 1, 0, 0, 0]
          SoilCrop FieldpeaSoil: LL=[0.165, 0.111, 0.16, 0.162, 0.162, 0.162]; KL=[0.142993, 0.0581368, 0.0131899, 0, 0, 0]; XF=[1, 0.25, 1, 0, 0, 0]
          SoilCrop FodderBeetSoil
            LL=[0.165, 0.111, 0.16, 0.162, 0.162, 0.162]
            KL=[0.0934558, 0.0652019, 0.0395134, 0.0142847, 0.00657049, 0.00222808]
            XF=[1, 0.64, 1, 1, 1, 1]
          SoilCrop GrapevineSoil
            LL=[0.165, 0.111, 0.16, 0.162, 0.162, 0.162]
            KL=[0.0682019, 0.0566145, 0.0470694, 0.0258145, 0.0172748, 0.0115601]
            XF=[1, 0.479, 1, 1, 1, 1]
          SoilCrop ItalianRyegrassSoil: LL=[0.165, 0.111, 0.16, 0.162, 0.162, 0.162]; KL=[0.174131, 0.0591342, 0.00966934, 0, 0, 0]; XF=[1, 0.49, 1, 0, 0, 0]
          SoilCrop KaleSoil: LL=[0.165, 0.111, 0.16, 0.162, 0.162, 0.162]; KL=[0.10634, 0.0701938, 0.0384609, 0.0121749, 0.0049694, 0]; XF=[1, 0.64, 1, 1, 1, 1]
          SoilCrop LucerneSoil
            LL=[0.165, 0.111, 0.16, 0.162, 0.162, 0.162]
            KL=[0.0860551, 0.0687164, 0.0532375, 0.0266037, 0.0163737, 0.0100775]
            XF=[1, 1, 1, 1, 1, 1]
          SoilCrop MaizeSoil
            LL=[0.165, 0.111, 0.16, 0.162, 0.162, 0.162]
            KL=[0.102801, 0.0717221, 0.0434647, 0.0157132, 0.00722754, 0.00245089]
            XF=[1, 0.64, 1, 1, 1, 1]
          SoilCrop OatsSoil: LL=[0.165, 0.111, 0.16, 0.162, 0.162, 0.162]; KL=[0.10634, 0.0701938, 0.0384609, 0.0121749, 0.0049694, 0]; XF=[1, 0.79, 1, 1, 1, 1]
          SoilCrop PlantainForageSoil: LL=[0.165, 0.111, 0.16, 0.162, 0.162, 0.162]; KL=[0.10634, 0.0701938, 0.0384609, 0.0121749, 0.0049694, 0]; XF=[1, 1, 1, 1, 1, 1]
          SoilCrop PotatoSoil: LL=[0.165, 0.111, 0.16, 0.162, 0.162, 0.162]; KL=[0.114442, 0.0428735, 0.00838161, 0, 0, 0]; XF=[1, 0.25, 1, 0, 0, 0]
          SoilCrop RedCloverSoil
            LL=[0.165, 0.111, 0.16, 0.162, 0.162, 0.162]
            KL=[0.0900911, 0.0667411, 0.0451116, 0.0188323, 0.0098592, 0.00516156]
            XF=[1, 1, 1, 1, 1, 1]
          SoilCrop AGPRyegrassSoil: LL=[0.165, 0.111, 0.16, 0.162, 0.162, 0.162]; KL=[0.114412, 0.0556905, 0.0175308, 0.00290567, 0, 0]; XF=[1, 0.49, 1, 1, 1, 1]
          SoilCrop SoybeanSoil: LL=[0.165, 0.111, 0.16, 0.162, 0.162, 0.162]; KL=[0.108219, 0.0593917, 0.0232578, 0.00472872, 0, 0]; XF=[1, 0.49, 1, 1, 1, 1]
          SoilCrop TriticaleSoil: same as Simulation.Field.Oropi_1a1.Physical.OatsSoil
          SoilCrop WheatSoil: LL=[0.165, 0.111, 0.16, 0.162, 0.162, 0.162]; KL=[0.113923, 0.0774637, 0.0447985, 0.0152268, 0.00662591, 0]; XF=[1, 0.64, 1, 1, 1, 1]
          SoilCrop WhitecloverSoil: LL=[0.165, 0.111, 0.16, 0.162, 0.162, 0.162]; KL=[0.123076, 0.0370696, 0.00487254, 0, 0, 0]; XF=[1, 0.298, 1, 0, 0, 0]
          SoilCrop AgPRyegrassSoil: LL=[0.165, 0.111, 0.16, 0.162, 0.162, 0.162]; KL=[0.104878, 0.0510496, 0.0160699, 0.00266353, 0, 0]; XF=[1, 0.49, 1, 1, 1, 1]
          SoilCrop AgPWhiteCloverSoil: LL=[0.165, 0.111, 0.16, 0.162, 0.162, 0.162]; KL=[0.137977, 0.0294952, 0.00795501, 0, 0, 0]; XF=[1, 0.391, 1, 0, 0, 0]
          SoilCrop AgPPaspalumSoil: LL=[0.165, 0.111, 0.16, 0.162, 0.162, 0.162]; KL=[0.089025, 0.0532305, 0.024363, 0.00608381, 0, 0]; XF=[1, 0.766, 1, 1, 1, 1]
          SoilCrop SCRUMSoil
            LL=[0.165, 0.111, 0.16, 0.162, 0.162, 0.162]
            KL=[0.0775685, 0.0775685, 0.0775685, 0.0775685, 0.0775685, 0.0775685]
            XF=[1, 0.79, 1, 1, 1, 1]
        WaterBalance SoilWater: SummerDate=1-oct; SummerU=9; SummerCona=4.4; WinterDate=1-apr; WinterU=4; WinterCona=2; DiffusConst=88; DiffusSlope=35; Salb=0.13; CN2Bare=77; CNRed=37; CNCov=0.8; DischargeWidth=0; CatchmentArea=0; PSIDul=-100
          Thickness  SWCON  KLAT
          180        0.4    0
          180        0.5    0
          475        0.3    0
          1165       0.4    0
        Organic: FOMCNRatio=40; CarbonUnits=Total
          Thickness  Carbon    SoilCNRatio  FBiom      FInert    FOM
          50         6         11           0.0788566  0.431898  124.07
          50         6         11           0.0610103  0.491926  115.105
          50         6         11           0.0477893  0.542739  106.788
          50         4.94864   11           0.037995   0.5956    99.0722
          50         3.38311   11           0.0307392  0.650815  91.9135
          50         2.3337    11           0.025364   0.69947   85.2722
          50         1.63026   11           0.0213819  0.742644  79.1107
          50         1.15873   11           0.0184319  0.781204  73.3945
          50         0.842658  11           0.0162465  0.815767  68.0912
          50         0.630787  11           0.0146275  0.846679  63.1712
          250        0.32975   11           0.0118814  0.917701  43.4169
          250        0.21756   11           0.0104198  0.97694   29.84
          500        0.200874  11           0.0100442  0.990833  14.0954
          500        0.200016  11           0.0100022  0.996255  6.6582
        Chemical: PHUnits=Water
          Thickness  PH  CEC
          180        7   19.2277
          180        7   11.9974
          475        7   7.90261
          1165       7   6.91146
          CEC source: Calculated
        Nutrient
        SoilTemperature Temperature: InteractionsPerDay=8
        Water: Thickness=[180, 180, 475, 388.3, 388.3, 388.3]; InitialValues=[0.372, 0.2802, 0.3409, 0.369, 0.369, 0.369]; FilledFromTop=false
        Solute NO3: Thickness=[180, 180, 475, 1165]; InitialValues=[7.08427, 4.06695, 0.0612745, 0.0598607]; InitialValuesUnits=ppm; WaterTableConcentration=0; D0=0; DepthConstant=0; MaxDepthSoluteAccessible=0; RunoffEffectivenessAtMovingSolute=0; MaxEffectiveRunoff=0
        Solute NH4: Thickness=[180, 180, 475, 1165]; InitialValues=[1.06264, 0.610043, 0.00919118, 0.0089834]; InitialValuesUnits=ppm; WaterTableConcentration=0; D0=0; DepthConstant=0; MaxDepthSoluteAccessible=0; RunoffEffectivenessAtMovingSolute=0; MaxEffectiveRunoff=0
        Solute Urea: Thickness=[180, 180, 475, 1165]; InitialValues=[0, 0, 0, 0]; InitialValuesUnits=kg/ha; WaterTableConcentration=0; D0=0; DepthConstant=0; MaxDepthSoluteAccessible=0; RunoffEffectivenessAtMovingSolute=0; MaxEffectiveRunoff=0
      Soil Turangi_8a1: SoilType=Typic Orthic Pumice Soils; LocalName=Turangi_8a1; Latitude=-41; Longitude=174
        DataSource=Profile descriptions provided by Smap based on the work done by Trevor Webb.
        Physical
          Thickness  ParticleSizeSand  ParticleSizeSilt  ParticleSizeClay  Rocks  BD     AirDry  LL15   DUL    SAT    KS
          150        80                15                5                 0      1.129  0.036   0.072  0.244  0.502  3600
          125        75                20                5                 0      1.146  0.037   0.075  0.229  0.495  1920
          100        87.5              9.5               3                 0      1.153  0.015   0.017  0.116  0.492  2400
          300        80                15                5                 0      1.198  0.053   0.053  0.204  0.475  1920
          331.3      87.5              9.5               3                 0      1.183  0.015   0.015  0.134  0.481  2400
          331.3      87.5              9.5               3                 0      1.183  0.015   0.015  0.134  0.481  2400
          331.3      87.5              9.5               3                 0      1.183  0.015   0.015  0.134  0.481  2400
          331.3      87.5              9.5               3                 0      1.183  0.015   0.015  0.134  0.48   2400
          Rocks source: Calculated
          SoilCrop BarleySoil
            LL=[0.072, 0.075, 0.017, 0.053, 0.015, 0.015, 0.015, 0.015]
            KL=[0.140109, 0.102014, 0.0786886, 0.0495985, 0.0239397, 0.0111451, 0.00380221, 0]
            XF=[1, 1, 1, 1, 1, 1, 1, 1]
          SoilCrop CanolaSoil
            LL=[0.072, 0.075, 0.017, 0.053, 0.015, 0.015, 0.015, 0.015]
            KL=[0.137564, 0.0928732, 0.0673435, 0.0380301, 0.0154332, 0.00598915, 0, 0]
            XF=[1, 1, 1, 1, 1, 1, 1, 1]
          SoilCrop ChickpeaSoil
            LL=[0.072, 0.075, 0.017, 0.053, 0.015, 0.015, 0.015, 0.015]
            KL=[0.149508, 0.0829358, 0.0512095, 0.0217319, 0.00561811, 0, 0, 0]
            XF=[1, 1, 1, 1, 1, 1, 1, 1]
          SoilCrop ChicorySoil
            LL=[0.072, 0.075, 0.017, 0.053, 0.015, 0.015, 0.015, 0.015]
            KL=[0.102995, 0.0860849, 0.074336, 0.0572671, 0.0379401, 0.0246279, 0.0159865, 0.0103773]
            XF=[1, 1, 1, 1, 1, 1, 1, 1]
          SoilCrop FababeanSoil
            LL=[0.072, 0.075, 0.017, 0.053, 0.015, 0.015, 0.015, 0.015]
            KL=[0.179819, 0.0904185, 0.0515189, 0.0189527, 0.00447632, 0, 0, 0]
            XF=[1, 1, 1, 1, 1, 1, 1, 1]
          SoilCrop FieldpeaSoil: same as Simulation.Field.Turangi_8a1.Physical.FababeanSoil
          SoilCrop FodderBeetSoil
            LL=[0.072, 0.075, 0.017, 0.053, 0.015, 0.015, 0.015, 0.015]
            KL=[0.112352, 0.0853396, 0.0681451, 0.045679, 0.0242967, 0.0125252, 0.00645683, 0.00231797]
            XF=[1, 1, 1, 1, 1, 1, 1, 1]
          SoilCrop GrapevineSoil
            LL=[0.072, 0.075, 0.017, 0.053, 0.015, 0.015, 0.015, 0.015]
            KL=[0.0808132, 0.0700983, 0.0623972, 0.0507354, 0.0366015, 0.025981, 0.0184422, 0.0130909]
            XF=[1, 1, 1, 1, 1, 1, 1, 1]
          SoilCrop ItalianRyegrassSoil
            LL=[0.072, 0.075, 0.017, 0.053, 0.015, 0.015, 0.015, 0.015]
            KL=[0.222285, 0.0974131, 0.0495985, 0.0149388, 0.00303683, 0, 0, 0]
            XF=[1, 1, 1, 1, 1, 1, 1, 1]
          SoilCrop KaleSoil
            LL=[0.072, 0.075, 0.017, 0.053, 0.015, 0.015, 0.015, 0.015]
            KL=[0.128433, 0.0935132, 0.0721313, 0.0454653, 0.0219447, 0.0102163, 0.00348536, 0]
            XF=[1, 1, 1, 1, 1, 1, 1, 1]
          SoilCrop LucerneSoil
            LL=[0.072, 0.075, 0.017, 0.053, 0.015, 0.015, 0.015, 0.015]
            KL=[0.102298, 0.0861434, 0.0748427, 0.0582876, 0.0392844, 0.0259637, 0.0171599, 0.0113413]
            XF=[1, 1, 1, 1, 1, 1, 1, 1]
          SoilCrop MaizeSoil
            LL=[0.072, 0.075, 0.017, 0.053, 0.015, 0.015, 0.015, 0.015]
            KL=[0.123587, 0.0938736, 0.0749596, 0.0502469, 0.0267263, 0.0137777, 0.00710252, 0.00254977]
            XF=[1, 1, 1, 1, 1, 1, 1, 1]
          SoilCrop OatsSoil: same as Simulation.Field.Turangi_8a1.Physical.KaleSoil
          SoilCrop PlantainForageSoil: same as Simulation.Field.Turangi_8a1.Physical.KaleSoil
          SoilCrop PotatoSoil
            LL=[0.072, 0.075, 0.017, 0.053, 0.015, 0.015, 0.015, 0.015]
            KL=[0.144899, 0.0684456, 0.037055, 0.0124472, 0.00274606, 0, 0, 0]
            XF=[1, 1, 1, 1, 1, 1, 1, 1]
          SoilCrop RedCloverSoil
            LL=[0.072, 0.075, 0.017, 0.053, 0.015, 0.015, 0.015, 0.015]
            KL=[0.107767, 0.0856959, 0.0710444, 0.0509056, 0.0300809, 0.0173176, 0.00996975, 0.0057396]
            XF=[1, 1, 1, 1, 1, 1, 1, 1]
          SoilCrop AGPRyegrassSoil
            LL=[0.072, 0.075, 0.017, 0.053, 0.015, 0.015, 0.015, 0.015]
            KL=[0.141735, 0.0817741, 0.0521415, 0.0234287, 0.00662838, 0, 0, 0]
            XF=[1, 1, 1, 1, 1, 1, 1, 1]
          SoilCrop SoybeanSoil
            LL=[0.072, 0.075, 0.017, 0.053, 0.015, 0.015, 0.015, 0.015]
            KL=[0.132728, 0.0839291, 0.0576836, 0.0296157, 0.0103412, 0.00297673, 0, 0]
            XF=[1, 1, 1, 1, 1, 1, 1, 1]
          SoilCrop TriticaleSoil: same as Simulation.Field.Turangi_8a1.Physical.KaleSoil
          SoilCrop WheatSoil
            LL=[0.072, 0.075, 0.017, 0.053, 0.015, 0.015, 0.015, 0.015]
            KL=[0.137252, 0.102225, 0.0803268, 0.052328, 0.0266061, 0.0130816, 0.00643198, 0]
            XF=[1, 1, 1, 1, 1, 1, 1, 1]
          SoilCrop WhitecloverSoil: LL=[0.072, 0.075, 0.017, 0.053, 0.015, 0.015, 0.015, 0.015]; KL=[0.158689, 0.0634519, 0.0299726, 0.00790068, 0, 0, 0, 0]; XF=[1, 1, 1, 1, 0, 0, 0, 0]
          SoilCrop AgPRyegrassSoil
            LL=[0.072, 0.075, 0.017, 0.053, 0.015, 0.015, 0.015, 0.015]
            KL=[0.129924, 0.0749596, 0.0477963, 0.0214763, 0.00607601, 0, 0, 0]
            XF=[1, 1, 1, 1, 1, 1, 1, 1]
          SoilCrop AgPWhiteCloverSoil: LL=[0.072, 0.075, 0.017, 0.053, 0.015, 0.015, 0.015, 0.015]; KL=[0.183059, 0.0563304, 0.0214763, 0.00699524, 0, 0, 0, 0]; XF=[1, 1, 1, 1, 0, 0, 0, 0]
          SoilCrop AgPPaspalumSoil
            LL=[0.072, 0.075, 0.017, 0.053, 0.015, 0.015, 0.015, 0.015]
            KL=[0.10841, 0.0731906, 0.0530714, 0.0299704, 0.0121624, 0.00471987, 0, 0]
            XF=[1, 1, 1, 1, 1, 1, 1, 1]
          SoilCrop SCRUMSoil
            LL=[0.072, 0.075, 0.017, 0.053, 0.015, 0.015, 0.015, 0.015]
            KL=[0.0909131, 0.0909131, 0.0909131, 0.0909131, 0.0909131, 0.0909131, 0.0909131, 0.0909131]
            XF=[1, 1, 1, 1, 1, 1, 1, 1]
        WaterBalance SoilWater: SummerDate=1-oct; SummerU=9; SummerCona=4.4; WinterDate=1-apr; WinterU=4; WinterCona=2; DiffusConst=88; DiffusSlope=35; Salb=0.13; CN2Bare=77; CNRed=37; CNCov=0.8; DischargeWidth=0; CatchmentArea=0; PSIDul=-100
          Thickness  SWCON  KLAT
          150        0.5    0
          125        0.45   0
          100        0.5    0
          300        0.45   0
          1325       0.5    0
        Organic: same as Simulation.Field.Oropi_1a1.Organic
        Chemical: PHUnits=Water
          Thickness  PH  CEC
          150        7   20.195
          125        7   14.9087
          100        7   10.462
          300        7   7.8976
          1325       7   7.13824
          CEC source: Calculated
        Nutrient
        SoilTemperature Temperature: InteractionsPerDay=8
        Water: Thickness=[150, 125, 100, 300, 331.3, 331.3, 331.3, 331.3]; FilledFromTop=false
          InitialValues=[0.2268, 0.2136, 0.1061, 0.1889, 0.1221, 0.1221, 0.1221, 0.1221]
        Solute NO3: Thickness=[150, 125, 100, 300, 1325]; InitialValues=[5.60968, 5.52647, 1.41149, 0.0491014, 0.049724]; InitialValuesUnits=ppm; WaterTableConcentration=0; D0=0; DepthConstant=0; MaxDepthSoluteAccessible=0; RunoffEffectivenessAtMovingSolute=0; MaxEffectiveRunoff=0
        Solute NH4: Thickness=[150, 125, 100, 300, 1325]; InitialValues=[0.841453, 0.82897, 0.211724, 0.00736522, 0.0074586]; InitialValuesUnits=ppm; WaterTableConcentration=0; D0=0; DepthConstant=0; MaxDepthSoluteAccessible=0; RunoffEffectivenessAtMovingSolute=0; MaxEffectiveRunoff=0
        Solute Urea: Thickness=[150, 125, 100, 300, 1325]; InitialValues=[0, 0, 0, 0, 0]; InitialValuesUnits=kg/ha; WaterTableConcentration=0; D0=0; DepthConstant=0; MaxDepthSoluteAccessible=0; RunoffEffectivenessAtMovingSolute=0; MaxEffectiveRunoff=0
      Soil Ngakura_2a1: SoilType=Typic Orthic Allophanic Soils; LocalName=Ngakura_2a1; Latitude=-41; Longitude=174
        DataSource=Profile descriptions provided by Smap based on the work done by Trevor Webb.
        Physical
          Thickness  ParticleSizeSand  ParticleSizeSilt  ParticleSizeClay  Rocks     BD     AirDry  LL15   DUL    SAT    KS
          200        69.5              22                8.5               0         0.744  0.096   0.192  0.429  0.648  1920
          362.5      56                31                13                0.376464  0.589  0.157   0.183  0.317  0.451  1440
          362.5      56                31                13                0.376464  0.589  0.183   0.183  0.317  0.451  1440
          358.3      51.5              32                16.5              0.10723   0.802  0.264   0.264  0.46   0.579  1440
          358.3      51.5              32                16.5              0.10723   0.802  0.264   0.264  0.46   0.579  1440
          358.3      51.5              32                16.5              0.10723   0.802  0.264   0.264  0.46   0.579  1440
          Rocks source: Calculated
          SoilCrop WheatSoil: LL=[0.192, 0.183, 0.183, 0.264, 0.264, 0.264]; KL=[0.111508, 0.0610331, 0.028068, 0.0129662, 0.00601682, 0]; XF=[1, 1, 1, 1, 1, 1]
        WaterBalance SoilWater: SummerDate=1-oct; SummerU=9; SummerCona=4.4; WinterDate=1-apr; WinterU=4; WinterCona=2; DiffusConst=88; DiffusSlope=35; Salb=0.13; CN2Bare=77; CNRed=37; CNCov=0.8; DischargeWidth=0; CatchmentArea=0; PSIDul=-100
          Thickness  SWCON  KLAT
          200        0.4    0
          725        0.4    0
          1075       0.4    0
        Organic: FOMCNRatio=40; CarbonUnits=Total
          Thickness  Carbon    SoilCNRatio  FBiom      FInert    FOM
          50         10        11.1         0.0788566  0.575     124.07
          50         10        11.1         0.0610103  0.575     115.105
          50         10        11.1         0.0477893  0.613573  106.788
          50         8.22356   11.1         0.037995   0.662199  99.0722
          50         5.57835   11.1         0.0307392  0.709226  91.9135
          50         3.80522   11.1         0.025364   0.749972  85.2722
          50         2.61665   11.1         0.0213819  0.785433  79.1107
          50         1.81993   11.1         0.0184319  0.816456  73.3945
          50         1.28587   11.1         0.0162465  0.843742  68.0912
          50         0.927881  11.1         0.0146275  0.867834  63.1712
          250        0.419234  11.1         0.0118814  0.923972  43.4169
          250        0.22967   11.1         0.0104198  0.978156  29.84
          500        0.201477  11.1         0.0100442  0.990841  14.0954
          500        0.200027  11.1         0.0100022  0.996255  6.6582
        Chemical: PHUnits=Water
          Thickness  PH  CEC
          200        7   28.4268
          725        7   10.161
          1075       7   8.31223
          CEC source: Calculated
        Nutrient
        SoilTemperature Temperature: InteractionsPerDay=8
        Water: Thickness=[200, 362.5, 362.5, 358.3, 358.3, 358.3]; InitialValues=[0.4053, 0.3036, 0.3036, 0.4404, 0.4404, 0.4404]; FilledFromTop=false
        Solute NO3: Thickness=[200, 725, 1075]; InitialValues=[8.51254, 1.56922, 0.0734322]; InitialValuesUnits=ppm; WaterTableConcentration=0; D0=0; DepthConstant=0; MaxDepthSoluteAccessible=0; RunoffEffectivenessAtMovingSolute=0; MaxEffectiveRunoff=0
        Solute NH4: Thickness=[200, 725, 1075]; InitialValues=[1.27688, 0.235384, 0.0110195]; InitialValuesUnits=ppm; WaterTableConcentration=0; D0=0; DepthConstant=0; MaxDepthSoluteAccessible=0; RunoffEffectivenessAtMovingSolute=0; MaxEffectiveRunoff=0
        Solute Urea: Thickness=[200, 725, 1075]; InitialValues=[0, 0, 0]; InitialValuesUnits=kg/ha; WaterTableConcentration=0; D0=0; DepthConstant=0; MaxDepthSoluteAccessible=0; RunoffEffectivenessAtMovingSolute=0; MaxEffectiveRunoff=0
      Soil Ngakura_2a1_NSD: SoilType=Typic Orthic Allophanic Soils; LocalName=Ngakura_2a1; Latitude=-41; Longitude=174
        DataSource=Profile descriptions provided by Smap based on the work done by Trevor Webb.
        Memo ReadMe
          *	Generated from info provided by Steve G for TePuke_Ngakura_2a.1
        Physical
          Thickness  ParticleSizeSand  ParticleSizeSilt  ParticleSizeClay  Rocks  BD     AirDry  LL15   DUL    SAT    KS
          200        69.5              22                8.5               0      0.744  0.066   0.198  0.305  0.648  540
          200        56                31                13                0      0.589  0.23    0.253  0.343  0.622  540
          200        56                31                13                27.5   1.589  0.253   0.253  0.343  0.622  540
          100        56                31                13                27.5   2.589  0.253   0.253  0.343  0.622  86
          200        56                31                13                27.5   3.589  0.253   0.253  0.343  0.622  86
          300        51.5              32                16.5              5      0.802  0.276   0.276  0.381  0.609  86
          300        51.5              32                16.5              5      0.802  0.276   0.276  0.381  0.609  86
          300        51.5              32                16.5              5      0.802  0.276   0.276  0.381  0.609  86
          200        51.5              32                16.5              5      0.802  0.276   0.276  0.381  0.609  86
          SoilCrop STRUMSoil
            LL=[0.198, 0.253, 0.253, 0.253, 0.253, 0.276, 0.276, 0.276, 0.276]
            KL=[0.112, 0.061, 0.028, 0.013, 0.013, 0.006, 0, 0, 0]
            XF=[1, 1, 1, 1, 1, 1, 1, 1, 1, -]
        WaterBalance SoilWater: SummerDate=1-oct; SummerU=9; SummerCona=4.4; WinterDate=1-apr; WinterU=4; WinterCona=2; DiffusConst=88; DiffusSlope=35; Salb=0.13; CN2Bare=77; CNRed=37; CNCov=0.8; DischargeWidth=0; CatchmentArea=0; PSIDul=-100
          Thickness  SWCON  KLAT
          200        0.265  0
          200        0.287  0
          200        0.287  0
          100        0.18   0
          200        0.112  0
          300        0.094  0
          300        0.094  0
          300        0.094  0
          200        0.126  0
        Organic: FOMCNRatio=40; CarbonUnits=Total
          Thickness  Carbon    SoilCNRatio  FBiom      FInert    FOM
          50         10        13.1         0.0788566  0.575     124.07
          50         10        13.1         0.0610103  0.575     115.105
          50         10        13.1         0.0477893  0.613573  106.788
          50         8.22356   13.1         0.037995   0.662199  99.0722
          50         5.57835   12           0.0307392  0.709226  91.9135
          50         3.80522   12           0.025364   0.749972  85.2722
          50         2.61665   12           0.0213819  0.785433  79.1107
          50         1.81993   12           0.0184319  0.816456  73.3945
          50         1.28587   11.1         0.0162465  0.843742  68.0912
          50         0.927881  11.1         0.0146275  0.867834  63.1712
          250        0.419234  11.1         0.0118814  0.923972  43.4169
          250        0.22967   13           0.0104198  0.978156  29.84
          500        0.201477  13           0.0100442  0.990841  14.0954
          500        0.200027  13           0.0100022  0.996255  6.6582
        Chemical: PHUnits=Water
          Thickness  PH  CEC
          200        7   28.4268
          725        7   10.161
          1075       7   8.31223
          CEC source: Calculated
        Nutrient
        SoilTemperature Temperature: InteractionsPerDay=8
        Water: Thickness=[200, 200, 200, 100, 200, 300, 300, 300, 200]; FilledFromTop=false
          InitialValues=[0.305, 0.343, 0.343, 0.343, 0.343, 0.381, 0.381, 0.381, 0.381]
        Solute NO3: same as Simulation.Field.Ngakura_2a1.NO3
        Solute NH4: same as Simulation.Field.Ngakura_2a1.NH4
        Solute Urea: Thickness=[200, 725, 1075]; InitialValues=[0, 0, 0]; InitialValuesUnits=kg/ha; WaterTableConcentration=0; D0=0; DepthConstant=0; MaxDepthSoluteAccessible=0; RunoffEffectivenessAtMovingSolute=0; MaxEffectiveRunoff=0
      Soil Ngatarawa: ASCOrder=R; SoilType=Mottled Fluvial Recent Soils; LocalName=Hinds_6a2; Country=New Zealand; Latitude=-41; Longitude=174
        DataSource=Profile descriptions provided by Smap based on the work done by Trevor Webb.
        Memo ReadMe
          *	Generated from info provided by Steve G
        Physical
          Thickness  ParticleSizeSand  ParticleSizeSilt  ParticleSizeClay  Rocks  BD     AirDry  LL15   DUL    SAT    KS
          200        32.91             46.44             20.65             0      1.465  0.079   0.238  0.405  0.437  540
          100        37.05             46.19             16.76             0      1.33   0.194   0.215  0.392  0.488  540
          100        40.05             46.47             13.48             5      1.275  0.16    0.16   0.366  0.484  540
          200        55.19             33.6              11.23             66     1.275  0.021   0.021  0.047  0.173  540
          100        70.47             21.3              8.27              66     1.21   0.023   0.023  0.05   0.182  2870
          100        68.98             14.51             16.51             66     1.57   0.02    0.02   0.043  0.135  2870
          400        76.56             10.99             12.45             66     1.26   0.027   0.027  0.05   0.175  2870
          400        76.56             10.99             12.45             66     1.26   0.027   0.027  0.05   0.175  2870
          400        76.56             10.99             12.45             66     1.26   0.027   0.027  0.05   0.175  2870
          SoilCrop STRUMSoil
            LL=[0.238, 0.215, 0.16, 0.021, 0.023, 0.02, 0.027, 0.027, 0.027]
            KL=[0.134504, 0.0157799, 0.0157799, 0.0157799, 0.0157799, 0.0157799, 0.0157799, 0.0157799, 0.0157799]
            XF=[1, 1, 1, 1, 1, 1, 1, 1, 1]
        Organic: FOMCNRatio=40; CarbonUnits=Total
          Thickness  Carbon    SoilCNRatio  FBiom      FInert    FOM
          50         3.5       10.4         0.0788566  0.30541   227.364
          50         3.5       10.4         0.0610103  0.365438  220.546
          50         3.5       10.4         0.0477893  0.416251  177.533
          50         2.90181   10.4         0.037995   0.477639  138.263
          50         2.01108   10.4         0.0307392  0.549551  107.679
          50         1.414     10.4         0.025364   0.614528  83.8606
          50         1.01377   8            0.0213819  0.673618  65.3107
          50         0.745486  8            0.0184319  0.727416  50.864
          50         0.56565   8            0.0162465  0.776021  39.6129
          50         0.445103  8            0.0146275  0.819115  30.8506
          250        0.273824  10.4         0.0118814  0.911701  77.4992
          250        0.209991  20           0.0104198  0.976109  22.2039
          500        0.200497  20           0.0100442  0.990829  8.18413
          500        0.200009  20           0.0100022  0.996255  0
        Chemical: PHUnits=Water
          Thickness  PH  CEC
          25         7   18.6975
          1975       7   8.5827
        Water: Thickness=[200, 100, 100, 200, 100, 100, 400, 400, 400]; InitialValues=[0.405, 0.392, 0.366, 0.047, 0.05, 0.043, 0.05, 0.05, 0.05]; FilledFromTop=false
        WaterBalance SoilWater: SummerDate=1-oct; SummerU=9; SummerCona=4.4; WinterDate=1-apr; WinterU=4; WinterCona=2; DiffusConst=88; DiffusSlope=35; Salb=0.13; CN2Bare=88; CNRed=22; CNCov=0.8; PSIDul=-100
          Thickness  SWCON  KLAT
          200        0.411  0
          100        0.396  0
          100        0.374  0
          200        0.27   0
          100        0.479  0
          100        0.495  0
          400        0.358  0
          400        0.358  0
          400        0.358  0
        SoilTemperature Temperature: InteractionsPerDay=8
        Solute NO3: Thickness=[25, 1975]; InitialValues=[1.58333, 18.4167]; InitialValuesUnits=kg/ha; WaterTableConcentration=0; D0=0; DepthConstant=0; MaxDepthSoluteAccessible=0; RunoffEffectivenessAtMovingSolute=0; MaxEffectiveRunoff=0
        Solute NH4: Thickness=[25, 1975]; InitialValues=[0.2375, 2.7625]; InitialValuesUnits=kg/ha; WaterTableConcentration=0; D0=0; DepthConstant=0; MaxDepthSoluteAccessible=0; RunoffEffectivenessAtMovingSolute=0; MaxEffectiveRunoff=0
        Solute Urea: Thickness=[25, 1975]; InitialValues=[0, 0]; InitialValuesUnits=ppm; WaterTableConcentration=0; D0=0; DepthConstant=0; MaxDepthSoluteAccessible=0; RunoffEffectivenessAtMovingSolute=0; MaxEffectiveRunoff=0
        Nutrient
        OutputLayers: Thickness=[400, 400, 400, 400, 400]
      Soil Flaxton_77f1: ASCOrder=G; SoilType=Typic Orthic Gley Soils; LocalName=Flaxton_77f1; Country=New Zealand; Latitude=-41; Longitude=174
        DataSource=Profile descriptions provided by Smap based on the work done by Trevor Webb.
        Memo ReadMe
          *	Modified using NSD parameters for Kaiti silt loam provided by SG
        Physical
          Thickness  ParticleSizeSand  ParticleSizeSilt  ParticleSizeClay  Rocks  BD     AirDry  LL15   DUL    SAT    KS
          100        10                60                30                0      1.234  0.07    0.21   0.31   0.476  30
          100        10                60                30                0      1.234  0.189   0.21   0.31   0.476  30
          100        10                60                30                0      1.361  0.209   0.209  0.299  0.43   30
          100        10                60                30                0      1.361  0.209   0.209  0.299  0.43   30
          100        10                60                30                0      1.328  0.213   0.213  0.315  0.442  30
          100        10                60                30                0      1.328  0.213   0.213  0.315  0.442  30
          100        10                47.5              42.5              0      1.366  0.266   0.266  0.359  0.452  14
          300        10                47.5              42.5              0      1.366  0.266   0.266  0.359  0.452  14
          200        10                47.5              42.5              0      1.366  0.283   0.283  0.321  0.452  14
          300        10                47.5              42.5              0      1.366  0.283   0.283  0.321  0.452  14
          300        10                47.5              42.5              0      1.366  0.283   0.283  0.321  0.452  14
          200        10                47.5              42.5              0      1.366  0.283   0.283  0.321  0.452  14
          SoilCrop STRUMSoil
            LL=[0.21, 0.21, 0.209, 0.209, 0.213, 0.213, 0.266, 0.266, 0.283, 0.283, 0.283, 0.283]
            KL=[0.109, 0.109, 0.067, 0.004, 0.004, 0.004, 0.004, 0.004, 0.004, 0.004, 0.004, 0.004]
            XF=[1, 1, 1, 0.404, 0.404, 0.404, 0.404, 0.404, 0.404, 0.404, 0.404, 0.404]
        Organic: FOMCNRatio=40; CarbonUnits=Total
          Thickness  Carbon    SoilCNRatio  FBiom      FInert    FOM
          50         6         10.5         0.0788566  0.431898  231.228
          50         6         10.5         0.0610103  0.491926  224.294
          50         6         10.5         0.0477893  0.542739  180.55
          50         4.94864   10.5         0.037995   0.5956    140.612
          50         3.38311   10.5         0.0307392  0.650815  109.509
          50         2.3337    10.5         0.025364   0.69947   85.2856
          50         1.63026   10.5         0.0213819  0.742644  66.4205
          50         1.15873   10.5         0.0184319  0.781204  51.7283
          50         0.842658  10.5         0.0162465  0.815767  40.2861
          50         0.630787  10.5         0.0146275  0.846679  31.3748
          250        0.32975   10.5         0.0118814  0.917701  78.8161
          250        0.21756   10.5         0.0104198  0.97694   0
          500        0.200874  10.5         0.0100442  0.990833  0
          500        0.200016  10.5         0.0100022  0.996255  0
        Chemical: PHUnits=Water
          Thickness  PH  CEC
          225        7   21.435
          225        7   12.3992
          1550       7   15.6494
        Water: FilledFromTop=true
          Thickness=[100, 100, 100, 100, 100, 100, 100, 300, 200, 300, 300, 200]
          InitialValues=[0.31, 0.31, 0.299, 0.299, 0.315, 0.315, 0.359, 0.359, 0.321, 0.321, 0.321, 0.321]
        WaterBalance SoilWater: SummerDate=1-oct; SummerU=9; SummerCona=4.4; WinterDate=1-apr; WinterU=4; WinterCona=2; DiffusConst=88; DiffusSlope=35; Salb=0.13; CN2Bare=92; CNRed=15; CNCov=0.8; PSIDul=-100
          Thickness  SWCON  KLAT
          100        0.126  0
          100        0.126  0
          100        0.147  0
          100        0.147  0
          100        0.148  0
          100        0.148  0
          100        0.111  0
          300        0.044  0
          200        0.049  0
          300        0.033  0
          300        0.033  0
          200        0.049  0
        SoilTemperature Temperature: InteractionsPerDay=8
        Solute NO3: Thickness=[225, 225, 1550]; InitialValues=[14.25, 4.83824, 0.911765]; InitialValuesUnits=kg/ha; WaterTableConcentration=0; D0=0; DepthConstant=0; MaxDepthSoluteAccessible=0; RunoffEffectivenessAtMovingSolute=0; MaxEffectiveRunoff=0
        Solute NH4: Thickness=[225, 225, 1550]; InitialValues=[2.1375, 0.725735, 0.136765]; InitialValuesUnits=kg/ha; WaterTableConcentration=0; D0=0; DepthConstant=0; MaxDepthSoluteAccessible=0; RunoffEffectivenessAtMovingSolute=0; MaxEffectiveRunoff=0
        Solute Urea: Thickness=[225, 225, 1550]; InitialValues=[0, 0, 0]; InitialValuesUnits=ppm; WaterTableConcentration=0; D0=0; DepthConstant=0; MaxDepthSoluteAccessible=0; RunoffEffectivenessAtMovingSolute=0; MaxEffectiveRunoff=0
        Nutrient
        OutputLayers: Thickness=[400, 400, 400, 400, 400]
      Soil Kaawa_13a1: ASCOrder=U; SoilType=Typic Yellow Ultic Soils; LocalName=Kaawa_13a1; Country=New Zealand; Latitude=-41; Longitude=174
        DataSource=Profile descriptions provided by Smap based on the work done by Trevor Webb.
        Memo ReadMe
          *	Modified using NSD parameters for Kerikeri_Kaawa_13a.1 provided by SG
        Physical
          Thickness  ParticleSizeSand  ParticleSizeSilt  ParticleSizeClay  Rocks  BD     AirDry  LL15   DUL    SAT    KS
          100        6                 49                45                0      1.092  0.074   0.221  0.332  0.54   14
          200        6                 44                50                7.5    1.257  0.21    0.23   0.321  0.444  14
          200        6                 34                60                17.5   1.072  0.34    0.34   0.42   0.495  14
          100        6                 34                60                17.5   1.072  0.34    0.34   0.42   0.495  14
          100        6                 34                60                17.5   1.072  0.34    0.34   0.42   0.495  14
          300        6                 34                60                17.5   1.072  0.34    0.34   0.42   0.495  14
          200        6                 34                60                17.5   1.072  0.34    0.34   0.42   0.495  14
          300        6                 34                60                17.5   1.072  0.34    0.34   0.42   0.495  14
          300        6                 34                60                17.5   1.072  0.34    0.34   0.42   0.495  14
          200        6                 34                60                17.5   1.072  0.34    0.34   0.42   0.495  14
          SoilCrop STRUMSoil
            LL=[0.221, 0.23, 0.34, 0.34, 0.34, 0.34, 0.34, 0.34, 0.34, 0.34]
            KL=[0.127488, 0.0876213, 0.0876213, 0.00928316, 0.00928316, 0.00928316, 0.00928316, 0.00928316, 0.00928316, 0.00928316]
            XF=[1, 1, 1, 0.834, 0.834, 0.834, 0.834, 0.834, 0.834, 0.834]
        Organic: FOMCNRatio=40; CarbonUnits=Total
          Thickness  Carbon    SoilCNRatio  FBiom      FInert    FOM
          50         5.5       17.6         0.0788566  0.415799  227.364
          50         5.5       17.6         0.0610103  0.475828  220.546
          50         5.5       15.8         0.0477893  0.526641  177.533
          50         4.53927   15.8         0.037995   0.580518  138.263
          50         3.1087    15.8         0.0307392  0.637713  107.679
          50         2.14976   15.8         0.025364   0.688296  83.8606
          50         1.50696   30           0.0213819  0.733357  65.3107
          50         1.07608   30           0.0184319  0.773751  50.864
          50         0.787257  30           0.0162465  0.810056  39.6129
          50         0.59365   30           0.0146275  0.842545  30.8506
          250        0.318565  30           0.0118814  0.91667   77.4992
          250        0.216046  71           0.0104198  0.976779  22.2039
          500        0.200799  32.5         0.0100442  0.990832  8.18413
          500        0.200015  32.5         0.0100022  0.996255  0
        Chemical: PHUnits=Water
          Thickness  PH  CEC
          75         7   25.873
          275        7   22.8891
          1650       7   18.7508
        Water: Thickness=[100, 200, 200, 100, 100, 300, 200, 300, 300, 200]; FilledFromTop=true
          InitialValues=[0.332, 0.321, 0.42, 0.42, 0.42, 0.42, 0.42, 0.42, 0.42, 0.42]
        WaterBalance SoilWater: SummerDate=1-oct; SummerU=9; SummerCona=4.4; WinterDate=1-apr; WinterU=4; WinterCona=2; DiffusConst=88; DiffusSlope=35; Salb=0.13; CN2Bare=86; CNRed=26; CNCov=0.8; PSIDul=-100
          Thickness  SWCON  KLAT
          100        0.059  0
          200        0.05   0
          200        0.076  0
          100        0.129  0
          100        0.129  0
          300        0.054  0
          200        0.076  0
          300        0.054  0
          300        0.054  0
          200        0.076  1
        SoilTemperature Temperature: InteractionsPerDay=8
        Solute NO3: Thickness=[75, 275, 1650]; InitialValues=[4.75, 14.2794, 0.970588]; InitialValuesUnits=kg/ha; WaterTableConcentration=0; D0=0; DepthConstant=0; MaxDepthSoluteAccessible=0; RunoffEffectivenessAtMovingSolute=0; MaxEffectiveRunoff=0
        Solute NH4: Thickness=[75, 275, 1650]; InitialValues=[0.7125, 2.14191, 0.145588]; InitialValuesUnits=kg/ha; WaterTableConcentration=0; D0=0; DepthConstant=0; MaxDepthSoluteAccessible=0; RunoffEffectivenessAtMovingSolute=0; MaxEffectiveRunoff=0
        Solute Urea: Thickness=[75, 275, 1650]; InitialValues=[0, 0, 0]; InitialValuesUnits=ppm; WaterTableConcentration=0; D0=0; DepthConstant=0; MaxDepthSoluteAccessible=0; RunoffEffectivenessAtMovingSolute=0; MaxEffectiveRunoff=0
        Nutrient
        OutputLayers: Thickness=[400, 400, 400, 400, 400]
      Soil Opotiki_1a1: SoilType=Allophanic Orthic Pumice Soils; Latitude=-41; Longitude=174
        DataSource=Based on profile descriptions provided by Smap (Opotiki_1a1)
        Memo Opotiki_1a1_Soil
          *	Modified using Opotiki sandy loam (NSD) -
        Chemical: PHUnits=Water
          Thickness  PH  CEC
          210        7   15.39
          220        7   7.86369
          275        7   4.0213
          1295       7   4.49567
        Physical
          Thickness  ParticleSizeSand  ParticleSizeSilt  ParticleSizeClay  Rocks  BD    AirDry  LL15   DUL    SAT    KS
          200        47.8              39                13.2              0      0.9   0.06    0.18   0.407  0.656  540
          300        50.1              33.1              16.8              0      0.93  0.178   0.198  0.376  0.644  1410
          200        50.1              33.1              16.8              0      0.93  0.198   0.198  0.376  0.644  1410
          200        40.8              33.2              26                0      0.82  0.315   0.315  0.492  0.687  86
          300        40.8              33.2              26                0      0.82  0.315   0.315  0.492  0.687  86
          400        40.8              33.2              26                0      0.82  0.315   0.315  0.492  0.687  86
          400        40.8              33.2              26                0      0.82  0.315   0.315  0.492  0.687  86
          SoilCrop STRUMSoil: LL=[0.18, 0.198, 0.198, 0.315, 0.315, 0.315, 0.315]; KL=[0.112, 0.068, 0.045, 0.023, 0.011, 0.004, 0]; XF=[1, 1, 1, 1, 1, 1, 1]
        WaterBalance SoilWater: SummerDate=1-oct; SummerU=9; SummerCona=4.4; WinterDate=1-apr; WinterU=4; WinterCona=2; DiffusConst=88; DiffusSlope=35; Salb=0.13; CN2Bare=77; CNRed=37; CNCov=0.8; DischargeWidth=0; CatchmentArea=0; PSIDul=-100
          Thickness  SWCON  KLAT
          200        0.263  0
          300        0.301  0
          200        0.339  0
          200        0.133  0
          300        0.101  0
          400        0.082  0
          400        0.082  0
        Organic: FOMCNRatio=40; CarbonUnits=Total
          Thickness  Carbon    SoilCNRatio  FBiom      FInert    FOM
          50         6         12.44        0.0788566  0.431898  124.07
          50         6         12.44        0.0610103  0.491926  115.105
          50         6         12.44        0.0477893  0.542739  106.788
          50         4.94864   12.44        0.037995   0.5956    99.0722
          50         3.38311   16           0.0307392  0.650815  91.9135
          50         2.3337    16           0.025364   0.69947   85.2722
          50         1.63026   16           0.0213819  0.742644  79.1107
          50         1.15873   16           0.0184319  0.781204  73.3945
          50         0.842658  16           0.0162465  0.815767  68.0912
          50         0.630787  16           0.0146275  0.846679  63.1712
          250        0.32975   16           0.0118814  0.917701  43.4169
          250        0.21756   12.5         0.0104198  0.97694   29.84
          500        0.200874  12.5         0.0100442  0.990833  14.0954
          500        0.200016  12.5         0.0100022  0.996255  6.6582
        Water: Thickness=[200, 300, 200, 200, 300, 400, 400]; InitialValues=[0.3843, 0.3582, 0.3582, 0.4743, 0.4743, 0.4743, 0.4743]; FilledFromTop=false
        Solute NO3: Thickness=[210, 220, 275, 1295]; InitialValues=[7.24638, 2.60225, 0.0573329, 0.0558628]; InitialValuesUnits=ppm; WaterTableConcentration=0; D0=0; DepthConstant=0; MaxDepthSoluteAccessible=0; RunoffEffectivenessAtMovingSolute=0; MaxEffectiveRunoff=0
        Solute NH4: Thickness=[210, 220, 275, 1295]; InitialValues=[1.087, 0.39, 0.009, 0.008]; InitialValuesUnits=ppm; WaterTableConcentration=0; D0=0; DepthConstant=0; MaxDepthSoluteAccessible=0; RunoffEffectivenessAtMovingSolute=0; MaxEffectiveRunoff=0
        Solute Urea: Thickness=[210, 220, 275, 1295]; InitialValues=[0, 0, 0, 0]; InitialValuesUnits=kg/ha; WaterTableConcentration=0; D0=0; DepthConstant=0; MaxDepthSoluteAccessible=0; RunoffEffectivenessAtMovingSolute=0; MaxEffectiveRunoff=0
        Nutrient
        SoilTemperature Temperature: InteractionsPerDay=8
        Memo ReadOrchardConfiguration
          1.   Sheltered - **ALL**

          2.   Netted - **LIN/Paengaroa, Pukehina, Waiuku**

          3.   Irrigated - **LIN/Paengaroa, OPK/Opotiki, OCR/Pukehina, Katikati, Pukehina, Waiuku**
        OutputLayers: Thickness=[400, 400, 400, 400, 200, 200]
