Simulations: Version=216
  Memo TitlePage
    # The STRUM model
    A simple representation of the shape and mass of rows of fruit trees which can be used in a multizone simulation with a row of mown grass to model the water N and C balance of an orchard system.
  Folder Replacements
    Report RowZoneReport: EventNames=[Clock].DoReport
      VariableNames:
        [Clock].Today
        [Row].STRUM.AccumulatedWaterStress
        //[Row].STRUM.Arbitrator.DemandRatio
        [Row].Area
        [Row].STRUM.BaseHeight
        [Row].STRUM.Fruit.FreshYield_kgPerHa
        [Row].STRUM.CanopyArea
        [Row].STRUM.RootUptakesArbitrator.WaterDemand.Amount
        [Row].STRUM.RootUptakesArbitrator.WaterDemand.mm
        [Row].STRUM.RootUptakesArbitrator.NitrogenDemand.Amount
        [Row].STRUM.Root.Network.WtByLayerZone1
        [Row].STRUM.Root.Network.WtByLayerZone2
        [Row].STRUM.Arbitrator.Carbon.TotalPlantDemand
        [Row].STRUM.Arbitrator.Carbon.TotalPlantSupply
        [Row].STRUM.Arbitrator.Carbon.TotalPlantDemandsAllocated
        [Row].STRUM.Arbitrator.Fn
        [Row].STRUM.Arbitrator.Nitrogen.TotalPlantDemand
        [Row].STRUM.Arbitrator.Nitrogen.TotalPlantSupply
        [Row].STRUM.Arbitrator.Nitrogen.TotalPlantDemandsAllocated
        [Row].STRUM.Fruit.TotalCarbonDemand.RelativeFruitMass.Delta.Integral
        [Row].STRUM.Fruit.Allocated.Carbon.Total
        [Row].STRUM.Fruit.Allocated.Nitrogen.Total
        [Row].STRUM.Fruit.Carbon.Demands.Structural
        [Row].STRUM.Fruit.Carbon.Demands.Total
        [Row].STRUM.Fruit.DMC
        [Row].STRUM.Fruit.FreshWtPerFruit
        [Row].STRUM.Fruit.NextYearsFruitingBudSurvival
        [Row].STRUM.Fruit.Number.BudsSurvivalFromLastYear
        [Row].STRUM.Fruit.N
        [Row].STRUM.Fruit.Nitrogen.Demands.Total
        [Row].STRUM.Fruit.Number
        [Row].STRUM.Fruit.Diameter
        [Row].STRUM.Fruit.VolumePerFruit
        [Row].STRUM.Fruit.Wt
        [Row].STRUM.Fruit.PotentialDWPerFruit
        [Row].STRUM.Fruit.TotalCarbonDemand.RelativeFruitMass
        [Row].STRUM.Fruit.TotalCarbonDemand.CarbonConc
        [Row].STRUM.Height
        [Row].STRUM.Height.PrunedCanopyBaseHeight
        [Row].STRUM.Height.PrunedCanopyBaseHeight  + [Row].STRUM.Height.PrunedCanopyDepth
        [Row].STRUM.Height.PrunedCanopyBaseHeight  + [Row].STRUM.Height.PrunedCanopyDepth + [Row].STRUM.Height.SeasonalDepthGrowth
        [Row].STRUM.Leaf.Allocated.Carbon.Total
        [Row].STRUM.Leaf.Allocated.Nitrogen.Total
        [Row].STRUM.Leaf.Canopy.CoverGreen
        [Row].STRUM.Leaf.Canopy.Deepness
        [Row].STRUM.Leaf.Dead.Wt
        [Row].STRUM.Leaf.Carbon.Demands.Structural
        [Row].STRUM.Leaf.Carbon.Demands.Total
        [Row].STRUM.Leaf.Fn
        [Row].STRUM.Leaf.Canopy.Fw
        [Row].STRUM.Leaf.Canopy.LAI
        [Row].STRUM.Leaf.Live.Wt
        [Row].STRUM.Leaf.N
        [Row].STRUM.Leaf.Nitrogen.Demands.Total
        [Row].STRUM.Leaf.Canopy.PotentialEP
        [Row].STRUM.Leaf.Canopy.RadiationIntercepted
        [Row].STRUM.Leaf.Senesced.Weight.Structural
        [Row].STRUM.Leaf.SenescenceRate
        [Row].STRUM.Leaf.Canopy.Transpiration
        [Row].STRUM.Leaf.Canopy.WaterDemand
        [Row].STRUM.Leaf.Canopy.WaterAllocation
        [Row].STRUM.Leaf.Canopy.Width
        [Row].STRUM.Leaf.Canopy.GreenExtinctionCoefficient
        [Row].STRUM.Leaf.Wt
        [Row].STRUM.Phenology.Age.YearDecimal
        [Row].STRUM.Phenology.Age.Years
        [Row].STRUM.Phenology.CurrentStageName
        [Row].STRUM.Phenology.DaysSinceFlowering
        [Row].STRUM.Phenology.Stage
        [Row].STRUM.RelativeSeasonalDimension
        [Row].STRUM.RelativeAnnualDimension
        [Row].STRUM.Root.Allocated.Carbon.Total
        [Row].STRUM.Root.Allocated.Nitrogen.Total
        [Row].STRUM.Root.Network.Depth
        [Row].STRUM.Root.Carbon.Demands.Structural
        [Row].STRUM.Root.Carbon.Demands.Total
        [Row].STRUM.Root.N
        [Row].STRUM.Root.Nitrogen.Demands.Total
        [Row].STRUM.RootUptakesArbitrator.WaterUptake.AmountByZone
        [Row].STRUM.RootUptakesArbitrator.WaterUptake.Mm
        [Row].STRUM.RootUptakesArbitrator.WaterUptake.Amount
        [Row].STRUM.RootUptakesArbitrator.NitrogenUptake.AmountByZone
        [Row].STRUM.RootUptakesArbitrator.NitrogenUptake.Gpm2
        [Row].STRUM.RootUptakesArbitrator.NitrogenUptake.Amount
        [Row].STRUM.RootUptakesArbitrator.WaterSupply.AmountByZone
        [Row].STRUM.RootUptakesArbitrator.WaterSupply.Mm
        [Row].STRUM.RootUptakesArbitrator.WaterSupply.Amount
        [Row].STRUM.RootUptakesArbitrator.NitrogenSupply.AmountByZone
        [Row].STRUM.RootUptakesArbitrator.NitrogenSupply.Gpm2
        [Row].STRUM.RootUptakesArbitrator.NitrogenSupply.Amount
        [Row].STRUM.Root.Wt
        [Row].STRUM.TranspirationPerTree
        [Row].STRUM.Wood.Allocated.Carbon.Total
        [Row].STRUM.Wood.Allocated.Nitrogen.Total
        [Row].STRUM.Wood.Carbon.Demands.Structural
        [Row].STRUM.Wood.Carbon.Demands.Total
        [Row].STRUM.Wood.Carbon.Supplies.ReTranslocation
        [Row].STRUM.Wood.Live.Carbon.Structural * 1/0.4
        [Row].STRUM.Wood.Live.Carbon.Storage * 1/0.4
        [Row].STRUM.Wood.EnergyBalance.CoverTotal
        [Row].STRUM.Wood.EnergyBalance.DeadAreaIndex
        [Row].STRUM.Wood.EnergyBalance.LAIDead
        [Row].STRUM.Wood.EnergyBalance.RadiationInterceptedByDead
        [Row].STRUM.Wood.EnergyBalance.Transpiration
        [Row].STRUM.Wood.N
        [Row].STRUM.Wood.Nitrogen.Demands.Total
        [Row].STRUM.Wood.Wt
        [Row].STRUM.Width
        [Row].STRUM.Width.PrunedWidth
        [Row].STRUM.Width.PrunedWidth + [Row].STRUM.Width.SeasonalGrowth
        [Row].STRUM.TranspirationPerLeafArea
        [Row].SurfaceOrganicMatter.N
        [Row].SurfaceOrganicMatter.Wt
        [Row].Irrigation.IrrigationApplied
        [Row].Fertiliser.NitrogenApplied
        sum([Row].Soil.OutputLayers.SWmm)
        ([Row].Soil.OutputLayers.SWmm[1] + [Row].Soil.OutputLayers.SWmm[2] + [Row].Soil.OutputLayers.SWmm[3]+ [Row].Soil.OutputLayers.SWmm[4] + [Row].Soil.OutputLayers.SWmm[5]) as SWmm150
        [Row].Soil.OutputLayers.SW
        [Row].Soil.OutputLayers.SAT
        [Row].Soil.OutputLayers.DUL
        [Row].Soil.OutputLayers.LL15
        [Row].Soil.SoilWater.Evaporation
        [Row].Soil.SoilWater.Eo
        [Weather].PanEvap
        [Weather].Radn
        [Weather].Rain
        [STRUM].Leaf.TotalCarbonDemand.TotalDMDemand.SizeDemand.SizeDemand.SizeDemand.TargetSize
        [ZoneAgregate].FintTreeTotal
    Report AlleyZoneReport: EventNames=[Clock].DoReport
      VariableNames:
        [Clock].Today
        [Alley].Area
        [Alley].SPRUM.RootUptakesArbitrator.WaterDemand.Amount
        [Alley].SPRUM.RootUptakesArbitrator.WaterSupply.Amount
        [Alley].SPRUM.RootUptakesArbitrator.WaterUptake.Amount
        [Alley].SPRUM.RootUptakesArbitrator.NitrogenDemand.Amount
        [Alley].SPRUM.RootUptakesArbitrator.NitrogenSupply.Amount
        [Alley].SPRUM.RootUptakesArbitrator.NitrogenUptake.Amount
        [Alley].SPRUM.Root.Network.WtByLayerZone1
        [Alley].SPRUM.Root.Network.WtByLayerZone2
        [Alley].SPRUM.Arbitrator.Carbon.TotalPlantDemand
        [Alley].SPRUM.Arbitrator.Carbon.TotalPlantSupply
        [Alley].SPRUM.Arbitrator.Carbon.TotalPlantDemandsAllocated
        [Alley].SPRUM.Arbitrator.Fn
        [Alley].SPRUM.Arbitrator.Nitrogen.TotalPlantDemand
        [Alley].SPRUM.Arbitrator.Nitrogen.TotalPlantSupply
        [Alley].SPRUM.Arbitrator.Nitrogen.TotalPlantDemandsAllocated
        [Alley].SPRUM.Height
        [Alley].SPRUM.Leaf.Allocated.Carbon.Total
        [Alley].SPRUM.Leaf.Allocated.Nitrogen.Total
        [Alley].SPRUM.Leaf.Canopy.CoverGreen
        [Alley].SPRUM.Leaf.Dead.Wt
        [Alley].SPRUM.Leaf.Carbon.Demands.Structural
        [Alley].SPRUM.Leaf.Carbon.Demands.Total
        [Alley].SPRUM.Leaf.Fn
        [Alley].SPRUM.Leaf.Canopy.Fw
        [Alley].SPRUM.Leaf.Canopy.LAI
        [Alley].SPRUM.Leaf.Live.Wt
        [Alley].SPRUM.Leaf.N
        [Alley].SPRUM.Leaf.Nitrogen.Demands.Total
        [Alley].SPRUM.Leaf.Canopy.PotentialEP
        [Alley].SPRUM.Leaf.Canopy.RadiationIntercepted
        [Alley].SPRUM.Leaf.Senesced.Weight.Structural
        [Alley].SPRUM.Leaf.SenescenceRate
        [Alley].SPRUM.Leaf.Canopy.Transpiration
        [Alley].SPRUM.Leaf.Canopy.WaterDemand
        [Alley].SPRUM.Leaf.Canopy.WaterAllocation
        [Alley].SPRUM.Leaf.Canopy.Width
        [Alley].SPRUM.Leaf.Wt
        [Alley].SPRUM.Phenology.Age.YearDecimal
        [Alley].SPRUM.Phenology.Age.Years
        [Alley].SPRUM.Phenology.CurrentStageName
        [Alley].SPRUM.Phenology.Stage
        [Alley].SPRUM.RelativeAnnualDimension
        [Alley].SPRUM.Root.Allocated.Carbon.Total
        [Alley].SPRUM.Root.Allocated.Nitrogen.Total
        [Alley].SPRUM.Root.Network.Depth
        [Alley].SPRUM.Root.Carbon.Demands.Structural
        [Alley].SPRUM.Root.Carbon.Demands.Total
        [Alley].SPRUM.Root.N
        [Alley].SPRUM.Root.Nitrogen.Demands.Total
        [Alley].SPRUM.RootUptakesArbitrator.WaterUptake.AmountByZone
        [Alley].SPRUM.RootUptakesArbitrator.WaterUptake.Mm
        [Alley].SPRUM.RootUptakesArbitrator.WaterUptake.Amount
        [Alley].SPRUM.RootUptakesArbitrator.NitrogenUptake.AmountByZone
        [Alley].SPRUM.RootUptakesArbitrator.NitrogenUptake.Gpm2
        [Alley].SPRUM.RootUptakesArbitrator.NitrogenUptake.Amount
        [Alley].SPRUM.RootUptakesArbitrator.WaterSupply.AmountByZone
        [Alley].SPRUM.RootUptakesArbitrator.WaterSupply.Mm
        [Alley].SPRUM.RootUptakesArbitrator.WaterSupply.Amount
        [Alley].SPRUM.RootUptakesArbitrator.NitrogenSupply.AmountByZone
        [Alley].SPRUM.RootUptakesArbitrator.NitrogenSupply.Gpm2
        [Alley].SPRUM.RootUptakesArbitrator.NitrogenSupply.Amount
        [Alley].SPRUM.Root.Wt
        [Alley].SPRUM.Residue.Allocated.Carbon.Total
        [Alley].SPRUM.Residue.Allocated.Nitrogen.Total
        [Alley].SPRUM.Residue.Carbon.Demands.Structural
        [Alley].SPRUM.Residue.Carbon.Demands.Total
        [Alley].SPRUM.Residue.N
        [Alley].SPRUM.Residue.Nitrogen.Demands.Total
        [Alley].SPRUM.Residue.Wt
        [Alley].SurfaceOrganicMatter.N
        [Alley].SurfaceOrganicMatter.Wt
        [Alley].Irrigation.IrrigationApplied
        [Alley].Fertiliser.NitrogenApplied
        sum([Alley].Soil.OutputLayers.SWmm)
        ([Alley].Soil.OutputLayers.SWmm[1] + [Alley].Soil.OutputLayers.SWmm[1] + [Alley].Soil.OutputLayers.SWmm[1]) as SWmm90
        [Alley].Soil.OutputLayers.SW
        [Alley].Soil.OutputLayers.SAT
        [Alley].Soil.OutputLayers.DUL
        [Alley].Soil.OutputLayers.LL15
        [Alley].Soil.SoilWater.Drainage
        [Alley].Soil.SoilWater.Evaporation
        [Alley].Soil.SoilWater.Eo
        [Weather].PanEvap
        [Weather].Radn
        [Weather].Rain
    Report ZoneAgregateReport: EventNames=[Clock].DoReport
      VariableNames:
        [Clock].Today
        [ZoneAgregate].SimulationArea
        [ZoneAgregate].Eop.Amount
        [ZoneAgregate].Eop.Pm2
        [ZoneAgregate].Eop.AmountByZone[1]
        [ZoneAgregate].Eop.AmountByZone[2]
        [ZoneAgregate].Ro.Amount
        [ZoneAgregate].Ro.Pm2
        [ZoneAgregate].Ro.AmountByZone[1]
        [ZoneAgregate].Ro.AmountByZone[2]
        [ZoneAgregate].Ri.Amount
        [ZoneAgregate].Ri.Pm2
        [ZoneAgregate].Ri.AmountByZone[1]
        [ZoneAgregate].Ri.AmountByZone[2]
        [ZoneAgregate].Et.Amount
        [ZoneAgregate].Et.Pm2
        [ZoneAgregate].Et.AmountByZone[1]
        [ZoneAgregate].Et.AmountByZone[2]
        [ZoneAgregate].AccumulatedIrrigation.Amount
        [ZoneAgregate].AccumulatedIrrigation.Pm2
        [ZoneAgregate].AccumulatedIrrigation.AmountByZone[1]
        [ZoneAgregate].AccumulatedIrrigation.AmountByZone[2]
        [ZoneAgregate].AccumulatedNitrogen.Amount
        [ZoneAgregate].AccumulatedNitrogen.Pm2
        [ZoneAgregate].AccumulatedNitrogen.AmountByZone[1]
        [ZoneAgregate].AccumulatedNitrogen.AmountByZone[2]
        [ZoneAgregate].FintTreeGreen
        [ZoneAgregate].FintTreeDead
        [ZoneAgregate].FintTreeTotal
        [ZoneAgregate].FintUnderstoryGreen
        [ZoneAgregate].FintUnderstoryDead
    Manager AutomaticFertiliser
      Fertilise = True
      Season_Start = 1-Aug
      Season_End = 30-May
      Season_Allocation = 100000
      TriggerN = 60
      NApplicationAmount = 30
      Return_days = 2
      Top_Depth = 600
```csharp
using Newtonsoft.Json;
using Models.PMF.Phen;
using Models.Soils.Nutrients;
using Models.Interfaces;
using APSIM.Shared.Utilities;
using Models.PMF;
using System.Xml.Serialization;
using Models.Soils;
using Models.Core;
using System;
using Models.PMF.Organs;

        
namespace Models
{
    [Serializable] 
    [System.Xml.Serialization.XmlInclude(typeof(Model))]
    public class Script : Model
    {
        [Link] private ISummary summary;
        [Link] private Fertiliser Fertiliser;
        [Link] private Clock Clock;
        [Link] private Plant SCRUM;
        [Link(ByName = true)]
        private ISolute NO3;
        [Link] private Soils.Soil Soil;
        [Link(Type = LinkType.Path, Path = "[STRUM].Root.Network")]
        private RootNetwork root;
        [Link(Type = LinkType.Path, Path = "[STRUM].Phenology")]
        private Phenology phenology;
        [Link]
        private IPhysical soilPhysical;
        //Communication to other modules
       
        //User inputs from properties tab
        [Description("Fertilise (tick for yes)")]
        public bool Fertilise { get; set; }
        [Description("SeasonStart (dd-MMM)")]
        public string Season_Start { get; set; }
        [Description("SeasonEnd (dd-MMM)")]
        public string Season_End { get; set; }
        [Description("Season Allocation (kg/ha)")]
        public double Season_Allocation { get; set; }
        [Description("Mineral N to maintain soil above (kg/ha)")]
        public double TriggerN { get; set; }
        [Description("Amount of N to apply (kg/ha)")]
        public double NApplicationAmount { get; set; }
        [Description("Minimum days for Fertiliser spreader to return")]
        public double Return_days { get; set; }
        [Description("Depth to calculate mineral N (mm)")]
        public double Top_Depth { get; set; }
       
        //Class members
        [JsonIgnore] private bool FertiliserIsAvailable { get; set; }
        [JsonIgnore] public bool SeasonIsOpen { get; set; }
        [JsonIgnore] private bool CropIsActive { get; set; }
        [JsonIgnore] private bool FertSpreaderIsAvailable { get; set; }
        [JsonIgnore] private bool SoilNIsLow { get; set; }
        [JsonIgnore] public double Top_SoilN { get; set; }
        [JsonIgnore] public double Accumulated_depth { get; set; }
        [JsonIgnore] public double Days_since_fertiliser { get; set; }
        [JsonIgnore] public double Season_Application { get; set; }
        
        //Variables for date logic testing
        [JsonIgnore] public string StartString { get; set; }
        [JsonIgnore] public string EndString { get; set; }
        [JsonIgnore] public DateTime StartDate { get; set; }
        [JsonIgnore] public DateTime EndDate { get; set; }
        [JsonIgnore] public int TodayYear { get; set; }
        [JsonIgnore] public int TodayMonth { get; set; }
        [JsonIgnore] public int StartMonth { get; set; }
        [JsonIgnore] public int EndMonth { get; set; }
        [JsonIgnore] public int TodayDay { get; set; }
        [JsonIgnore] public int StartDay { get; set; }
        [JsonIgnore] public int EndDay { get; set; }
              
        //Determine daily requirement for fertiliser
        [EventSubscribe("StartOfDay")]
        private void OnStartOfDay(object sender, EventArgs e)
        { 
            //Can we irrigate?
            FertiliserIsAvailable = false; 
            if (Fertilise)
                FertiliserIsAvailable = true; 
    
            //Are we Allowed to Irrigate?
            TodayYear = Clock.Today.Year;
            StartString = Season_Start + "-" + TodayYear.ToString();
            EndString = Season_End + "-" + TodayYear.ToString();
            StartDate = DateTime.Parse(StartString);
            EndDate = DateTime.Parse(EndString);
            TodayMonth = Clock.Today.Month;
            TodayDay = Clock.Today.Day;
            StartDay = StartDate.Day;
            StartMonth = StartDate.Month;
            EndDay = EndDate.Day;
            EndMonth = EndDate.Month;
          
            SeasonIsOpen = false;
            //if we are in the spring and after the start date then yes
            if ((Clock.Today.Month > 6) && (Clock.Today >= StartDate))
                SeasonIsOpen = true;
            //if we are in the autumn and before the end date then yes
            if ((Clock.Today.Month <= 6) && (Clock.Today <= EndDate))
                SeasonIsOpen = true;
          
            //Is there a crop in the ground that needs irrigation?
            //CropIsActive = false;
            //if ((phenology.Stage >= 3.0) && (phenology.Stage < 6.0))
            CropIsActive = true;
          
            //Is the irrigator available?
            FertSpreaderIsAvailable = false;
            Days_since_fertiliser += 1;
            if (Days_since_fertiliser >= Return_days)
                FertSpreaderIsAvailable = true;
          
            //Is the soil N low enough to require fertiliser?
            SoilNIsLow = false;
            double CurrentRootDepth = 0;
            double RootDepth = root.Depth;
            CurrentRootDepth = Math.Max(RootDepth, CurrentRootDepth);
          
            Accumulated_depth = 0;
            Top_SoilN = 0;
            for (int layer = 0; Accumulated_depth < Top_Depth; layer++)
            {
                Top_SoilN += NO3.kgha[layer];
                Accumulated_depth += soilPhysical.Thickness[layer];
            }
            if (Top_SoilN <= TriggerN)
                SoilNIsLow = true;
                
            //Lets bloody well fertilise then!!!!
            if ((FertiliserIsAvailable) && (SeasonIsOpen) && (CropIsActive) && (FertSpreaderIsAvailable) && (SoilNIsLow)) //The conditions are rife for fertiliser
            {
                Fertiliser.Apply(NApplicationAmount, "UreaN", 10);
                Days_since_fertiliser = 0;
                Season_Application += NApplicationAmount;
                summary.WriteMessage(this, "Automatic Fertiliser", MessageType.Diagnostic);
            
            }
        }
    }
}
```
  DataStore
    ExcelInput: FileNames=[AllObsCopy.xlsx]; SheetNames=[Apples]
    PredictedObserved: PredictedTableName=RowZoneReport; ObservedTableName=Apples; FieldNameUsedForMatch=SimulationName; FieldName2UsedForMatch=Zone; FieldName3UsedForMatch=Clock.Today; AllColumns=false
    PredictedObserved DrainagePO (disabled): PredictedTableName=Drainage; ObservedTableName=Observed; FieldNameUsedForMatch=SimulationName; FieldName2UsedForMatch=Zone; FieldName3UsedForMatch=Clock.Today; AllColumns=false
  Folder NZ AppleExperiments
    Experiment Apple_Dwarf
      Factors
        Factor _
          CompositeFactor Parameterised: Specifications=[Soil]
            Soil KaiapoSiltLoam: ASCOrder=G; SoilType=Typic Orthic Gley Soil; LocalName=Kaiapo Silt Loam; Country=New Zealand; Latitude=-41; Longitude=174
              DataSource=Based on data collect on site (Growing Futures) complemented with information from Smap (Flaxton_69), plus PTFs (R.Cichota)
              Physical
                Thickness  ParticleSizeSand  ParticleSizeSilt  ParticleSizeClay  Rocks  BD     AirDry  LL15   DUL    SAT    KS
                100        1.1               69.1              29.8              0      1.217  0.09    0.27   0.472  0.539  5790
                100        1.2               70                28.8              0      1.344  0.091   0.272  0.458  0.484  1270
                150        1.4               70.8              27.9              0      1.406  0.092   0.277  0.413  0.466  1402
                150        1.4               73.7              25                0      1.233  0.075   0.225  0.423  0.51   1209
                150        1.3               73.2              25.6              0      1.218  0.078   0.233  0.413  0.519  674
                150        1                 72.3              26.8              0      1.188  0.084   0.253  0.403  0.518  266
                200        1.6               73.1              25.3              0      1.179  0.083   0.249  0.411  0.519  136
                250        2.3               73.9              23.9              0      1.183  0.08    0.241  0.429  0.522  46
                250        1.6               59.2              39.2              0      1.183  0.079   0.237  0.445  0.52   40
                250        1                 44.6              54.5              25     0.887  0.058   0.175  0.345  0.388  35
                1250       1                 44.6              54.5              30     0.828  0.054   0.163  0.322  0.362  35
                SoilCrop SPRUMSoil
                  LL=[0.27, 0.272, 0.277, 0.225, 0.233, 0.253, 0.249, 0.241, 0.237, 0.175, 0.163]
                  KL=[0.117, 0.11, 0.065, 0.06, 0.04, 0.15, 0.1, 0.007, 0.007, 0.005, 0.005]
                  XF=[1, 1, 0.9, 0.85, 0.85, 0.65, 0.65, 0.6, 0.6, 0.5, 0.5]
                SoilCrop SCRUMSoil
                  LL=[0.27, 0.272, 0.277, 0.225, 0.233, 0.253, 0.249, 0.241, 0.237, 0.175, 0.163]
                  KL=[0.0778659, 0.0778659, 0.0778659, 0.0778659, 0.0778659, 0.0778659, 0.0778659, 0.0778659, 0.0778659, 0.0778659, 0.0778659]
                  XF=[1, 1, 0.9, 0.85, 0.85, 0.65, 0.65, 0.6, 0.6, 0.5, 0.5]
                SoilCrop STRUMSoil
                  LL=[0.27, 0.272, 0.277, 0.225, 0.233, 0.253, 0.249, 0.241, 0.237, 0.175, 0.163]
                  KL=[0.115, 0.11, 0.07, 0.06, 0.04, 0.02, 0.015, 0.012, 0.008, 0.005, 0.003]
                  XF=[1, 1, 0.9, 0.85, 0.85, 0.65, 0.65, 0.6, 0.6, 0.5, 0.5]
              WaterBalance SoilWater: SummerDate=1-oct; SummerU=9; SummerCona=4.4; WinterDate=1-apr; WinterU=4; WinterCona=2; DiffusConst=88; DiffusSlope=35; Salb=0.13; CN2Bare=92; CNRed=15; CNCov=0.8; PSIDul=-100
                Thickness  SWCON  KLAT
                155        0.35   0
                300        0.3    0
                140        0.25   0
                1405       0.2    0
              Organic: FOMCNRatio=40; CarbonUnits=Total
                Thickness  Carbon  SoilCNRatio  FBiom  FInert  FOM
                100        2.99    10.3         0.05   0.628   358.4
                100        2.03    10.7         0.038  0.991   252.7
                150        1.25    10.7         0.011  0.998   205.5
                150        0.86    10.7         0.008  0.998   97.1
                150        0.69    10.7         0.008  0.997   45.9
                150        0.58    10.7         0.008  0.996   21.7
                200        0.46    10.7         0.008  0.995   12.3
                250        0.4     10.7         0.008  0.997   5.1
                250        0.36    10.7         0.008  0.997   1.5
                250        0.31    10.7         0.008  0.996   0
                1250       0.24    10.7         0.008  0.995   0
              Chemical: PHUnits=Water
                Thickness  PH  CEC
                100        7   21
                100        7   19
                300        7   14
                500        7   12
                2000       7   12
              Nutrient
              SoilTemperature Temperature: InteractionsPerDay=8
              Water: Thickness=[100, 100, 150, 150, 150, 150, 200, 250, 250, 250, 1250]; FilledFromTop=false
                InitialValues=[0.472, 0.458, 0.413, 0.423, 0.413, 0.403, 0.411, 0.429, 0.445, 0.345, 0.322]
              Solute NO3: Thickness=[100, 100, 300, 500, 1000]; InitialValues=[10, 9, 2, 1, 0.5]; InitialValuesUnits=kg/ha; WaterTableConcentration=0; D0=0; DepthConstant=0; MaxDepthSoluteAccessible=0; RunoffEffectivenessAtMovingSolute=0; MaxEffectiveRunoff=0
              Solute NH4: Thickness=[100, 100, 300, 500, 1000]; InitialValues=[1.5, 1.25, 0.5, 0.1, 0]; InitialValuesUnits=kg/ha; WaterTableConcentration=0; D0=0; DepthConstant=0; MaxDepthSoluteAccessible=0; RunoffEffectivenessAtMovingSolute=0; MaxEffectiveRunoff=0
              Solute Urea: Thickness=[100, 100, 300, 500, 1000]; InitialValues=[0, 0, 0, 0, 0]; InitialValuesUnits=ppm; WaterTableConcentration=0; D0=0; DepthConstant=0; MaxDepthSoluteAccessible=0; RunoffEffectivenessAtMovingSolute=0; MaxEffectiveRunoff=0
              OutputLayers: Thickness=[300, 300, 300, 300, 300, 300]
          CompositeFactor SMAP: Specifications=[Soil]
            Soil Flaxton_69a1: ASCOrder=G; SoilType=Typic Orthic Gley Soils; LocalName=Flaxton_69a1; Country=New Zealand; Latitude=-41; Longitude=174
              DataSource=Profile descriptions provided by Smap based on the work done by Trevor Webb.
              Physical
                Thickness  ParticleSizeSand  ParticleSizeSilt  ParticleSizeClay  Rocks  BD     AirDry  LL15   DUL    SAT    KS
                77         5.5               64.5              30                0      1.191  0.101   0.202  0.425  0.492  960
                78         5.5               64.5              30                0      1.191  0.101   0.202  0.425  0.492  960
                150        5.5               69.5              25                0      1.295  0.152   0.201  0.389  0.454  480
                150        5.5               69.5              25                0      1.295  0.152   0.201  0.389  0.454  480
                140        3                 54.5              42.5              0      1.247  0.299   0.299  0.444  0.472  360
                234        3                 62.5              34.5              0      1.234  0.259   0.259  0.471  0.477  96
                234        3                 62.5              34.5              0      1.234  0.259   0.259  0.471  0.477  96
                234        3                 62.5              34.5              0      1.234  0.259   0.259  0.471  0.477  96
                234        3                 62.5              34.5              0      1.234  0.259   0.259  0.471  0.477  96
                234        3                 62.5              34.5              0      1.234  0.259   0.259  0.471  0.477  96
                235        3                 62.5              34.5              0      1.234  0.259   0.259  0.471  0.477  96
                1000       3                 62.5              34.5              0      1.234  0.259   0.259  0.471  0.477  96
                SoilCrop STRUMSoil
                  LL=[0.202, 0.202, 0.201, 0.201, 0.299, 0.259, 0.259, 0.259, 0.259, 0.259, 0.259, 0.259]
                  KL=[0.117, 0.117, 0.06, 0.06, 0.037, 0.007, 0.007, 0.007, 0.007, 0.007, 0.007, 0.007]
                  XF=[1, 1, 0.834, 0.834, 0.834, 0.581, 0.581, 0.581, 0.581, 0.581, 0.581, 0.581]
                SoilCrop SPRUMSoil
                  LL=[0.202, 0.202, 0.201, 0.201, 0.299, 0.259, 0.259, 0.259, 0.259, 0.259, 0.259, 0.259]
                  KL=[0.11, 0.11, 0.037, 0.037, 0.015, 0.006, 0.006, 0.006, 0.006, 0.006, 0.006, 0.006]
                  XF=[1, 1, 0.687, 0.687, 0.687, 0.472, 0.472, 0.472, 0.472, 0.472, 0.472, 0.472]
              Organic: FOMCNRatio=40; CarbonUnits=Total
                Thickness  Carbon    SoilCNRatio  FBiom      FInert    FOM
                50         6         10.5         0.0788566  0.431898  245.637
                50         6         10.5         0.0610103  0.491926  238.271
                50         6         10.5         0.0477893  0.542739  191.801
                50         4.94864   10.5         0.037995   0.5956    149.375
                50         3.38311   10.5         0.0307392  0.650815  116.333
                50         2.3337    10.5         0.025364   0.69947   90.6003
                50         1.63026   10.5         0.0213819  0.742644  70.5596
                50         1.15873   10.5         0.0184319  0.781204  54.9518
                50         0.842658  10.5         0.0162465  0.815767  42.7965
                50         0.630787  10.5         0.0146275  0.846679  33.33
                250        0.32975   10.5         0.0118814  0.917701  0
                250        0.21756   10.5         0.0104198  0.97694   0
                500        0.200874  10.5         0.0100442  0.990833  0
                500        0.200016  10.5         0.0100022  0.996255  0
              Chemical: PHUnits=Water
                Thickness  PH  CEC
                155        7   22.9065
                300        7   14.7115
                140        7   15.9531
                1405       7   13.85
              Water: Thickness=[155, 300, 140, 1405]; InitialValues=[0.425, 0.389, 0.444, 0.471]; FilledFromTop=false
              WaterBalance SoilWater: same as NZ AppleExperiments.Apple_Dwarf.Factors._.Parameterised.KaiapoSiltLoam.SoilWater
              SoilTemperature Temperature: InteractionsPerDay=8
              Solute NO3: Thickness=[155, 300, 140, 1405]; InitialValues=[9.81667, 9.27451, 0.0823529, 0.826471]; InitialValuesUnits=kg/ha; WaterTableConcentration=0; D0=0; DepthConstant=0; MaxDepthSoluteAccessible=0; RunoffEffectivenessAtMovingSolute=0; MaxEffectiveRunoff=0
              Solute NH4: Thickness=[155, 300, 140, 1405]; InitialValues=[1.4725, 1.39118, 0.0123529, 0.123971]; InitialValuesUnits=kg/ha; WaterTableConcentration=0; D0=0; DepthConstant=0; MaxDepthSoluteAccessible=0; RunoffEffectivenessAtMovingSolute=0; MaxEffectiveRunoff=0
              Solute Urea: Thickness=[155, 300, 140, 1405]; InitialValues=[0, 0, 0, 0]; InitialValuesUnits=ppm; WaterTableConcentration=0; D0=0; DepthConstant=0; MaxDepthSoluteAccessible=0; RunoffEffectivenessAtMovingSolute=0; MaxEffectiveRunoff=0
              Nutrient
              OutputLayers: Thickness=[300, 300, 300, 300, 300, 300]
          CompositeFactor SMAP2 (disabled): Specifications=[Soil]
            Soil Hastings_silt_loam: ASCOrder=G; SoilType=Typic Orthic Gley Soils; LocalName=Flaxton_69a1; Country=New Zealand; Latitude=-41; Longitude=174
              DataSource=Profile descriptions provided by Smap based on the work done by Trevor Webb.
              Memo ReadMe
                Made by modifying Flaxton_69a1 using some FSL parameters.
              Physical
                Thickness  ParticleSizeSand  ParticleSizeSilt  ParticleSizeClay  Rocks  BD     AirDry  LL15   DUL    SAT    KS
                100        2.1               61.8              36.1              0      1.42   0.088   0.264  0.366  0.456  86
                100        2.1               61.8              36.1              0      1.29   0.239   0.266  0.331  0.506  86
                200        1.1               70.4              28.5              0      1.24   0.231   0.231  0.32   0.525  86
                200        1.1               77.9              21                0      1.11   0.171   0.171  0.292  0.573  86
                200        1.1               77.9              21                0      1.11   0.171   0.171  0.292  0.573  86
                200        0                 75.1              24.9              0      1.15   0.223   0.223  0.354  0.558  86
                200        1.1               26.1              72.8              0      1.09   0.37    0.37   0.437  0.581  14
                200        2.1               40.2              57.7              0      0.96   0.355   0.355  0.436  0.631  30
                100        4.2               73.6              22.2              0      0.736  0.113   0.113  0.286  0.518  540
                300        13.8              77.2              9                 0      0.736  0.113   0.113  0.286  0.518  540
                200        13.8              77.2              9                 0      0.736  0.113   0.113  0.286  0.518  540
                1000       13.8              77.2              9                 0      0.736  0.113   0.113  0.286  0.518  540
                SoilCrop STRUMSoil
                  LL=[0.264, 0.266, 0.231, 0.171, 0.171, 0.223, 0.37, 0.355, 0.113, 0.113, 0.113, 0.113]
                  KL=[0.117, 0.117, 0.06, 0.06, 0.037, 0.007, 0.007, 0.007, 0.007, 0.007, 0.007, 0.007]
                  XF=[1, 1, 0.834, 0.834, 0.834, 0.581, 0.581, 0.581, 0.581, 0.581, 0.581, 0.581]
                SoilCrop SPRUMSoil
                  LL=[0.264, 0.266, 0.231, 0.171, 0.171, 0.223, 0.37, 0.355, 0.113, 0.113, 0.113, 0.113]
                  KL=[0.11, 0.11, 0.037, 0.037, 0.015, 0.006, 0.006, 0.006, 0.006, 0.006, 0.006, 0.006]
                  XF=[1, 1, 0.687, 0.687, 0.687, 0.472, 0.472, 0.472, 0.472, 0.472, 0.472, 0.472]
              Organic: FOMCNRatio=40; CarbonUnits=Total
                Thickness  Carbon    SoilCNRatio  FBiom      FInert    FOM
                50         6         10.7         0.0788566  0.431898  245.637
                50         6         10.7         0.0610103  0.491926  238.271
                50         6         11.3         0.0477893  0.542739  191.801
                50         4.94864   11.3         0.037995   0.5956    149.375
                50         3.38311   9            0.0307392  0.650815  116.333
                50         2.3337    9            0.025364   0.69947   90.6003
                50         1.63026   9            0.0213819  0.742644  70.5596
                50         1.15873   9            0.0184319  0.781204  54.9518
                50         0.842658  10           0.0162465  0.815767  42.7965
                50         0.630787  10           0.0146275  0.846679  33.33
                250        0.32975   10           0.0118814  0.917701  0
                250        0.21756   10           0.0104198  0.97694   0
                500        0.200874  8.9          0.0100442  0.990833  0
                500        0.200016  20           0.0100022  0.996255  0
              Chemical: PHUnits=Water
                Thickness  PH  CEC
                155        7   22.9065
                300        7   14.7115
                140        7   15.9531
                1405       7   13.85
              Water: FilledFromTop=false
                Thickness=[100, 100, 200, 200, 200, 200, 200, 200, 100, 300, 200, 1000]
                InitialValues=[0.366, 0.331, 0.32, 0.292, 0.292, 0.354, 0.437, 0.436, 0.286, 0.286, 0.286, 0.286]
              WaterBalance SoilWater: SummerDate=1-oct; SummerU=9; SummerCona=4.4; WinterDate=1-apr; WinterU=4; WinterCona=2; DiffusConst=88; DiffusSlope=35; Salb=0.13; CN2Bare=92; CNRed=15; CNCov=0.8; PSIDul=-100
                Thickness  SWCON  KLAT
                100        0.281  0
                100        0.232  0
                200        0.136  0
                200        0.109  0
                200        0.109  0
                200        0.132  0
                1100       0.009  0
                200        0.065  0
                100        0.345  0
                300        0.236  0
                200        0.276  0
                1000       0.128  0
              SoilTemperature Temperature: InteractionsPerDay=8
              Solute NO3: Thickness=[155, 300, 140, 1405]; InitialValues=[9.81667, 9.27451, 0.0823529, 0.826471]; InitialValuesUnits=kg/ha; WaterTableConcentration=0; D0=0; DepthConstant=0; MaxDepthSoluteAccessible=0; RunoffEffectivenessAtMovingSolute=0; MaxEffectiveRunoff=0
              Solute NH4: Thickness=[155, 300, 140, 1405]; InitialValues=[1.4725, 1.39118, 0.0123529, 0.123971]; InitialValuesUnits=kg/ha; WaterTableConcentration=0; D0=0; DepthConstant=0; MaxDepthSoluteAccessible=0; RunoffEffectivenessAtMovingSolute=0; MaxEffectiveRunoff=0
              Solute Urea: Thickness=[155, 300, 140, 1405]; InitialValues=[0, 0, 0, 0]; InitialValuesUnits=ppm; WaterTableConcentration=0; D0=0; DepthConstant=0; MaxDepthSoluteAccessible=0; RunoffEffectivenessAtMovingSolute=0; MaxEffectiveRunoff=0
              Nutrient
              OutputLayers: Thickness=[300, 300, 300, 300, 300, 300]
      Simulation _Dwarf
        Memo ExperimentDescription
          *	Based on Green et al 2013 - PFR report for the Hawkes Bay Regional Council

          * 	Location: Hastings, NZ

          *	Cultivar: Pink Lady

          *	Transpiration measured using sap flow sensors.

          The apple experiments were carried out at Mr Apple’s Close Orchard near Whakatu, on a free draining Hastings silt loam. Two sites were chosen: one block was planted in 12-year-old ‘Royal Gala’ and the other block was planted in 8-year-old Pink Lady® on a dwarfing root stock. Irrigation was via micro-sprinklers and the strategy was to apply water at a rate of 10–25 mm as required. The irrigation scheduling was provided by AgFirst consultants who also monitored soil water contents at some, but not all, the orchard blocks
        Clock: Start=2008-06-21; End=2011-07-01
        Summary SummaryFile
        Weather: FileName=MetFiles/Whakatu.met
        MicroClimate: a_interception=0; b_interception=1; c_interception=0; d_interception=0; SoilHeatFluxFraction=0.4; MinimumHeightDiffForNewLayer=0; NightInterceptionFraction=0.5; ReferenceHeight=2
        SoilArbitrator Soil Arbitrator
        ZoneAgregate
        Report ZoneAgregateReport: EventNames=[Clock].DoReport
          VariableNames:
            [Clock].Today
            [ZoneAgregate].SimulationArea
            [ZoneAgregate].EO
            [ZoneAgregate].ES
            [ZoneAgregate].ET
            [ZoneAgregate].IncommingRadiation
            [ZoneAgregate].GreenAreaRadiationInterception
            [ZoneAgregate].DeadMaterialRadiationInterception
            [ZoneAgregate].FRadIntGreen
            [ZoneAgregate].FRadIntDead
            [ZoneAgregate].Irrigation
            [ZoneAgregate].Nitrogen
        Manager AutoIrrigationDeficitBased
          AllowIrrigation = True
          depthPAWC = 1000
          triggerDeficit = 60
          irrigateAmount = 15
          returndays = 2
          IrrigateAlley = False
```csharp
using APSIM.Core;
using Models.Interfaces;
using System;
using Models.Core;
using Models.PMF;
using Models.Soils;
using System.Xml.Serialization;
using APSIM.Shared.Utilities;
using Newtonsoft.Json;

        
namespace Models
{
    [Serializable] 
    [System.Xml.Serialization.XmlInclude(typeof(Model))]
    public class Script : Model, IStructureDependency
    {
        [Link] private Clock Clock;
        [Link] private Zone patch;
        [Link] private ISummary summary;
        [Link] private Soil Soil;
        [Link(IsOptional = true)] private IPlant existingCrop;
        [Link] private IPhysical soilPhysical;
        [Link] private ISoilWater waterBalance;
        [Link(Type = LinkType.Scoped, ByName = true)] private Zone Row;
        [Link(Type = LinkType.Scoped, ByName = true, IsOptional = true)] private Zone Alley;
        private double TopDUL;
        private double TopLL;
        private int nLayers;
        public IStructure Structure { private get; set; }
        //[Link] private Irrigation Irrigation;
        
       
        // Parameters from user interface
        [Separator("Manager for controlling automatic irrigation")]
        [Description(" Allow this manager to control irrigation?")]
        public bool AllowIrrigation { get; set; }
      
        [Separator(" Parameters for the irrigation system")]
        [Description(" Depth to calculate PAWC and deficit (mm)")]
        public double depthPAWC { get; set; }
        [Description(" Deficit to trigger irrigations (% PAWC)")]
        public double triggerDeficit { get; set; }
        [Description(" Irrigation amount to apply each event (mm)")]
        public double irrigateAmount { get; set; }
        [Description(" Minimum days for irrigation to return")]
        public double returndays { get; set; }
        
        [Description("Is the Alley zone irrigated?")]
        public bool IrrigateAlley {get; set;}

        //Class members
        [JsonIgnore] public double IrrigLayerSWDeficit { get; set; }
        [JsonIgnore] public double TopSWC { get; set; }
        [JsonIgnore] public double DaysSinceIrrigation { get; set; }
        [JsonIgnore] public double AmountToApply { get; set; }
        [JsonIgnore] public double SeasonAppliedAmount { get; set; }
        
        private bool IrrigationIsAllowed { get; set; }
        private bool CropIsActive { get; set; }
        private bool IrrigatorIsAvailable { get; set; }
        private bool SoilIsDry { get; set; }

    
        //Calculate static soil variables

        

        [EventSubscribe("StartOfSimulation")]
        private void OnStartOfSimulation(object sender, EventArgs e)
        {
            
            //Can we irrigate at all?
            IrrigationIsAllowed = false; 
            if (AllowIrrigation)
                IrrigationIsAllowed = true; 

            //Calculate soil water variables
            double depthFromSurface = 0.0;
            double fracLayer = 0.0;
            nLayers = soilPhysical.Thickness.Length;
            for (int layer = 0; layer < nLayers; layer++)
            {
                fracLayer = Math.Min(1.0, (depthPAWC - depthFromSurface) / soilPhysical.Thickness[layer]);
                TopLL += soilPhysical.LL15mm[layer] * fracLayer;
                TopDUL += soilPhysical.DULmm[layer] * fracLayer;
                depthFromSurface += soilPhysical.Thickness[layer];
                if (depthFromSurface >= depthPAWC)
                    layer = nLayers;
            }
        }
             
        //Determine daily requirement for irrigation
        [EventSubscribe("StartOfDay")]
        private void OnStartOfDay(object sender, EventArgs e)
        {
            AmountToApply = 0.0;
            DaysSinceIrrigation += 1;

            //Is the row crop actively growing?
            CropIsActive = false;
            double StageCode = (double)Structure.Get("STRUM.Phenology.Stage", relativeTo: Row);
            if ((StageCode > 3.0) && (StageCode<5.0))
            {
                CropIsActive = true;
            }
          
            //Is the irrigator available?
            IrrigatorIsAvailable = false;
            if (DaysSinceIrrigation >= returndays)
                IrrigatorIsAvailable = true;
          
            //Is the soil dry enough to require irrigation?
            SoilIsDry = false;
            double depthFromSurface = 0.0;
            double fracLayer = 0.0;
            TopSWC = 0.0;
            for (int layer = 0; layer < nLayers; layer++)
            //for (int layer = 0; depthFromSurface < depthPAWC + soilPhysical.Thickness[layer]; layer++)
            {
                fracLayer = Math.Min(1.0, (depthPAWC - depthFromSurface) / soilPhysical.Thickness[layer]);
                TopSWC += waterBalance.SWmm[layer] * fracLayer;
                depthFromSurface += soilPhysical.Thickness[layer];
                if (depthFromSurface >= depthPAWC)
                    layer = nLayers;
            }
            
            IrrigLayerSWDeficit = TopSWC - TopDUL;
            if (Math.Max(0.0, -IrrigLayerSWDeficit) >= (TopDUL - TopLL) * (100 - triggerDeficit) / 100)
                SoilIsDry = true;

            //Are all the conditions ratifying irrigation
            if (IrrigationIsAllowed && CropIsActive && IrrigatorIsAvailable && SoilIsDry)
            {
                //Lets irrigate well !!!!
                Irrigation irrigRow = (Irrigation)Structure.Get("Irrigation", relativeTo: Row);
                irrigRow.Apply(irrigateAmount, depth: 0);
                DaysSinceIrrigation = 0;
                if (IrrigateAlley)
                {
                   Irrigation irrigAlley = (Irrigation)Structure.Get("Irrigation", relativeTo: Alley);
                   irrigAlley.Apply(irrigateAmount , depth: 0);           
                }
            }
        }
    }
}
```
        RectangularZone Row: Length=100; Width=1.3; Slope=0; AspectAngle=0; Altitude=50
          Report RowZoneReport: EventNames=[Clock].DoReport
          Report Drainage: EventNames=[Clock].DoReport
            VariableNames:
              [Clock].Today
              sum of [Soil].SoilWater.Flux[6] from 2008-10-01 to 2011-03-08 as drainage
              [Soil].Water.MM[9] + [Soil].Water.MM[10] as SW_belowRoots
          SurfaceOrganicMatter: InitialResidueName=wheat_stubble; InitialResidueType=wheat; InitialResidueMass=500; InitialStandingFraction=0; InitialCPR=0; InitialCNR=100
          Fertiliser
          Irrigation
          Operations
            2008-09-16  [Irrigation].apply(15)
            2008-10-05  [Irrigation].apply(5)
            2008-10-06  [Irrigation].apply(6)
            2008-10-11  [Irrigation].apply(15)
            2008-10-18  [Irrigation].apply(16)
            2008-10-22  [Irrigation].apply(2)
            2008-10-25  [Irrigation].apply(12)
            2008-11-01  [Irrigation].apply(6)
            2008-11-04  [Irrigation].apply(20)
            2008-11-14  [Irrigation].apply(15)
            2008-11-19  [Irrigation].apply(15)
            2008-11-23  [Irrigation].apply(15)
            2008-11-27  [Irrigation].apply(15)
            2008-12-01  [Irrigation].apply(2)
            2008-12-03  [Irrigation].apply(15)
            2008-12-06  [Irrigation].apply(15)
            2008-12-13  [Irrigation].apply(9)
            2008-12-16  [Irrigation].apply(15)
            2008-12-24  [Irrigation].apply(16)
            2008-12-31  [Irrigation].apply(8)
            2009-01-04  [Irrigation].apply(15)
            2009-01-11  [Irrigation].apply(15)
            2009-01-18  [Irrigation].apply(15)
            2009-01-24  [Irrigation].apply(15)
            2009-01-30  [Irrigation].apply(15)
            2009-02-04  [Irrigation].apply(15)
            2009-02-12  [Irrigation].apply(18)
            2009-02-16  [Irrigation].apply(12)
            2009-02-20  [Irrigation].apply(7)
            2009-03-01  [Irrigation].apply(50)
            2009-03-22  [Irrigation].apply(25)
            2009-12-16  [Irrigation].apply(20)
            2009-12-21  [Irrigation].apply(20)
            2009-12-26  [Irrigation].apply(20)
            2010-01-03  [Irrigation].apply(20)
            2010-01-08  [Irrigation].apply(15)
            2010-03-17  [Irrigation].apply(20)
            2010-03-18  [Irrigation].apply(20)
            2010-03-19  [Irrigation].apply(20)
            2010-03-12  [Irrigation].apply(20)
            2010-10-28  [Irrigation].apply(15)
            2010-10-29  [Irrigation].apply(15)
            2010-11-30  [Irrigation].apply(15)
            2010-12-06  [Irrigation].apply(15)
            2010-12-07  [Irrigation].apply(15)
            2010-12-27  [Irrigation].apply(15)
            2011-01-02  [Irrigation].apply(15)
            2011-01-04  [Irrigation].apply(15)
            2011-01-29  [Irrigation].apply(15)
            2011-02-16  [Irrigation].apply(15)
          Manager WaterTable
            StartDate = 1-dec
            EndDate = 1-mar
```csharp
using Models.Zones;
using APSIM.Shared.Utilities;
using Models.Soils;
using System.Collections.Generic;
using Models.PMF;
using Models.Core;
using System;

namespace Models
{
    [Serializable]
    public class Script : Model
    {
        [Link] Clock Clock;
        [Link] Soil soil;
        [Link] Irrigation irrigation;
        [Description("Start of sowing window (d-mmm)")]
        public string StartDate { get; set; }
        [Description("End of sowing window (d-mmm)")]
        public string EndDate { get; set; }

        [EventSubscribe("StartOfDay")]
        private void OnStartOfDay(object sender, EventArgs e)
        {
        if (DateUtilities.WithinDates(StartDate, Clock.Today, EndDate))
            irrigation.Apply(2, 700);
        }
    }
}
```
          Manager DAS
            DAS = 0
```csharp
using Models.Soils;
using System;
using Models.Core;
using System.Collections.Generic;
using System.Text;
using Models.PMF;
using Models;
using System.Xml.Serialization;
using APSIM.Shared.Utilities;
using System.Data;

namespace Models
{
    [Serializable] 
    //[System.Xml.Serialization.XmlInclude(typeof(Model))]
    public class Script : Model
    {
        
    
        
        
        [Description("Days after start")]
        public double DAS { get; set; }
        
         [EventSubscribe("StartOfSimulation")]
        private void DoStartOfSimulation(object sender, EventArgs e)
        {
            DAS = 0;
        }
        
        [EventSubscribe("DoReportCalculations")]
        private void OnDoReportCalculations(object sender, EventArgs e)
        {
            DAS += 1;
        }
    
    }
}
```
          Manager AutomaticFertiliser
            Fertilise = True
            Season_Start = 1-Aug
            Season_End = 30-Apr
            Season_Allocation = 100000
            TriggerN = 50
            NApplicationAmount = 25
            Return_days = 3
            Top_Depth = 600
```csharp
using Newtonsoft.Json;
using Models.PMF.Phen;
using Models.Soils.Nutrients;
using Models.Interfaces;
using APSIM.Shared.Utilities;
using Models.PMF;
using System.Xml.Serialization;
using Models.Soils;
using Models.Core;
using System;
using Models.PMF.Organs;

        
namespace Models
{
    [Serializable] 
    [System.Xml.Serialization.XmlInclude(typeof(Model))]
    public class Script : Model
    {
        [Link] private ISummary summary;
        [Link] private Fertiliser Fertiliser;
        [Link] private Clock Clock;
        [Link] private Plant SCRUM;
        [Link(ByName = true)]
        private ISolute NO3;
        [Link] private Soils.Soil Soil;
        [Link(Type = LinkType.Path, Path = "[STRUM].Root.Network")]
        private RootNetwork root;
        [Link(Type = LinkType.Path, Path = "[STRUM].Phenology")]
        private Phenology phenology;
        [Link]
        private IPhysical soilPhysical;
        //Communication to other modules
       
        //User inputs from properties tab
        [Description("Fertilise (tick for yes)")]
        public bool Fertilise { get; set; }
        [Description("SeasonStart (dd-MMM)")]
        public string Season_Start { get; set; }
        [Description("SeasonEnd (dd-MMM)")]
        public string Season_End { get; set; }
        [Description("Season Allocation (kg/ha)")]
        public double Season_Allocation { get; set; }
        [Description("Mineral N to maintain soil above (kg/ha)")]
        public double TriggerN { get; set; }
        [Description("Amount of N to apply (kg/ha)")]
        public double NApplicationAmount { get; set; }
        [Description("Minimum days for Fertiliser spreader to return")]
        public double Return_days { get; set; }
        [Description("Depth to calculate mineral N (mm)")]
        public double Top_Depth { get; set; }
       
        //Class members
        [JsonIgnore] private bool FertiliserIsAvailable { get; set; }
        [JsonIgnore] public bool SeasonIsOpen { get; set; }
        [JsonIgnore] private bool CropIsActive { get; set; }
        [JsonIgnore] private bool FertSpreaderIsAvailable { get; set; }
        [JsonIgnore] private bool SoilNIsLow { get; set; }
        [JsonIgnore] public double Top_SoilN { get; set; }
        [JsonIgnore] public double Accumulated_depth { get; set; }
        [JsonIgnore] public double Days_since_fertiliser { get; set; }
        [JsonIgnore] public double Season_Application { get; set; }
        
        //Variables for date logic testing
        [JsonIgnore] public string StartString { get; set; }
        [JsonIgnore] public string EndString { get; set; }
        [JsonIgnore] public DateTime StartDate { get; set; }
        [JsonIgnore] public DateTime EndDate { get; set; }
        [JsonIgnore] public int TodayYear { get; set; }
        [JsonIgnore] public int TodayMonth { get; set; }
        [JsonIgnore] public int StartMonth { get; set; }
        [JsonIgnore] public int EndMonth { get; set; }
        [JsonIgnore] public int TodayDay { get; set; }
        [JsonIgnore] public int StartDay { get; set; }
        [JsonIgnore] public int EndDay { get; set; }
              
        //Determine daily requirement for fertiliser
        [EventSubscribe("StartOfDay")]
        private void OnStartOfDay(object sender, EventArgs e)
        { 
            //Can we irrigate?
            FertiliserIsAvailable = false; 
            if (Fertilise)
                FertiliserIsAvailable = true; 
    
            //Are we Allowed to Irrigate?
            TodayYear = Clock.Today.Year;
            StartString = Season_Start + "-" + TodayYear.ToString();
            EndString = Season_End + "-" + TodayYear.ToString();
            StartDate = DateTime.Parse(StartString);
            EndDate = DateTime.Parse(EndString);
            TodayMonth = Clock.Today.Month;
            TodayDay = Clock.Today.Day;
            StartDay = StartDate.Day;
            StartMonth = StartDate.Month;
            EndDay = EndDate.Day;
            EndMonth = EndDate.Month;
          
            SeasonIsOpen = false;
            //if we are in the spring and after the start date then yes
            if ((Clock.Today.Month > 6) && (Clock.Today >= StartDate))
                SeasonIsOpen = true;
            //if we are in the autumn and before the end date then yes
            if ((Clock.Today.Month <= 6) && (Clock.Today <= EndDate))
                SeasonIsOpen = true;
          
            //Is there a crop in the ground that needs irrigation?
            //CropIsActive = false;
            //if ((phenology.Stage >= 3.0) && (phenology.Stage < 6.0))
            CropIsActive = true;
          
            //Is the irrigator available?
            FertSpreaderIsAvailable = false;
            Days_since_fertiliser += 1;
            if (Days_since_fertiliser >= Return_days)
                FertSpreaderIsAvailable = true;
          
            //Is the soil N low enough to require fertiliser?
            SoilNIsLow = false;
            double CurrentRootDepth = 0;
            double RootDepth = root.Depth;
            CurrentRootDepth = Math.Max(RootDepth, CurrentRootDepth);
          
            Accumulated_depth = 0;
            Top_SoilN = 0;
            for (int layer = 0; Accumulated_depth < Top_Depth; layer++)
            {
                Top_SoilN += NO3.kgha[layer];
                Accumulated_depth += soilPhysical.Thickness[layer];
            }
            if (Top_SoilN <= TriggerN)
                SoilNIsLow = true;
                
            //Lets bloody well irrigate then!!!!
            if ((FertiliserIsAvailable) && (SeasonIsOpen) && (CropIsActive) && (FertSpreaderIsAvailable) && (SoilNIsLow)) //The conditions are rife for irrigation
            {
                Fertiliser.Apply(NApplicationAmount, "UreaN", 10);
                Days_since_fertiliser = 0;
                Season_Application += NApplicationAmount;
                summary.WriteMessage(this, "Automatic Fertiliser", MessageType.Diagnostic);
            
            }
        }
    }
}
```
          Plant STRUM
          Soil KaiapoSiltLoam: same as NZ AppleExperiments.Apple_Dwarf.Factors._.Parameterised.KaiapoSiltLoam
          StrumTreeInstance Apple: TreeType=Deciduous; RowSpacing=3.5; InterRowSpacing=1.5; AlleyZoneWidthFrac=0.2; BudBreakDate=30-Aug; StartFullCanopyDate=24-Oct; StartLeafFallDate=7-May; EndLeafFallDate=27-May; DBHatMaturity=20; TypicalCanopyArea=5.6; WoodBulkDensity=650; WoodStorageFraction=0; MaximumLeafBiomass=500; MaximumRootBiomass=300; AgeAtSimulationStart=6; YearsToMaxDimension=5; CrownShape=0; MatureCanopyBaseHeight=1; MaturePrunedCanopyBaseHeight=1; MatureHeight=3.5; MaturePrunedHeight=3; MatureWidth=3; MaturePrunedWidth=2; FRemoveSummerPrune=0; RootNConc=0.01; LeafNConc=0.02; WoodNConc=0.005; FruitNConc=0.02; NFixationFrac=0; GRINZ=true; MaxRD=3; ExtinctCoeff=0.8; BaseCover=0; MaxCover=0.92; RUE=1.1; PSBaseT=5; PSLOptT=20; PSUOptT=25; PSMaxT=35; GSMax=0.006; R50=10; SurfaceKL=0.1; WaterStress=true; Number=45; PotentialFWPerFruit=175; DMC=0.14; FruitDensity=0.75; DateMaxBloom=15-Sep; DAFStartLinearGrowth=70; DAFEndLinearGrowth=200; DAFMaxSize=230
        RectangularZone Alley: Length=100; Width=2.2; Slope=0; AspectAngle=0; Altitude=50
          Report AlleyZoneReport: EventNames=[Clock].DoReport
          Report Drainage: EventNames=[Clock].DoReport
            VariableNames:
              [Clock].Today
              sum of [Soil].SoilWater.Flux[6] from 2008-10-01 to 2011-03-08 as drainage
              [Soil].Water.MM[9] + [Soil].Water.MM[10] as SW_belowRoots
          SurfaceOrganicMatter: InitialResidueName=wheat_stubble; InitialResidueType=wheat; InitialResidueMass=500; InitialStandingFraction=0; InitialCPR=0; InitialCNR=100
          Fertiliser
          Irrigation
          Operations: same as NZ AppleExperiments.Apple_Dwarf._Dwarf.Row.Operations
          Manager WaterTable: same as NZ AppleExperiments.Apple_Dwarf._Dwarf.Row.WaterTable
          Manager DAS: same as NZ AppleExperiments.Apple_Dwarf._Dwarf.Row.DAS
          Plant SPRUM
          SprumPastureInstance BasePasture: AgeAtSimulationStart=1; YearsToMaxDimension=1; RUE=0.8; Presidue=0; RsenRate=0; Proot=0.1; PSBaseT=5; PSLOptT=20; PSUOptT=25; PSMaxT=35; GRINZ=true; MaxRD=700; MaxHeight=300; MaxPrunedHeight=100; MaxCover=0.98; MinCover=0.5; ExtinctCoeff=0.5; RegrowthDuration=400; FullCanopyDuration=0; BaseT=3; OptT=25; MaxT=35; RootNConc=0.01; LeafNConc=0.05; ResidueNConc=0.01; LegumePropn=0; GSMax=0.004; R50=150; SurfaceKL=0.1; WaterStress=true
          BiomassRemovalEvents Mow: NameOfPlantToRemoveFrom=SPRUM; RemovalType=0
            BiomassRemovalFractions:
              PlantName  OrganName  TypeString  LiveToRemove  DeadToRemove  LiveToResidue  DeadToResidue
              SPRUM      Residue    Cutting     0             0             0.5            0.5
              SPRUM      Leaf       Cutting     0             0             1              1
              SPRUM      Nodule     Cutting     0             0             0              0
              SPRUM      Root       Cutting     0             0             0              0
          Soil KaiapoSiltLoam: same as NZ AppleExperiments.Apple_Dwarf.Factors._.Parameterised.KaiapoSiltLoam
        Manager ResetDate
          ResetDate = 01-Jul
```csharp
using Newtonsoft.Json;
using Models.PMF.Organs;
using Models.Soils.Nutrients;
using Models.Interfaces;
using System;
using Models.Core;
using System.Collections.Generic;
using System.Text;
using Models.Soils;
using Models.PMF;
using Models;
using System.Xml.Serialization;
using APSIM.Shared.Utilities;
using Models.Climate;



namespace Models
{
    [Serializable] 
    //[System.Xml.Serialization.XmlInclude(typeof(Model))]
    public class Script : Model
    {
    
     [Link] private Clock Clock;
        
    [Separator("Helper script to summarise variables")]
    [Description(" Date to reset the day counter: ")]
    public string ResetDate { get; set; }
                  
        [JsonIgnore] public double SimulationYear { get; set; }
        [JsonIgnore] public double DAS { get; set; }
        
         [EventSubscribe("StartOfSimulation")]
        private void DoStartOfSimulation(object sender, EventArgs e)
        {
                DAS = 0;
                SimulationYear = Clock.Today.Year;
        }
        
        [EventSubscribe("StartOfDay")]
        private void OnStartOfDay(object sender, EventArgs e)
        {
            DAS += 1;
            if (DateUtilities.DatesAreEqual(ResetDate, Clock.Today.Date))
            //if (DateUtilities.DatesAreEqual("Jul-1", Clock.Today.Date))
            {
                SimulationYear += 1;
                DAS = 1;
                
            }
        }
    
    }
}
```
      Memo Reason why drainage looks bad
        The flux meters were flooded by a rising water table so the drainage observations are not representative of actual drainage
    Experiment Apple_Tall (disabled)
      Factors
        Factor _
          CompositeFactor Parameterised: Specifications=[Soil]
            Soil KaiapoSiltLoam: ASCOrder=G; SoilType=Typic Orthic Gley Soil; LocalName=Kaiapo Silt Loam; Country=New Zealand; Latitude=-41; Longitude=174
              DataSource=Based on data collect on site (Growing Futures) complemented with information from Smap (Flaxton_69), plus PTFs (R.Cichota)
              Physical
                Thickness  ParticleSizeSand  ParticleSizeSilt  ParticleSizeClay  Rocks  BD     AirDry  LL15   DUL    SAT    KS
                100        1.1               69.1              29.8              0      1.217  0.09    0.27   0.472  0.539  5790
                100        1.2               70                28.8              0      1.344  0.091   0.272  0.458  0.484  1270
                150        1.4               70.8              27.9              0      1.406  0.092   0.277  0.413  0.466  1402
                150        1.4               73.7              25                0      1.233  0.075   0.225  0.423  0.51   1209
                150        1.3               73.2              25.6              0      1.218  0.078   0.233  0.413  0.519  674
                150        1                 72.3              26.8              0      1.188  0.084   0.253  0.403  0.518  266
                200        1.6               73.1              25.3              0      1.179  0.083   0.249  0.411  0.519  136
                250        2.3               73.9              23.9              0      1.183  0.08    0.241  0.429  0.522  46
                250        1.6               59.2              39.2              0      1.183  0.079   0.237  0.445  0.52   40
                250        1                 44.6              54.5              25     0.887  0.058   0.175  0.345  0.388  35
                1250       1                 44.6              54.5              30     0.828  0.054   0.163  0.322  0.362  35
                SoilCrop SPRUMSoil
                  LL=[0.27, 0.272, 0.277, 0.225, 0.233, 0.253, 0.249, 0.241, 0.237, 0.175, 0.163]
                  KL=[0.117, 0.11, 0.065, 0.06, 0.04, 0.15, 0.1, 0.007, 0.007, 0.005, 0.005]
                  XF=[1, 1, 0.9, 0.85, 0.85, 0.65, 0.65, 0.6, 0.6, 0.5, 0.5]
                SoilCrop SCRUMSoil
                  LL=[0.27, 0.272, 0.277, 0.225, 0.233, 0.253, 0.249, 0.241, 0.237, 0.175, 0.163]
                  KL=[0.0778659, 0.0778659, 0.0778659, 0.0778659, 0.0778659, 0.0778659, 0.0778659, 0.0778659, 0.0778659, 0.0778659, 0.0778659]
                  XF=[1, 1, 0.9, 0.85, 0.85, 0.65, 0.65, 0.6, 0.6, 0.5, 0.5]
                SoilCrop STRUMSoil
                  LL=[0.27, 0.272, 0.277, 0.225, 0.233, 0.253, 0.249, 0.241, 0.237, 0.175, 0.163]
                  KL=[0.115, 0.11, 0.07, 0.06, 0.04, 0.02, 0.015, 0.012, 0.008, 0.005, 0.003]
                  XF=[1, 1, 0.9, 0.85, 0.85, 0.65, 0.65, 0.6, 0.6, 0.5, 0.5]
              WaterBalance SoilWater: SummerDate=1-oct; SummerU=9; SummerCona=4.4; WinterDate=1-apr; WinterU=4; WinterCona=2; DiffusConst=88; DiffusSlope=35; Salb=0.13; CN2Bare=92; CNRed=15; CNCov=0.8; PSIDul=-100
                Thickness  SWCON  KLAT
                155        0.35   0
                300        0.3    0
                140        0.25   0
                1405       0.2    0
              Organic: FOMCNRatio=40; CarbonUnits=Total
                Thickness  Carbon  SoilCNRatio  FBiom  FInert  FOM
                100        2.99    10.3         0.05   0.628   358.4
                100        2.03    10.7         0.038  0.991   252.7
                150        1.25    10.7         0.011  0.998   205.5
                150        0.86    10.7         0.008  0.998   97.1
                150        0.69    10.7         0.008  0.997   45.9
                150        0.58    10.7         0.008  0.996   21.7
                200        0.46    10.7         0.008  0.995   12.3
                250        0.4     10.7         0.008  0.997   5.1
                250        0.36    10.7         0.008  0.997   1.5
                250        0.31    10.7         0.008  0.996   0
                1250       0.24    10.7         0.008  0.995   0
              Chemical: PHUnits=Water
                Thickness  PH  CEC
                100        7   21
                100        7   19
                300        7   14
                500        7   12
                2000       7   12
              Nutrient
              SoilTemperature Temperature: InteractionsPerDay=8
              Water: Thickness=[100, 100, 150, 150, 150, 150, 200, 250, 250, 250, 1250]; FilledFromTop=false
                InitialValues=[0.472, 0.458, 0.413, 0.423, 0.413, 0.403, 0.411, 0.429, 0.445, 0.345, 0.322]
              Solute NO3: Thickness=[100, 100, 300, 500, 1000]; InitialValues=[10, 9, 2, 1, 0.5]; InitialValuesUnits=kg/ha; WaterTableConcentration=0; D0=0; DepthConstant=0; MaxDepthSoluteAccessible=0; RunoffEffectivenessAtMovingSolute=0; MaxEffectiveRunoff=0
              Solute NH4: Thickness=[100, 100, 300, 500, 1000]; InitialValues=[1.5, 1.25, 0.5, 0.1, 0]; InitialValuesUnits=kg/ha; WaterTableConcentration=0; D0=0; DepthConstant=0; MaxDepthSoluteAccessible=0; RunoffEffectivenessAtMovingSolute=0; MaxEffectiveRunoff=0
              Solute Urea: Thickness=[100, 100, 300, 500, 1000]; InitialValues=[0, 0, 0, 0, 0]; InitialValuesUnits=ppm; WaterTableConcentration=0; D0=0; DepthConstant=0; MaxDepthSoluteAccessible=0; RunoffEffectivenessAtMovingSolute=0; MaxEffectiveRunoff=0
              OutputLayers: Thickness=[300, 300, 300, 300, 300, 300]
          CompositeFactor SMAP: Specifications=[Soil]
            Soil Flaxton_69a1: ASCOrder=G; SoilType=Typic Orthic Gley Soils; LocalName=Flaxton_69a1; Country=New Zealand; Latitude=-41; Longitude=174
              DataSource=Profile descriptions provided by Smap based on the work done by Trevor Webb.
              Physical
                Thickness  ParticleSizeSand  ParticleSizeSilt  ParticleSizeClay  Rocks  BD     AirDry  LL15   DUL    SAT    KS
                77         5.5               64.5              30                0      1.191  0.101   0.202  0.425  0.492  960
                78         5.5               64.5              30                0      1.191  0.101   0.202  0.425  0.492  960
                150        5.5               69.5              25                0      1.295  0.152   0.201  0.389  0.454  480
                150        5.5               69.5              25                0      1.295  0.152   0.201  0.389  0.454  480
                140        3                 54.5              42.5              0      1.247  0.299   0.299  0.444  0.472  360
                234        3                 62.5              34.5              0      1.234  0.259   0.259  0.471  0.477  96
                234        3                 62.5              34.5              0      1.234  0.259   0.259  0.471  0.477  96
                234        3                 62.5              34.5              0      1.234  0.259   0.259  0.471  0.477  96
                234        3                 62.5              34.5              0      1.234  0.259   0.259  0.471  0.477  96
                234        3                 62.5              34.5              0      1.234  0.259   0.259  0.471  0.477  96
                235        3                 62.5              34.5              0      1.234  0.259   0.259  0.471  0.477  96
                1000       3                 62.5              34.5              0      1.234  0.259   0.259  0.471  0.477  96
                SoilCrop STRUMSoil
                  LL=[0.202, 0.202, 0.201, 0.201, 0.299, 0.259, 0.259, 0.259, 0.259, 0.259, 0.259, 0.259]
                  KL=[0.117, 0.117, 0.06, 0.06, 0.037, 0.007, 0.007, 0.007, 0.007, 0.007, 0.007, 0.007]
                  XF=[1, 1, 0.834, 0.834, 0.834, 0.581, 0.581, 0.581, 0.581, 0.581, 0.581, 0.581]
                SoilCrop SPRUMSoil
                  LL=[0.202, 0.202, 0.201, 0.201, 0.299, 0.259, 0.259, 0.259, 0.259, 0.259, 0.259, 0.259]
                  KL=[0.11, 0.11, 0.037, 0.037, 0.015, 0.006, 0.006, 0.006, 0.006, 0.006, 0.006, 0.006]
                  XF=[1, 1, 0.687, 0.687, 0.687, 0.472, 0.472, 0.472, 0.472, 0.472, 0.472, 0.472]
              Organic: FOMCNRatio=40; CarbonUnits=Total
                Thickness  Carbon    SoilCNRatio  FBiom      FInert    FOM
                50         6         10.5         0.0788566  0.431898  245.637
                50         6         10.5         0.0610103  0.491926  238.271
                50         6         10.5         0.0477893  0.542739  191.801
                50         4.94864   10.5         0.037995   0.5956    149.375
                50         3.38311   10.5         0.0307392  0.650815  116.333
                50         2.3337    10.5         0.025364   0.69947   90.6003
                50         1.63026   10.5         0.0213819  0.742644  70.5596
                50         1.15873   10.5         0.0184319  0.781204  54.9518
                50         0.842658  10.5         0.0162465  0.815767  42.7965
                50         0.630787  10.5         0.0146275  0.846679  33.33
                250        0.32975   10.5         0.0118814  0.917701  0
                250        0.21756   10.5         0.0104198  0.97694   0
                500        0.200874  10.5         0.0100442  0.990833  0
                500        0.200016  10.5         0.0100022  0.996255  0
              Chemical: PHUnits=Water
                Thickness  PH  CEC
                155        7   22.9065
                300        7   14.7115
                140        7   15.9531
                1405       7   13.85
              Water: Thickness=[155, 300, 140, 1405]; InitialValues=[0.425, 0.389, 0.444, 0.471]; FilledFromTop=false
              WaterBalance SoilWater: same as NZ AppleExperiments.Apple_Tall.Factors._.Parameterised.KaiapoSiltLoam.SoilWater
              SoilTemperature Temperature: InteractionsPerDay=8
              Solute NO3: same as NZ AppleExperiments.Apple_Dwarf.Factors._.SMAP2.Hastings_silt_loam.NO3
              Solute NH4: same as NZ AppleExperiments.Apple_Dwarf.Factors._.SMAP2.Hastings_silt_loam.NH4
              Solute Urea: same as NZ AppleExperiments.Apple_Dwarf.Factors._.SMAP2.Hastings_silt_loam.Urea
              Nutrient
              OutputLayers: Thickness=[300, 300, 300, 300, 300, 300]
      Simulation Tall
        Memo ExperimentDescription
          *	Based on Green et al 2013 - PFR report for the Hawkes Bay Regional Council

          * 	Location: Hastings, NZ

          *	Cultivar: Pink Lady

          *	Transpiration measured using sap flow sensors.
        Clock: Start=2008-06-21; End=2011-07-01
        Summary SummaryFile
        Weather: FileName=MetFiles/Whakatu.met
        MicroClimate: a_interception=0; b_interception=1; c_interception=0; d_interception=0; SoilHeatFluxFraction=0.4; MinimumHeightDiffForNewLayer=0; NightInterceptionFraction=0.5; ReferenceHeight=2
        SoilArbitrator Soil Arbitrator
        ZoneAgregate
        Report ZoneAgregateReport: EventNames=[Clock].DoReport
          VariableNames:
            [Clock].Today
            [ZoneAgregate].SimulationArea
            [ZoneAgregate].EO
            [ZoneAgregate].ES
            [ZoneAgregate].ET
            [ZoneAgregate].IncommingRadiation
            [ZoneAgregate].GreenAreaRadiationInterception
            [ZoneAgregate].DeadMaterialRadiationInterception
            [ZoneAgregate].FRadIntGreen
            [ZoneAgregate].FRadIntDead
            [ZoneAgregate].Irrigation
            [ZoneAgregate].Nitrogen
        RectangularZone Row: Length=100; Width=1.3; Slope=0; AspectAngle=0; Altitude=50
          Report RowZoneReport: EventNames=[Clock].DoReport
          Report Drainage: EventNames=[Clock].DoReport
            VariableNames:
              [Clock].Today
              sum of [Soil].SoilWater.Flux[6] from 2008-10-01 to 2011-03-08 as drainage
              [Soil].Water.MM[9] + [Soil].Water.MM[10] as SW_belowRoots
          Soil: Latitude=0; Longitude=0
            LayerStructure: Thickness=[200, 200, 200, 200, 200, 200, 300, 300, 400, 800]
            Chemical: PHUnits=Water
              Thickness  PH   CEC
              100        6.6  12.44
              200        6.2  11.6525
              300        5.7  11.045
              300        5.5  10.6625
              300        5.5  9.4025
              300        5.5  9.4025
              CEC source: Calculated
            Water: Thickness=[300, 300, 300, 300, 300, 300, 1200]; InitialValues=[0.37, 0.37, 0.378, 0.421, 0.412, 0.395, 0.395]; FilledFromTop=false
            WaterBalance SoilWater: SummerDate=1-Nov; SummerU=9; SummerCona=4.4; WinterDate=1-Apr; WinterU=9; WinterCona=4.4; DiffusConst=88; DiffusSlope=35.4; Salb=0.3; CN2Bare=68; CNRed=20; CNCov=0.8; DischargeWidth=0; CatchmentArea=0; PSIDul=-100
              Thickness  SWCON  KLAT
              300        0.55   0
              300        0.55   0
              300        0.55   0
              300        0.55   0
              300        0.1    0
              300        0.02   0
              400        0.02   0
              800        0      0
            Organic: FOMCNRatio=30; CarbonUnits=Total
              Thickness  Carbon  SoilCNRatio  FBiom  FInert  FOM
              100        1.82    11.5         0.025  0.3     1243.93
              200        1.47    11.5         0.025  0.4     833.832
              300        1.2     11.5         0.015  0.75    457.617
              300        1.03    11.5         0.01   0.9     251.145
              300        0.47    11.5         0.01   0.96    137.831
              300        0.47    11.5         0.01   0.96    75.6435
            OutputLayers: Thickness=[300, 300, 300, 300, 300, 300]
            Solute NO3: Thickness=[100, 200, 300, 300, 300, 300]; InitialValues=[217, 15, 1.66667, 1.66667, 0, 0]; InitialValuesUnits=ppm; WaterTableConcentration=0; D0=0; DepthConstant=0; MaxDepthSoluteAccessible=0; RunoffEffectivenessAtMovingSolute=0; MaxEffectiveRunoff=0
            Solute NH4: Thickness=[100, 200, 300, 300, 300, 300]; InitialValues=[0, 0, 0, 0, 0, 0]; InitialValuesUnits=ppm; WaterTableConcentration=0; D0=0; DepthConstant=0; MaxDepthSoluteAccessible=0; RunoffEffectivenessAtMovingSolute=0; MaxEffectiveRunoff=0
            Solute Urea: Thickness=[100, 200, 300, 300, 300, 300]; InitialValues=[0, 0, 0, 0, 0, 0]; InitialValuesUnits=kg/ha; WaterTableConcentration=0; D0=0; DepthConstant=0; MaxDepthSoluteAccessible=0; RunoffEffectivenessAtMovingSolute=0; MaxEffectiveRunoff=0
            Physical
              Thickness  ParticleSizeSand  ParticleSizeSilt  ParticleSizeClay  Rocks     BD  AirDry  LL15  DUL   SAT   KS
              300        5                 65                30                0.136527  1   0.2     0.2   0.4   0.5   100
              300        5                 65                30                0.136527  1   0.2     0.2   0.4   0.5   100
              300        5                 65                30                0.136527  1   0.25    0.25  0.4   0.5   50
              300        5                 65                30                0.136527  1   0.2     0.2   0.46  0.5   40
              300        5                 65                30                0.136527  1   0.2     0.2   0.45  0.5   40
              300        5                 65                30                0         1   0.2     0.2   0.43  0.53  40
              1200       5                 65                30                0         1   0.2     0.2   0.43  0.53  40
              Rocks, ParticleSizeSand, ParticleSizeSilt, ParticleSizeClay source: Calculated
              SoilCrop STRUMSoil: LL=[0.2, 0.2, 0.2, 0.2, 0.2, 0.2, 0.2]; KL=[0.1, 0.1, 0.1, 0.1, 0.1, 0.1, 0.1]; XF=[1, 1, 1, 1, 1, 1, 1]
              SoilCrop SPRUMSoil: LL=[0.2, 0.2, 0.2, 0.2, 0.2, 0.2, 0.2]; KL=[0.11, 0.11, 0.11, 0.11, 0.11, 0.11, 0.11]; XF=[1, 1, 1, 1, 1, 1, 1]
            Nutrient
            SoilTemperature Temperature: InteractionsPerDay=8
          SurfaceOrganicMatter: InitialResidueName=wheat_stubble; InitialResidueType=wheat; InitialResidueMass=500; InitialStandingFraction=0; InitialCPR=0; InitialCNR=100
          StrumTreeInstance Apple: TreeType=Deciduous; RowSpacing=3.5; InterRowSpacing=1.5; AlleyZoneWidthFrac=0.65; BudBreakDate=1-Sep; StartFullCanopyDate=15-nov; StartLeafFallDate=30-Apr; EndLeafFallDate=29-May; DBHatMaturity=20; TypicalCanopyArea=5.6; WoodBulkDensity=650; WoodStorageFraction=0; MaximumLeafBiomass=500; MaximumRootBiomass=300; AgeAtSimulationStart=6; YearsToMaxDimension=6; CrownShape=0; MatureCanopyBaseHeight=1; MaturePrunedCanopyBaseHeight=1; MatureHeight=3.5; MaturePrunedHeight=3; MatureWidth=3; MaturePrunedWidth=2; FRemoveSummerPrune=0; RootNConc=0.01; LeafNConc=0.02; WoodNConc=0.005; FruitNConc=0.02; NFixationFrac=0; GRINZ=true; MaxRD=3; ExtinctCoeff=0.8; BaseCover=0; MaxCover=0.95; RUE=1.1; PSBaseT=5; PSLOptT=20; PSUOptT=25; PSMaxT=35; GSMax=0.006; R50=100; SurfaceKL=0.1; WaterStress=true; Number=45; PotentialFWPerFruit=175; DMC=0.14; FruitDensity=0.75; DateMaxBloom=5-Oct; DAFStartLinearGrowth=70; DAFEndLinearGrowth=200; DAFMaxSize=230
          Fertiliser
          Irrigation
          Operations
            2008-09-16  [Irrigation].apply(15)
            2008-10-05  [Irrigation].apply(5)
            2008-10-06  [Irrigation].apply(6)
            2008-10-11  [Irrigation].apply(15)
            2008-10-18  [Irrigation].apply(16)
            2008-10-22  [Irrigation].apply(2)
            2008-10-25  [Irrigation].apply(12)
            2008-11-01  [Irrigation].apply(6)
            2008-11-04  [Irrigation].apply(20)
            2008-11-14  [Irrigation].apply(15)
            2008-11-19  [Irrigation].apply(15)
            2008-11-23  [Irrigation].apply(15)
            2008-11-27  [Irrigation].apply(15)
            2008-12-01  [Irrigation].apply(2)
            2008-12-03  [Irrigation].apply(15)
            2008-12-06  [Irrigation].apply(15)
            2008-12-13  [Irrigation].apply(9)
            2008-12-16  [Irrigation].apply(15)
            2008-12-24  [Irrigation].apply(16)
            2008-12-31  [Irrigation].apply(8)
            2009-01-04  [Irrigation].apply(15)
            2009-01-11  [Irrigation].apply(15)
            2009-01-18  [Irrigation].apply(15)
            2009-01-24  [Irrigation].apply(15)
            2009-01-30  [Irrigation].apply(15)
            2009-02-04  [Irrigation].apply(15)
            2009-02-12  [Irrigation].apply(18)
            2009-02-16  [Irrigation].apply(12)
            2009-02-20  [Irrigation].apply(7)
            2009-03-01  [Irrigation].apply(50)
            2009-03-22  [Irrigation].apply(25)
            2009-12-16  [Irrigation].apply(20)
            2009-12-21  [Irrigation].apply(20)
            2009-12-26  [Irrigation].apply(20)
            2010-01-03  [Irrigation].apply(20)
            2010-01-08  [Irrigation].apply(15)
            2010-03-17  [Irrigation].apply(20)
            2010-03-18  [Irrigation].apply(20)
            2010-03-19  [Irrigation].apply(20)
            2010-03-12  [Irrigation].apply(20)
            2010-10-28  [Irrigation].apply(15)
            2010-10-29  [Irrigation].apply(15)
            2010-11-30  [Irrigation].apply(15)
            2010-12-06  [Irrigation].apply(15)
            2010-12-07  [Irrigation].apply(15)
            2010-12-27  [Irrigation].apply(15)
            2011-01-02  [Irrigation].apply(15)
            2011-01-04  [Irrigation].apply(15)
            2011-01-29  [Irrigation].apply(15)
            2011-02-16  [Irrigation].apply(15)
          Manager WaterTable
            StartDate = 1-dec
            EndDate = 1-mar
```csharp
using Models.Zones;
using APSIM.Shared.Utilities;
using Models.Soils;
using System.Collections.Generic;
using Models.PMF;
using Models.Core;
using System;

namespace Models
{
    [Serializable]
    public class Script : Model
    {
        [Link] Clock Clock;
        [Link] Soil soil;
        [Link] Irrigation irrigation;
        [Description("Start of sowing window (d-mmm)")]
        public string StartDate { get; set; }
        [Description("End of sowing window (d-mmm)")]
        public string EndDate { get; set; }

        [EventSubscribe("StartOfDay")]
        private void OnStartOfDay(object sender, EventArgs e)
        {
        if (DateUtilities.WithinDates(StartDate, Clock.Today, EndDate))
            irrigation.Apply(2, 1800);
        }
    }
}
```
          Manager DAS
            DAS = 0
            script: same as in NZ AppleExperiments.Apple_Dwarf._Dwarf.Row.DAS
          Plant STRUM
          Manager AutomaticFertiliser
            Fertilise = True
            Season_Start = 1-Aug
            Season_End = 30-Apr
            Season_Allocation = 100000
            TriggerN = 50
            NApplicationAmount = 25
            Return_days = 3
            Top_Depth = 600
            script: same as in NZ AppleExperiments.Apple_Dwarf._Dwarf.Row.AutomaticFertiliser
        RectangularZone Alley: Length=100; Width=2.2; Slope=0; AspectAngle=0; Altitude=50
          Report AlleyZoneReport: EventNames=[Clock].DoReport
          Report Drainage: EventNames=[Clock].DoReport
            VariableNames:
              [Clock].Today
              sum of [Soil].SoilWater.Flux[6] from 2008-10-01 to 2011-03-08 as drainage
              [Soil].Water.MM[9] + [Soil].Water.MM[10] as SW_belowRoots
          Soil: Latitude=0; Longitude=0
            LayerStructure: Thickness=[200, 200, 200, 200, 200, 200, 300, 300, 400, 800]
            Chemical: Thickness=[100, 200, 300, 300, 300, 300]; PH=[6.6, 6.2, 5.7, 5.5, 5.5, 5.5]; PHUnits=Water
            Water: Thickness=[300, 300, 300, 300, 300, 300, 1200]; InitialValues=[0.4, 0.4, 0.4, 0.46, 0.45, 0.43, 0.43]; FilledFromTop=false
            WaterBalance SoilWater: same as NZ AppleExperiments.Apple_Tall.Tall.Row.Soil.SoilWater
            Organic: same as NZ AppleExperiments.Apple_Tall.Tall.Row.Soil.Organic
            OutputLayers: Thickness=[300, 300, 300, 300, 300, 300]
            Solute NO3: same as NZ AppleExperiments.Apple_Tall.Tall.Row.Soil.NO3
            Solute NH4: same as NZ AppleExperiments.Apple_Tall.Tall.Row.Soil.NH4
            Solute Urea: same as NZ AppleExperiments.Apple_Tall.Tall.Row.Soil.Urea
            Physical
              Thickness  BD  AirDry  LL15  DUL   SAT   KS
              300        1   0.2     0.2   0.4   0.5   100
              300        1   0.2     0.2   0.4   0.5   100
              300        1   0.25    0.25  0.4   0.5   50
              300        1   0.2     0.2   0.46  0.5   40
              300        1   0.2     0.2   0.45  0.5   40
              300        1   0.2     0.2   0.43  0.53  40
              1200       1   0.2     0.2   0.43  0.53  40
              SoilCrop STRUMSoil: LL=[0.2, 0.2, 0.2, 0.2, 0.2, 0.2, 0.2]; KL=[0.1, 0.1, 0.1, 0.1, 0.1, 0.1, 0.1]; XF=[1, 1, 1, 1, 1, 1, 1]
              SoilCrop SPRUMSoil: LL=[0.2, 0.2, 0.2, 0.2, 0.2, 0.2, 0.2]; KL=[0.11, 0.11, 0.11, 0.11, 0.11, 0.11, 0.11]; XF=[1, 1, 1, 1, 1, 1, 1]
            Nutrient
            SoilTemperature Temperature: InteractionsPerDay=8
          SurfaceOrganicMatter: InitialResidueName=wheat_stubble; InitialResidueType=wheat; InitialResidueMass=500; InitialStandingFraction=0; InitialCPR=0; InitialCNR=100
          Fertiliser
          Irrigation
          Operations: same as NZ AppleExperiments.Apple_Tall.Tall.Row.Operations
          Manager WaterTable
            StartDate = 1-dec
            EndDate = 1-mar
```csharp
using Models.Zones;
using APSIM.Shared.Utilities;
using Models.Soils;
using System.Collections.Generic;
using Models.PMF;
using Models.Core;
using System;

namespace Models
{
    [Serializable]
    public class Script : Model
    {
        [Link] Clock Clock;
        [Link] Soil soil;
        [Link] Irrigation irrigation;
        [Description("Start of sowing window (d-mmm)")]
        public string StartDate { get; set; }
        [Description("End of sowing window (d-mmm)")]
        public string EndDate { get; set; }

        [EventSubscribe("StartOfDay")]
        private void OnStartOfDay(object sender, EventArgs e)
        {
        if (DateUtilities.WithinDates(StartDate, Clock.Today, EndDate))
            irrigation.Apply(2, 2500);
        }
    }
}
```
          Manager DAS: same as NZ AppleExperiments.Apple_Tall.Tall.Row.DAS
          Plant SPRUM
          SprumPastureInstance BasePasture: AgeAtSimulationStart=1; YearsToMaxDimension=1; RUE=0.8; Presidue=0; RsenRate=0; Proot=0.1; PSBaseT=5; PSLOptT=20; PSUOptT=25; PSMaxT=35; GRINZ=true; MaxRD=700; MaxHeight=300; MaxPrunedHeight=100; MaxCover=0.98; MinCover=0.5; ExtinctCoeff=0.5; RegrowthDuration=400; FullCanopyDuration=0; BaseT=3; OptT=25; MaxT=35; RootNConc=0.01; LeafNConc=0.05; ResidueNConc=0.01; LegumePropn=0; GSMax=0.004; R50=150; SurfaceKL=0.1; WaterStress=true
          BiomassRemovalEvents Mow: NameOfPlantToRemoveFrom=SPRUM; RemovalType=0
            BiomassRemovalFractions:
              PlantName  OrganName  TypeString  LiveToRemove  DeadToRemove  LiveToResidue  DeadToResidue
              SPRUM      Residue    Cutting     0             0             0.5            0.5
              SPRUM      Leaf       Cutting     0             0             1              1
              SPRUM      Nodule     Cutting     0             0             0              0
              SPRUM      Root       Cutting     0             0             0              0
  Folder LT_Irrigation
    Experiment Apple
      Factors
        Factor IrrigTrigger: Specification=[AutomaticIrrigation].Script.triggerDeficit=30,50,70
      Simulation Dwarf
        Memo ExperimentDescription: same as NZ AppleExperiments.Apple_Dwarf._Dwarf.ExperimentDescription
        Clock: Start=1972-06-21; End=2020-12-31
        Summary SummaryFile
        Weather: FileName=VCSN/29002.met
        MicroClimate: a_interception=0; b_interception=1; c_interception=0; d_interception=0; SoilHeatFluxFraction=0.4; MinimumHeightDiffForNewLayer=0; NightInterceptionFraction=0.5; ReferenceHeight=2
        SoilArbitrator Soil Arbitrator
        ZoneAgregate
        Report ZoneAgregateReport: same as NZ AppleExperiments.Apple_Dwarf._Dwarf.ZoneAgregateReport
        Manager ResetDate: same as NZ AppleExperiments.Apple_Dwarf._Dwarf.ResetDate
        Manager AutomaticIrrigation
          allowIrrigation = True
          seasonStart = 1-Oct
          seasonEnd = 30-Apr
          seasonsAllocation = 10000
          triggerDeficit = 60
          targetDeficit = 99
          returndays = 2
          maximumAmount = 15
          depthPAWC = 1000
```csharp
using Newtonsoft.Json;
using Models.Soils.Nutrients;
using System;
using System.Linq;
using Models.Core;
using Models.PMF;
using Models.Soils;
using System.Xml.Serialization;
using APSIM.Shared.Utilities;
using Models.Interfaces;

        
namespace Models
{
    [Serializable] 
    [System.Xml.Serialization.XmlInclude(typeof(Model))]
    public class Script : Model
    {
        [Link] private ISummary summary;
        [Link] private Irrigation Irrigation;
        [Link] private Clock Clock;
        [Link] private Soil Soil;
        [Link(IsOptional = true)] private IPlant existingCrop;
        private DateTime StartDate;
        private DateTime EndDate;
        private double TopDUL;
        private double TopLL;
        private int nLayers;
        [Link]
        private IPhysical soilPhysical;
        [Link]
        private ISoilWater waterBalance;
        //Communication to other modules
       
        //User inputs from properties tab
        [Description("Turn irrigation on?")]
        public bool allowIrrigation { get; set; }
        [Description("Start of irrigation season (dd-MMM)")]
        public string seasonStart { get; set; }
        [Description("End of irrigation season (dd-MMM)")]
        public string seasonEnd { get; set; }
        [Description("Season allocation (mm)")]
        public double seasonsAllocation { get; set; }
        [Description("Deficit to trigger irrigation (% PAWC)")]
        public double triggerDeficit { get; set; }
        [Description("Deficit to stop irrigaton (% PAWC)")]
        public double targetDeficit { get; set; }
        [Description("Minimum days for irrigation to return")]
        public double returndays { get; set; }
        [Description("Maximum irrigation application (mm/day)")]
        public double maximumAmount { get; set; }
        [Description("Depth to calculate PAWC (mm)")]
        public double depthPAWC { get; set; }

        //Class members
        [JsonIgnore] public double TopSWdeficit { get; set; }
        [JsonIgnore] public double TopSWC { get; set; }
        [JsonIgnore] public double DaysSinceIrrigation { get; set; }
        [JsonIgnore] public double AmountToApply { get; set; }
        [JsonIgnore] public double SeasonAppliedAmount { get; set; }
        
        private bool IrrigationIsAllowed { get; set; }
        private bool SeasonIsOpen { get; set; }
        private bool CropIsActive { get; set; }
        private bool IrrigatorIsAvailable { get; set; }
        private bool SoilIsDry { get; set; }

    
        //Calculate static soil variables
        [EventSubscribe("StartOfSimulation")]
        private void OnStartOfSimulation(object sender, EventArgs e)
        {   
            //Set the season dates
            StartDate = DateTime.Parse(seasonStart + "-" + Clock.Today.Year.ToString());
            EndDate = DateTime.Parse(seasonEnd + "-" + Clock.Today.Year.ToString());
            
            //Can we irrigate at all?
            IrrigationIsAllowed = false; 
            if (allowIrrigation)
                IrrigationIsAllowed = true; 

            //Calculate soil water variables
            double depthFromSurface = 0.0;
            double fracLayer = 0.0;
            nLayers = soilPhysical.Thickness.Length;
            for (int layer = 0; layer < nLayers; layer++)
            {
                fracLayer = Math.Min(1.0, (depthPAWC - depthFromSurface) / soilPhysical.Thickness[layer]);
                TopLL += soilPhysical.LL15mm[layer] * fracLayer;
                TopDUL += soilPhysical.DULmm[layer] * fracLayer;
                depthFromSurface += soilPhysical.Thickness[layer];
                if (depthFromSurface >= depthPAWC)
                    layer = nLayers;
            }
        }
             
        //Determine daily requirement for irrigation
        [EventSubscribe("StartOfDay")]
        private void OnStartOfDay(object sender, EventArgs e)
        {
            //Can we irrigate today?          
            SeasonIsOpen = isBetween(Clock.Today, StartDate, EndDate);

            //Is there a crop in the ground that needs irrigation?
            CropIsActive = false;
            if ((existingCrop != null) && (existingCrop.IsAlive))
                CropIsActive = true;
            //if ((existingCrop.Phenology.Stage >= 3.0) && (existingCrop.Phenology.Stage < 6.0))
          
            //Is the irrigator available?
            IrrigatorIsAvailable = false;
            DaysSinceIrrigation += 1;
            if (DaysSinceIrrigation >= returndays)
                IrrigatorIsAvailable = true;
          
            //Is the soil dry enough to require irrigation?
            SoilIsDry = false;
            double depthFromSurface = 0.0;
            double fracLayer = 0.0;
            TopSWC = 0.0;
            for (int layer = 0; layer < nLayers; layer++)
            //for (int layer = 0; depthFromSurface < depthPAWC + soilPhysical.Thickness[layer]; layer++)
            {
                fracLayer = Math.Min(1.0, (depthPAWC - depthFromSurface) / soilPhysical.Thickness[layer]);
                TopSWC += waterBalance.SWmm[layer] * fracLayer;
                depthFromSurface += soilPhysical.Thickness[layer];
                if (depthFromSurface >= depthPAWC)
                    layer = nLayers;
            }
            
            TopSWdeficit = TopSWC - TopDUL;
            if (Math.Max(0.0, -TopSWdeficit) >= (TopDUL - TopLL) * (100 - triggerDeficit) / 100)
                SoilIsDry = true;
                
            //Are all the conditions ratifying irrigation
            if (IrrigationIsAllowed && SeasonIsOpen && CropIsActive && IrrigatorIsAvailable && SoilIsDry)
            {
                //Lets bloody well irrigate then!!!!
                AmountToApply = TopDUL * targetDeficit / 100 - TopSWC;
                AmountToApply = Math.Max(0.0, Math.Min(AmountToApply, seasonsAllocation - SeasonAppliedAmount));
                Irrigation.Apply(AmountToApply);
                DaysSinceIrrigation = 0;
                SeasonAppliedAmount += AmountToApply;
            }
        }
        
        ///Checks whether theDate is between iniDate and endDate (non-year specific)
        private bool isBetween(DateTime theDay, DateTime iniDate, DateTime endDate)
        {
            bool result = false;
            if (iniDate.DayOfYear < endDate.DayOfYear)
            {
                // period is within one year, ex: summer in the northern hemisphere
                if ((theDay.DayOfYear >= iniDate.DayOfYear) && (theDay.DayOfYear <= endDate.DayOfYear))
                    result = true;
            }
            else
            {
                // period goes over the end of the year, ex: summer in the southern hemisphere
                if ((theDay.DayOfYear >= iniDate.DayOfYear) || (theDay.DayOfYear <= endDate.DayOfYear))
                    result = true;
            }
            
            return result;
        }
    }
}
```
        RectangularZone Row: Length=100; Width=1.3; Slope=0; AspectAngle=0; Altitude=50
          Report RowZoneReport: EventNames=[Clock].DoReport
          Report Drainage: EventNames=[Clock].DoReport
            VariableNames:
              [Clock].Today
              sum of [Soil].SoilWater.Flux[6] from 2008-10-01 to 2011-03-08 as drainage
              [Soil].Water.MM[9] + [Soil].Water.MM[10] as SW_belowRoots
          SurfaceOrganicMatter: InitialResidueName=wheat_stubble; InitialResidueType=wheat; InitialResidueMass=500; InitialStandingFraction=0; InitialCPR=0; InitialCNR=100
          Fertiliser
          Irrigation
          Operations: same as NZ AppleExperiments.Apple_Dwarf._Dwarf.Row.Operations
          Manager WaterTable: same as NZ AppleExperiments.Apple_Dwarf._Dwarf.Row.WaterTable
          Manager DAS: same as NZ AppleExperiments.Apple_Dwarf._Dwarf.Row.DAS
          Manager AutomaticFertiliser: same as NZ AppleExperiments.Apple_Dwarf._Dwarf.Row.AutomaticFertiliser
          Plant STRUM
          StrumTreeInstance Apple: same as NZ AppleExperiments.Apple_Dwarf._Dwarf.Row.Apple
          Soil KaiapoSiltLoam: same as NZ AppleExperiments.Apple_Dwarf.Factors._.Parameterised.KaiapoSiltLoam
        RectangularZone Alley: Length=100; Width=2.2; Slope=0; AspectAngle=0; Altitude=50
          Report AlleyZoneReport: EventNames=[Clock].DoReport
          Report Drainage: EventNames=[Clock].DoReport
            VariableNames:
              [Clock].Today
              sum of [Soil].SoilWater.Flux[6] from 2008-10-01 to 2011-03-08 as drainage
              [Soil].Water.MM[9] + [Soil].Water.MM[10] as SW_belowRoots
          SurfaceOrganicMatter: InitialResidueName=wheat_stubble; InitialResidueType=wheat; InitialResidueMass=500; InitialStandingFraction=0; InitialCPR=0; InitialCNR=100
          Fertiliser
          Irrigation
          Operations: same as NZ AppleExperiments.Apple_Dwarf._Dwarf.Row.Operations
          Manager WaterTable: same as NZ AppleExperiments.Apple_Dwarf._Dwarf.Row.WaterTable
          Manager DAS: same as NZ AppleExperiments.Apple_Dwarf._Dwarf.Row.DAS
          Soil KaiapoSiltLoam: same as NZ AppleExperiments.Apple_Dwarf.Factors._.Parameterised.KaiapoSiltLoam
          Plant SPRUM
          SprumPastureInstance BasePasture: same as NZ AppleExperiments.Apple_Dwarf._Dwarf.Alley.BasePasture
          BiomassRemovalEvents Mow: same as NZ AppleExperiments.Apple_Dwarf._Dwarf.Alley.Mow
      Memo Reason why drainage looks bad
        The flux meters were flooded by a rising water table so the drainage observations are not representative of actual drainage
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