Simulations: Version=216
  Memo TitlePage
    # The STRUM model
    A simple representation of the shape and mass of rows of fruit trees which can be used in a multizone simulation with a row of mown grass to model the water N and C balance of an orchard system.
  Folder Replacements
    Report RowZoneReport: EventNames=[Clock].DoReport
      VariableNames:
        [Clock].Today
        [Row].STRUM.AccumulatedWaterStress
        //[Row].STRUM.Arbitrator.DemandRatio
        [Row].Area
        [Row].STRUM.BaseHeight
        [Row].STRUM.Fruit.FreshYield_kgPerHa
        [Row].STRUM.CanopyArea
        [Row].STRUM.RootUptakesArbitrator.WaterDemand.Amount
        [Row].STRUM.RootUptakesArbitrator.WaterDemand.mm
        [Row].STRUM.RootUptakesArbitrator.NitrogenDemand.Amount
        [Row].STRUM.Root.Network.WtByLayerZone1
        [Row].STRUM.Root.Network.WtByLayerZone2
        [Row].STRUM.Arbitrator.Carbon.TotalPlantDemand
        [Row].STRUM.Arbitrator.Carbon.TotalPlantSupply
        [Row].STRUM.Arbitrator.Carbon.TotalPlantDemandsAllocated
        [Row].STRUM.Arbitrator.Fn
        [Row].STRUM.Arbitrator.Nitrogen.TotalPlantDemand
        [Row].STRUM.Arbitrator.Nitrogen.TotalPlantSupply
        [Row].STRUM.Arbitrator.Nitrogen.TotalPlantDemandsAllocated
        [Row].STRUM.Fruit.TotalCarbonDemand.RelativeFruitMass.Delta.Integral
        [Row].STRUM.Fruit.Allocated.Carbon.Total
        [Row].STRUM.Fruit.Allocated.Nitrogen.Total
        [Row].STRUM.Fruit.Carbon.Demands.Structural
        [Row].STRUM.Fruit.Carbon.Demands.Total
        [Row].STRUM.Fruit.DMC
        [Row].STRUM.Fruit.FreshWtPerFruit
        [Row].STRUM.Fruit.NextYearsFruitingBudSurvival
        [Row].STRUM.Fruit.Number.BudsSurvivalFromLastYear
        [Row].STRUM.Fruit.N
        [Row].STRUM.Fruit.Nitrogen.Demands.Total
        [Row].STRUM.Fruit.Number
        [Row].STRUM.Fruit.Diameter
        [Row].STRUM.Fruit.VolumePerFruit
        [Row].STRUM.Fruit.Wt
        [Row].STRUM.Fruit.PotentialDWPerFruit
        [Row].STRUM.Fruit.TotalCarbonDemand.RelativeFruitMass
        [Row].STRUM.Fruit.TotalCarbonDemand.CarbonConc
        [Row].STRUM.Height
        [Row].STRUM.Height.PrunedCanopyBaseHeight
        [Row].STRUM.Height.PrunedCanopyBaseHeight  + [Row].STRUM.Height.PrunedCanopyDepth
        [Row].STRUM.Height.PrunedCanopyBaseHeight  + [Row].STRUM.Height.PrunedCanopyDepth + [Row].STRUM.Height.SeasonalDepthGrowth
        [Row].STRUM.Leaf.Allocated.Carbon.Total
        [Row].STRUM.Leaf.Allocated.Nitrogen.Total
        [Row].STRUM.Leaf.Canopy.CoverGreen
        [Row].STRUM.Leaf.Canopy.Deepness
        [Row].STRUM.Leaf.Dead.Wt
        [Row].STRUM.Leaf.Carbon.Demands.Structural
        [Row].STRUM.Leaf.Carbon.Demands.Total
        [Row].STRUM.Leaf.Fn
        [Row].STRUM.Leaf.Canopy.Fw
        [Row].STRUM.Leaf.Canopy.LAI
        [Row].STRUM.Leaf.Live.Wt
        [Row].STRUM.Leaf.N
        [Row].STRUM.Leaf.Nitrogen.Demands.Total
        [Row].STRUM.Leaf.Canopy.PotentialEP
        [Row].STRUM.Leaf.Canopy.RadiationIntercepted
        [Row].STRUM.Leaf.Senesced.Weight.Structural
        [Row].STRUM.Leaf.SenescenceRate
        [Row].STRUM.Leaf.Canopy.Transpiration
        [Row].STRUM.Leaf.Canopy.WaterDemand
        [Row].STRUM.Leaf.Canopy.WaterAllocation
        [Row].STRUM.Leaf.Canopy.Width
        [Row].STRUM.Leaf.Canopy.GreenExtinctionCoefficient
        [Row].STRUM.Leaf.Wt
        [Row].STRUM.Phenology.Age.YearDecimal
        [Row].STRUM.Phenology.Age.Years
        [Row].STRUM.Phenology.CurrentStageName
        [Row].STRUM.Phenology.DaysSinceFlowering
        [Row].STRUM.Phenology.Stage
        [Row].STRUM.RelativeSeasonalDimension
        [Row].STRUM.RelativeAnnualDimension
        [Row].STRUM.Root.Allocated.Carbon.Total
        [Row].STRUM.Root.Allocated.Nitrogen.Total
        [Row].STRUM.Root.Network.Depth
        [Row].STRUM.Root.Carbon.Demands.Structural
        [Row].STRUM.Root.Carbon.Demands.Total
        [Row].STRUM.Root.N
        [Row].STRUM.Root.Nitrogen.Demands.Total
        [Row].STRUM.RootUptakesArbitrator.WaterUptake.AmountByZone
        [Row].STRUM.RootUptakesArbitrator.WaterUptake.Mm
        [Row].STRUM.RootUptakesArbitrator.WaterUptake.Amount
        [Row].STRUM.RootUptakesArbitrator.NitrogenUptake.AmountByZone
        [Row].STRUM.RootUptakesArbitrator.NitrogenUptake.Gpm2
        [Row].STRUM.RootUptakesArbitrator.NitrogenUptake.Amount
        [Row].STRUM.RootUptakesArbitrator.WaterSupply.AmountByZone
        [Row].STRUM.RootUptakesArbitrator.WaterSupply.Mm
        [Row].STRUM.RootUptakesArbitrator.WaterSupply.Amount
        [Row].STRUM.RootUptakesArbitrator.NitrogenSupply.AmountByZone
        [Row].STRUM.RootUptakesArbitrator.NitrogenSupply.Gpm2
        [Row].STRUM.RootUptakesArbitrator.NitrogenSupply.Amount
        [Row].STRUM.Root.Wt
        [Row].STRUM.TranspirationPerTree
        [Row].STRUM.Wood.Allocated.Carbon.Total
        [Row].STRUM.Wood.Allocated.Nitrogen.Total
        [Row].STRUM.Wood.Carbon.Demands.Structural
        [Row].STRUM.Wood.Carbon.Demands.Total
        [Row].STRUM.Wood.Carbon.Supplies.ReTranslocation
        [Row].STRUM.Wood.Live.Carbon.Structural * 1/0.4
        [Row].STRUM.Wood.Live.Carbon.Storage * 1/0.4
        [Row].STRUM.Wood.EnergyBalance.CoverTotal
        [Row].STRUM.Wood.EnergyBalance.DeadAreaIndex
        [Row].STRUM.Wood.EnergyBalance.LAIDead
        [Row].STRUM.Wood.EnergyBalance.RadiationInterceptedByDead
        [Row].STRUM.Wood.EnergyBalance.Transpiration
        [Row].STRUM.Wood.N
        [Row].STRUM.Wood.Nitrogen.Demands.Total
        [Row].STRUM.Wood.Wt
        [Row].STRUM.Width
        [Row].STRUM.Width.PrunedWidth
        [Row].STRUM.Width.PrunedWidth + [Row].STRUM.Width.SeasonalGrowth
        [Row].STRUM.TranspirationPerLeafArea
        [Row].SurfaceOrganicMatter.N
        [Row].SurfaceOrganicMatter.Wt
        [Row].Irrigation.IrrigationApplied
        [Row].Fertiliser.NitrogenApplied
        sum([Row].Soil.OutputLayers.SWmm)
        ([Row].Soil.OutputLayers.SWmm[1] + [Row].Soil.OutputLayers.SWmm[1] + [Row].Soil.OutputLayers.SWmm[1]) as SWmm90
        [Row].Soil.OutputLayers.SW
        [Row].Soil.OutputLayers.SAT
        [Row].Soil.OutputLayers.DUL
        [Row].Soil.OutputLayers.LL15
        [Row].Soil.SoilWater.Evaporation
        [Row].Soil.SoilWater.Eo
        [Weather].PanEvap
        [Weather].Radn
        [Weather].Rain
        [STRUM].Leaf.TotalCarbonDemand.TotalDMDemand.SizeDemand.SizeDemand.SizeDemand.TargetSize
    Report AlleyZoneReport: EventNames=[Clock].DoReport
      VariableNames:
        [Clock].Today
        [Alley].Area
        [Alley].SPRUM.RootUptakesArbitrator.WaterDemand.Amount
        [Alley].SPRUM.RootUptakesArbitrator.WaterSupply.Amount
        [Alley].SPRUM.RootUptakesArbitrator.WaterUptake.Amount
        [Alley].SPRUM.RootUptakesArbitrator.NitrogenDemand.Amount
        [Alley].SPRUM.RootUptakesArbitrator.NitrogenSupply.Amount
        [Alley].SPRUM.RootUptakesArbitrator.NitrogenUptake.Amount
        [Alley].SPRUM.Root.Network.WtByLayerZone1
        [Alley].SPRUM.Root.Network.WtByLayerZone2
        [Alley].SPRUM.Arbitrator.Carbon.TotalPlantDemand
        [Alley].SPRUM.Arbitrator.Carbon.TotalPlantSupply
        [Alley].SPRUM.Arbitrator.Carbon.TotalPlantDemandsAllocated
        [Alley].SPRUM.Arbitrator.Fn
        [Alley].SPRUM.Arbitrator.Nitrogen.TotalPlantDemand
        [Alley].SPRUM.Arbitrator.Nitrogen.TotalPlantSupply
        [Alley].SPRUM.Arbitrator.Nitrogen.TotalPlantDemandsAllocated
        [Alley].SPRUM.Height
        [Alley].SPRUM.Leaf.Allocated.Carbon.Total
        [Alley].SPRUM.Leaf.Allocated.Nitrogen.Total
        [Alley].SPRUM.Leaf.Canopy.CoverGreen
        [Alley].SPRUM.Leaf.Dead.Wt
        [Alley].SPRUM.Leaf.Carbon.Demands.Structural
        [Alley].SPRUM.Leaf.Carbon.Demands.Total
        [Alley].SPRUM.Leaf.Fn
        [Alley].SPRUM.Leaf.Canopy.Fw
        [Alley].SPRUM.Leaf.Canopy.LAI
        [Alley].SPRUM.Leaf.Live.Wt
        [Alley].SPRUM.Leaf.N
        [Alley].SPRUM.Leaf.Nitrogen.Demands.Total
        [Alley].SPRUM.Leaf.Canopy.PotentialEP
        [Alley].SPRUM.Leaf.Canopy.RadiationIntercepted
        [Alley].SPRUM.Leaf.Senesced.Weight.Structural
        [Alley].SPRUM.Leaf.SenescenceRate
        [Alley].SPRUM.Leaf.Canopy.Transpiration
        [Alley].SPRUM.Leaf.Canopy.WaterDemand
        [Alley].SPRUM.Leaf.Canopy.WaterAllocation
        [Alley].SPRUM.Leaf.Canopy.Width
        [Alley].SPRUM.Leaf.Wt
        [Alley].SPRUM.Phenology.Age.YearDecimal
        [Alley].SPRUM.Phenology.Age.Years
        [Alley].SPRUM.Phenology.CurrentStageName
        [Alley].SPRUM.Phenology.Stage
        [Alley].SPRUM.RelativeAnnualDimension
        [Alley].SPRUM.Root.Allocated.Carbon.Total
        [Alley].SPRUM.Root.Allocated.Nitrogen.Total
        [Alley].SPRUM.Root.Network.Depth
        [Alley].SPRUM.Root.Carbon.Demands.Structural
        [Alley].SPRUM.Root.Carbon.Demands.Total
        [Alley].SPRUM.Root.N
        [Alley].SPRUM.Root.Nitrogen.Demands.Total
        [Alley].SPRUM.RootUptakesArbitrator.WaterUptake.AmountByZone
        [Alley].SPRUM.RootUptakesArbitrator.WaterUptake.Mm
        [Alley].SPRUM.RootUptakesArbitrator.WaterUptake.Amount
        [Alley].SPRUM.RootUptakesArbitrator.NitrogenUptake.AmountByZone
        [Alley].SPRUM.RootUptakesArbitrator.NitrogenUptake.Gpm2
        [Alley].SPRUM.RootUptakesArbitrator.NitrogenUptake.Amount
        [Alley].SPRUM.RootUptakesArbitrator.WaterSupply.AmountByZone
        [Alley].SPRUM.RootUptakesArbitrator.WaterSupply.Mm
        [Alley].SPRUM.RootUptakesArbitrator.WaterSupply.Amount
        [Alley].SPRUM.RootUptakesArbitrator.NitrogenSupply.AmountByZone
        [Alley].SPRUM.RootUptakesArbitrator.NitrogenSupply.Gpm2
        [Alley].SPRUM.RootUptakesArbitrator.NitrogenSupply.Amount
        [Alley].SPRUM.Root.Wt
        [Alley].SPRUM.Residue.Allocated.Carbon.Total
        [Alley].SPRUM.Residue.Allocated.Nitrogen.Total
        [Alley].SPRUM.Residue.Carbon.Demands.Structural
        [Alley].SPRUM.Residue.Carbon.Demands.Total
        [Alley].SPRUM.Residue.N
        [Alley].SPRUM.Residue.Nitrogen.Demands.Total
        [Alley].SPRUM.Residue.Wt
        [Alley].SurfaceOrganicMatter.N
        [Alley].SurfaceOrganicMatter.Wt
        [Alley].Irrigation.IrrigationApplied
        [Alley].Fertiliser.NitrogenApplied
        sum([Alley].Soil.OutputLayers.SWmm)
        ([Alley].Soil.OutputLayers.SWmm[1] + [Alley].Soil.OutputLayers.SWmm[1] + [Alley].Soil.OutputLayers.SWmm[1]) as SWmm90
        [Alley].Soil.OutputLayers.SW
        [Alley].Soil.OutputLayers.SAT
        [Alley].Soil.OutputLayers.DUL
        [Alley].Soil.OutputLayers.LL15
        [Alley].Soil.SoilWater.Drainage
        [Alley].Soil.SoilWater.Evaporation
        [Alley].Soil.SoilWater.Eo
        [Weather].PanEvap
        [Weather].Radn
        [Weather].Rain
    Report ZoneAgregateReport: EventNames=[Clock].DoReport
      VariableNames:
        [Clock].Today
        [ZoneAgregate].SimulationArea
        [ZoneAgregate].Eop.Amount
        [ZoneAgregate].Eop.Pm2
        [ZoneAgregate].Eop.AmountByZone[1]
        [ZoneAgregate].Eop.AmountByZone[2]
        [ZoneAgregate].Ro.Amount
        [ZoneAgregate].Ro.Pm2
        [ZoneAgregate].Ro.AmountByZone[1]
        [ZoneAgregate].Ro.AmountByZone[2]
        [ZoneAgregate].Ri.Amount
        [ZoneAgregate].Ri.Pm2
        [ZoneAgregate].Ri.AmountByZone[1]
        [ZoneAgregate].Ri.AmountByZone[2]
        [ZoneAgregate].Et.Amount
        [ZoneAgregate].Et.Pm2
        [ZoneAgregate].Et.AmountByZone[1]
        [ZoneAgregate].Et.AmountByZone[2]
        [ZoneAgregate].AccumulatedIrrigation.Amount
        [ZoneAgregate].AccumulatedIrrigation.Pm2
        [ZoneAgregate].AccumulatedIrrigation.AmountByZone[1]
        [ZoneAgregate].AccumulatedIrrigation.AmountByZone[2]
        [ZoneAgregate].AccumulatedNitrogen.Amount
        [ZoneAgregate].AccumulatedNitrogen.Pm2
        [ZoneAgregate].AccumulatedNitrogen.AmountByZone[1]
        [ZoneAgregate].AccumulatedNitrogen.AmountByZone[2]
        [ZoneAgregate].FintTreeGreen
        [ZoneAgregate].FintTreeDead
        [ZoneAgregate].FintTreeTotal
        [ZoneAgregate].FintUnderstoryGreen
        [ZoneAgregate].FintUnderstoryDead
    Manager AutomaticFertiliser
      Fertilise = True
      Season_Start = 1-Aug
      Season_End = 30-May
      Season_Allocation = 100000
      TriggerN = 60
      NApplicationAmount = 30
      Return_days = 2
      Top_Depth = 600
```csharp
using Newtonsoft.Json;
using Models.PMF.Phen;
using Models.Soils.Nutrients;
using Models.Interfaces;
using APSIM.Shared.Utilities;
using Models.PMF;
using System.Xml.Serialization;
using Models.Soils;
using Models.Core;
using System;
using Models.PMF.Organs;

        
namespace Models
{
    [Serializable] 
    [System.Xml.Serialization.XmlInclude(typeof(Model))]
    public class Script : Model
    {
        [Link] private ISummary summary;
        [Link] private Fertiliser Fertiliser;
        [Link] private Clock Clock;
        [Link] private Plant SCRUM;
        [Link(ByName = true)]
        private ISolute NO3;
        [Link] private Soils.Soil Soil;
        [Link(Type = LinkType.Path, Path = "[STRUM].Root.Network")]
        private RootNetwork root;
        [Link(Type = LinkType.Path, Path = "[STRUM].Phenology")]
        private Phenology phenology;
        [Link]
        private IPhysical soilPhysical;
        //Communication to other modules
       
        //User inputs from properties tab
        [Description("Fertilise (tick for yes)")]
        public bool Fertilise { get; set; }
        [Description("SeasonStart (dd-MMM)")]
        public string Season_Start { get; set; }
        [Description("SeasonEnd (dd-MMM)")]
        public string Season_End { get; set; }
        [Description("Season Allocation (kg/ha)")]
        public double Season_Allocation { get; set; }
        [Description("Mineral N to maintain soil above (kg/ha)")]
        public double TriggerN { get; set; }
        [Description("Amount of N to apply (kg/ha)")]
        public double NApplicationAmount { get; set; }
        [Description("Minimum days for Fertiliser spreader to return")]
        public double Return_days { get; set; }
        [Description("Depth to calculate mineral N (mm)")]
        public double Top_Depth { get; set; }
       
        //Class members
        [JsonIgnore] private bool FertiliserIsAvailable { get; set; }
        [JsonIgnore] public bool SeasonIsOpen { get; set; }
        [JsonIgnore] private bool CropIsActive { get; set; }
        [JsonIgnore] private bool FertSpreaderIsAvailable { get; set; }
        [JsonIgnore] private bool SoilNIsLow { get; set; }
        [JsonIgnore] public double Top_SoilN { get; set; }
        [JsonIgnore] public double Accumulated_depth { get; set; }
        [JsonIgnore] public double Days_since_fertiliser { get; set; }
        [JsonIgnore] public double Season_Application { get; set; }
        
        //Variables for date logic testing
        [JsonIgnore] public string StartString { get; set; }
        [JsonIgnore] public string EndString { get; set; }
        [JsonIgnore] public DateTime StartDate { get; set; }
        [JsonIgnore] public DateTime EndDate { get; set; }
        [JsonIgnore] public int TodayYear { get; set; }
        [JsonIgnore] public int TodayMonth { get; set; }
        [JsonIgnore] public int StartMonth { get; set; }
        [JsonIgnore] public int EndMonth { get; set; }
        [JsonIgnore] public int TodayDay { get; set; }
        [JsonIgnore] public int StartDay { get; set; }
        [JsonIgnore] public int EndDay { get; set; }
              
        //Determine daily requirement for fertiliser
        [EventSubscribe("StartOfDay")]
        private void OnStartOfDay(object sender, EventArgs e)
        { 
            //Can we irrigate?
            FertiliserIsAvailable = false; 
            if (Fertilise)
                FertiliserIsAvailable = true; 
    
            //Are we Allowed to Irrigate?
            TodayYear = Clock.Today.Year;
            StartString = Season_Start + "-" + TodayYear.ToString();
            EndString = Season_End + "-" + TodayYear.ToString();
            StartDate = DateTime.Parse(StartString);
            EndDate = DateTime.Parse(EndString);
            TodayMonth = Clock.Today.Month;
            TodayDay = Clock.Today.Day;
            StartDay = StartDate.Day;
            StartMonth = StartDate.Month;
            EndDay = EndDate.Day;
            EndMonth = EndDate.Month;
          
            SeasonIsOpen = false;
            //if we are in the spring and after the start date then yes
            if ((Clock.Today.Month > 6) && (Clock.Today >= StartDate))
                SeasonIsOpen = true;
            //if we are in the autumn and before the end date then yes
            if ((Clock.Today.Month <= 6) && (Clock.Today <= EndDate))
                SeasonIsOpen = true;
          
            //Is there a crop in the ground that needs irrigation?
            //CropIsActive = false;
            //if ((phenology.Stage >= 3.0) && (phenology.Stage < 6.0))
            CropIsActive = true;
          
            //Is the irrigator available?
            FertSpreaderIsAvailable = false;
            Days_since_fertiliser += 1;
            if (Days_since_fertiliser >= Return_days)
                FertSpreaderIsAvailable = true;
          
            //Is the soil N low enough to require fertiliser?
            SoilNIsLow = false;
            double CurrentRootDepth = 0;
            double RootDepth = root.Depth;
            CurrentRootDepth = Math.Max(RootDepth, CurrentRootDepth);
          
            Accumulated_depth = 0;
            Top_SoilN = 0;
            for (int layer = 0; Accumulated_depth < Top_Depth; layer++)
            {
                Top_SoilN += NO3.kgha[layer];
                Accumulated_depth += soilPhysical.Thickness[layer];
            }
            if (Top_SoilN <= TriggerN)
                SoilNIsLow = true;
                
            //Lets bloody well fertilise then!!!!
            if ((FertiliserIsAvailable) && (SeasonIsOpen) && (CropIsActive) && (FertSpreaderIsAvailable) && (SoilNIsLow)) //The conditions are rife for fertiliser
            {
                Fertiliser.Apply(NApplicationAmount, "UreaN", 10);
                Days_since_fertiliser = 0;
                Season_Application += NApplicationAmount;
                summary.WriteMessage(this, "Automatic Fertiliser", MessageType.Diagnostic);
            
            }
        }
    }
}
```
  DataStore
    ExcelInput: FileNames=[AllObsCopy.xlsx]; SheetNames=[Observed]
    PredictedObserved: PredictedTableName=KiwiReport; ObservedTableName=Observed; FieldNameUsedForMatch=SimulationName; FieldName2UsedForMatch=Zone; FieldName3UsedForMatch=Clock.Today; AllColumns=false
    PredictedObserved DrainagePO (disabled): PredictedTableName=Drainage; ObservedTableName=Observed; FieldNameUsedForMatch=SimulationName; FieldName2UsedForMatch=Zone; FieldName3UsedForMatch=Clock.Today; AllColumns=false
  Folder NZ Kiwifruit Expts
    Memo ReadOrchardConfiguration
      1.   Sheltered - **ALL**

      2.   Netted - **LIN/Paengaroa, Pukehina, Waiuku**

      3.   Irrigated - **LIN/Paengaroa, OPK/Opotiki, OCR/Pukehina, Katikati, Pukehina, Waiuku**
    Experiment Orchard_LIN
      Factors
        Factor _
          CompositeFactor Gold
            Specifications:
              [RadiationWindFactor].Script.RadiationFactor = 0.8
              [RadiationWindFactor].Script.WindFactor = 0.5
              [Soil]
            Soil: SoilType=Buried-allophanic Orthic Pumice Soils; Latitude=-41; Longitude=174; DataSource=Based on profile descriptions provided by Smap (Oropi_1a1)
              Chemical: PHUnits=Water
                Thickness  PH  CEC
                180        7   15.123
                180        7   8.039
                475        7   5.947
                1165       7   5.599
              Physical
                Thickness  ParticleSizeSand  ParticleSizeSilt  ParticleSizeClay  Rocks  BD     AirDry  LL15   DUL    SAT    KS
                180        57.5              34                8.5               0      0.894  0.082   0.125  0.255  0.566  1920
                180        64                29.5              6.5               0      1.043  0.111   0.111  0.235  0.534  1200
                275        56.5              32                11.5              0      0.96   0.126   0.126  0.24   0.536  1920
                288.3      56.5              32                11.5              0      0.96   0.146   0.146  0.3    0.536  1920
                299.8      54.5              35                10.5              0      0.984  0.162   0.162  0.35   0.557  1440
                388.3      54.5              35                10.5              0      0.984  0.162   0.162  0.435  0.557  1440
                388.6      54.5              35                10.5              0      0.984  0.162   0.162  0.435  0.557  1440
                SoilCrop STRUMSoil: LL=[0.15, 0.111, 0.126, 0.146, 0.162, 0.162, 0.162]; KL=[0.116, 0.077, 0.042, 0.013, 0.005, 0, 0.06]; XF=[1, 1, 1, 0.5, 0.5, 0.5, 0.5]
                  LL, KL source: Calculated (layer 7)
              WaterBalance SoilWater: SummerDate=1-oct; SummerU=9; SummerCona=4.4; WinterDate=1-apr; WinterU=4; WinterCona=2; DiffusConst=88; DiffusSlope=35; Salb=0.13; CN2Bare=77; CNRed=37; CNCov=0.8; DischargeWidth=0; CatchmentArea=0; PSIDul=-100
                Thickness  SWCON  KLAT
                180        0.4    0
                180        0.5    0
                475        0.45   0
                1165       0.45   0
              Organic: FOMCNRatio=40; CarbonUnits=Total
                Thickness  Carbon  SoilCNRatio  FBiom  FInert  FOM
                50         6       11           0.079  0.432   124.07
                50         6       11           0.061  0.492   115.105
                50         6       11           0.048  0.543   106.788
                50         4.949   11           0.038  0.596   99.072
                50         3.383   11           0.031  0.651   91.914
                50         2.334   11           0.025  0.699   85.272
                50         1.63    11           0.021  0.743   79.111
                50         1.159   11           0.018  0.781   73.394
                50         0.843   11           0.016  0.816   68.091
                50         0.631   11           0.015  0.847   63.171
                250        0.33    11           0.012  0.918   43.417
                250        0.218   11           0.01   0.977   29.84
                500        0.201   11           0.01   0.991   14.095
                500        0.2     11           0.01   0.996   6.658
              Water: Thickness=[180, 180, 275, 288.3, 299.8, 388.3, 388.3]; InitialValues=[0.255, 0.235, 0.24, 0.3, 0.35, 0.435, 0.435]; FilledFromTop=false
              Solute NO3: Thickness=[180, 180, 475, 1165]; InitialValues=[7.084, 4.067, 0.061, 0.06]; InitialValuesUnits=ppm; WaterTableConcentration=0; D0=0; DepthConstant=0; MaxDepthSoluteAccessible=0; RunoffEffectivenessAtMovingSolute=0; MaxEffectiveRunoff=0
              Solute NH4: Thickness=[180, 180, 475, 1165]; InitialValues=[1.063, 0.61, 0.009, 0.009]; InitialValuesUnits=ppm; WaterTableConcentration=0; D0=0; DepthConstant=0; MaxDepthSoluteAccessible=0; RunoffEffectivenessAtMovingSolute=0; MaxEffectiveRunoff=0
              Solute Urea: Thickness=[180, 180, 475, 1165]; InitialValues=[0, 0, 0, 0]; InitialValuesUnits=kg/ha; WaterTableConcentration=0; D0=0; DepthConstant=0; MaxDepthSoluteAccessible=0; RunoffEffectivenessAtMovingSolute=0; MaxEffectiveRunoff=0
              Nutrient
              OutputLayers: Thickness=[400, 400, 400, 400, 200]
              SoilTemperature Temperature: InteractionsPerDay=8
          CompositeFactor SMAP
            Specifications:
              [RadiationWindFactor].Script.RadiationFactor = 0.8
              [RadiationWindFactor].Script.WindFactor = 0.5
              [Soil]
            Soil Oropi_1a1: SoilType=Buried-allophanic Orthic Pumice Soils; LocalName=Oropi_1a1; Latitude=-41; Longitude=174
              DataSource=Profile descriptions provided by Smap based on the work done by Trevor Webb.
              Physical
                Thickness  ParticleSizeSand  ParticleSizeSilt  ParticleSizeClay  Rocks  BD     AirDry  LL15   DUL    SAT    KS
                180        57.5              34                8.5               0      0.894  0.082   0.165  0.395  0.591  1920
                180        64                29.5              6.5               0      1.043  0.074   0.111  0.299  0.534  1200
                475        56.5              32                11.5              0      0.96   0.16    0.16   0.361  0.566  1920
                388.3      54.5              35                10.5              0      0.984  0.162   0.162  0.392  0.557  1440
                388.3      54.5              35                10.5              0      0.984  0.162   0.162  0.392  0.557  1440
                388.3      54.5              35                10.5              0      0.984  0.162   0.162  0.392  0.557  1440
                Rocks source: Calculated
                SoilCrop STRUMSoil: LL=[0.165, 0.111, 0.16, 0.162, 0.162, 0.162]; KL=[0.113923, 0.0774637, 0.0447985, 0.0152268, 0.00662591, 0]; XF=[1, 0.64, 1, 1, 1, 1]
              WaterBalance SoilWater: SummerDate=1-oct; SummerU=9; SummerCona=4.4; WinterDate=1-apr; WinterU=4; WinterCona=2; DiffusConst=88; DiffusSlope=35; Salb=0.13; CN2Bare=77; CNRed=37; CNCov=0.8; DischargeWidth=0; CatchmentArea=0; PSIDul=-100
                Thickness  SWCON  KLAT
                180        0.4    0
                180        0.5    0
                475        0.3    0
                1165       0.4    0
              Organic: FOMCNRatio=40; CarbonUnits=Total
                Thickness  Carbon    SoilCNRatio  FBiom      FInert    FOM
                50         6         11           0.0788566  0.431898  124.07
                50         6         11           0.0610103  0.491926  115.105
                50         6         11           0.0477893  0.542739  106.788
                50         4.94864   11           0.037995   0.5956    99.0722
                50         3.38311   11           0.0307392  0.650815  91.9135
                50         2.3337    11           0.025364   0.69947   85.2722
                50         1.63026   11           0.0213819  0.742644  79.1107
                50         1.15873   11           0.0184319  0.781204  73.3945
                50         0.842658  11           0.0162465  0.815767  68.0912
                50         0.630787  11           0.0146275  0.846679  63.1712
                250        0.32975   11           0.0118814  0.917701  43.4169
                250        0.21756   11           0.0104198  0.97694   29.84
                500        0.200874  11           0.0100442  0.990833  14.0954
                500        0.200016  11           0.0100022  0.996255  6.6582
              Chemical: PHUnits=Water
                Thickness  PH  CEC
                180        7   19.2277
                180        7   11.9974
                475        7   7.90261
                1165       7   6.91146
                CEC source: Calculated
              Nutrient
              SoilTemperature Temperature: InteractionsPerDay=8
              Water: Thickness=[180, 180, 475, 388.3, 388.3, 388.3]; InitialValues=[0.372, 0.2802, 0.3409, 0.369, 0.369, 0.369]; FilledFromTop=false
              Solute NO3: Thickness=[180, 180, 475, 1165]; InitialValues=[7.08427, 4.06695, 0.0612745, 0.0598607]; InitialValuesUnits=ppm; WaterTableConcentration=0; D0=0; DepthConstant=0; MaxDepthSoluteAccessible=0; RunoffEffectivenessAtMovingSolute=0; MaxEffectiveRunoff=0
              Solute NH4: Thickness=[180, 180, 475, 1165]; InitialValues=[1.06264, 0.610043, 0.00919118, 0.0089834]; InitialValuesUnits=ppm; WaterTableConcentration=0; D0=0; DepthConstant=0; MaxDepthSoluteAccessible=0; RunoffEffectivenessAtMovingSolute=0; MaxEffectiveRunoff=0
              Solute Urea: same as NZ Kiwifruit Expts.Orchard_LIN.Factors._.Gold.Soil.Urea
              OutputLayers: Thickness=[400, 400, 400, 400, 200]
          CompositeFactor FSL
            Specifications:
              [RadiationWindFactor].Script.RadiationFactor = 0.8
              [RadiationWindFactor].Script.WindFactor = 0.5
              [Soil]
            Soil: SoilType=Buried-allophanic Orthic Pumice Soils; Latitude=-41; Longitude=174; DataSource=Based on profile descriptions provided by Smap (Oropi_1a1)
              Chemical: PHUnits=Water
                Thickness  PH  CEC
                180        7   15.123
                180        7   8.039
                475        7   5.947
                1165       7   5.599
              Physical
                Thickness  ParticleSizeSand  ParticleSizeSilt  ParticleSizeClay  Rocks  BD    AirDry  LL15   DUL    SAT    KS
                200        59.6              34.4              6                 0      0.92  0.062   0.186  0.421  0.646  540
                100        63.7              31.7              4.6               0      0.94  0.118   0.131  0.342  0.64   1410
                300        50.1              38.6              11.3              0      0.82  0.224   0.224  0.443  0.687  540
                300        61.2              25.3              13.5              0      0.82  0.236   0.236  0.42   0.685  1410
                300        50.3              27.7              22                0      0.74  0.318   0.318  0.539  0.715  1410
                400        50.3              27.7              22                0      0.74  0.318   0.318  0.539  0.715  1410
                400        50.3              27.7              22                0      0.74  0.318   0.318  0.539  0.715  1410
                SoilCrop STRUMSoil: LL=[0.186, 0.131, 0.224, 0.236, 0.318, 0.318, 0.318]; KL=[0.116, 0.077, 0.042, 0.013, 0.005, 0, 0.06]; XF=[1, 1, 1, 1, 1, 1, 1]
                  KL, XF source: Calculated (layer 7)
              WaterBalance SoilWater: SummerDate=1-oct; SummerU=9; SummerCona=4.4; WinterDate=1-apr; WinterU=4; WinterCona=2; DiffusConst=88; DiffusSlope=35; Salb=0.13; CN2Bare=77; CNRed=37; CNCov=0.8; DischargeWidth=0; CatchmentArea=0; PSIDul=-100
                Thickness  SWCON  KLAT
                200        0.269  0
                100        0.389  0
                300        0.227  0
                300        0.301  0
                300        0.316  0
                400        0.292  0
                400        0.292  0
              Organic: FOMCNRatio=40; CarbonUnits=Total
                Thickness  Carbon  SoilCNRatio  FBiom  FInert  FOM
                50         6       12.27        0.079  0.432   124.07
                50         6       12.27        0.061  0.492   115.105
                50         6       12.27        0.048  0.543   106.788
                50         4.949   12.27        0.038  0.596   99.072
                50         3.383   13.89        0.031  0.651   91.914
                50         2.334   13.89        0.025  0.699   85.272
                50         1.63    14.44        0.021  0.743   79.111
                50         1.159   14.44        0.018  0.781   73.394
                50         0.843   14.44        0.016  0.816   68.091
                50         0.631   14.44        0.015  0.847   63.171
                250        0.33    12.86        0.012  0.918   43.417
                250        0.218   13.33        0.01   0.977   29.84
                500        0.201   13.33        0.01   0.991   14.095
                500        0.2     13.33        0.01   0.996   6.658
              Water: Thickness=[200, 100, 300, 300, 300, 400, 400]; InitialValues=[0.3975, 0.3209, 0.4211, 0.4016, 0.5169, 0.5169, 0.5169]; FilledFromTop=false
              Solute NO3: same as NZ Kiwifruit Expts.Orchard_LIN.Factors._.Gold.Soil.NO3
              Solute NH4: same as NZ Kiwifruit Expts.Orchard_LIN.Factors._.Gold.Soil.NH4
              Solute Urea: same as NZ Kiwifruit Expts.Orchard_LIN.Factors._.Gold.Soil.Urea
              Nutrient
              OutputLayers: Thickness=[400, 400, 400, 400, 200]
              SoilTemperature Temperature: InteractionsPerDay=8
      Simulation LIN_Gold
        Memo ReadMe
          * 	This is a Gold3 orchard
          * 	Irrigated
          * 	Steve to provide update (to July 2024)
          * 	Weather station (Paengaroa) next door - Steve to provide weather data
          *	Located in Paengaroa

          ++++++++++++++++++++++++++++++++++++++++++++

          Flowerin
        Clock: Start=2016-07-01; End=2025-09-07
        Summary SummaryFile
        Weather: FileName=Weather_SG/PaengaroaMetWatch.met
        MicroClimate: a_interception=0; b_interception=1; c_interception=0; d_interception=0; SoilHeatFluxFraction=0.4; MinimumHeightDiffForNewLayer=0; NightInterceptionFraction=0.5; ReferenceHeight=2
        SoilArbitrator Soil Arbitrator
        Manager AutomaticFertiliser
          AllowFertiliser = yes
          Depth2SoilN = 100
          CriticalSoilN = 30
          FertNAmount = 50
          FertType = UreaN
          FertApplicationDepth = 10
          FertMinimumDays = 6
```csharp
using APSIM.Core;
using System;
using Models.Core;
using Models.PMF;
using Models.Soils;
using APSIM.Shared.Utilities;
using System.Xml.Serialization;
using Models.Interfaces;
using Models.Soils.Nutrients;
using Newtonsoft.Json;

namespace Models
{
    [Serializable]
    public class Script : Model, IStructureDependency
    {
        [Link] private Clock Clock;
        [Link] private Fertiliser fertiliser;
        [Link] private ISummary summary;
        [Link] private Soil Soil;
        [Link(Type = LinkType.Scoped, ByName = true)] private Zone Row;
        private DateTime lastApplicationDate;
        private bool fertiliserIsAllowed;
        private int nLayers;
        [Link(ByName = true)]
        private ISolute NO3;
        [Link(ByName = true)]
        private ISolute NH4;
        [Link(ByName = true)]
        private ISolute Urea;
        [Link]
        private IPhysical soilPhysical;
        public IStructure Structure { private get; set; }

        //User inputs from properties tab
        [Description("Turn fertiliser applications on? ")]
        public yesnoType AllowFertiliser { get; set; }
        
        [Description("Depth to calculate available soil N (mm): ")]
        public double Depth2SoilN { get; set; }

        [Description("Minimum available N, triggers an application (kgN/ha): ")]
        public double CriticalSoilN { get; set; }

        [Description("Amount of N fertiliser for each application (kgN/ha): ")]
        public double FertNAmount { get; set; }

        [Description("Type of N fertiliser to apply: ")]
        [Display(Type = DisplayType.FertiliserType)]public string FertType { get; set; }

        [Description("Depth at which to apply the fertiliser (mm): ")]
        public double FertApplicationDepth { get; set; }
       
        [Description("Minimum period between applications (days): ")]
        public double FertMinimumDays { get; set; }
       
        public enum yesnoType
        {
            /// <summary>a positive answer</summary>
            yes,
            /// <summary>a negative answer</summary>
            no
        }

        [JsonIgnore] public double TopMineralN { get; set; }
        private bool CropIsActive { get; set; }
        


        

        [EventSubscribe("StartOfSimulation")]
        private void OnStartOfSimulation(object sender, EventArgs e)
        {
            fertiliserIsAllowed = (AllowFertiliser == yesnoType.yes);
            nLayers = soilPhysical.Thickness.Length;
        }

        [EventSubscribe("DoManagement")]
        private void OnDoManagement(object sender, EventArgs e)
        {
            double daysSinceLastApplication = (Clock.Today - lastApplicationDate).TotalDays;
            
            //Is the row crop actively growing?
            CropIsActive = false;
            double StageCode = (double)Structure.Get("STRUM.Phenology.Stage", relativeTo: Row);
            if ((StageCode > 3.0) && (StageCode<5.0))
            {
                CropIsActive = true;
            }
            
            // get the N stored in the soil
            double depthFromSurface = 0.0;
            double fracLayer = 0.0;
            TopMineralN = 0.0;
            for (int layer = 0; layer < nLayers; layer++)
            {
                fracLayer = Math.Min(1.0, (Depth2SoilN - depthFromSurface) / soilPhysical.Thickness[layer]);
                TopMineralN += (NO3.kgha[layer]
                + NH4.kgha[layer]
                + Urea.kgha[layer])
                * fracLayer;
                depthFromSurface += soilPhysical.Thickness[layer];
                if (depthFromSurface >= Depth2SoilN)
                    layer = nLayers;
            }

            if (fertiliserIsAllowed && CropIsActive && (daysSinceLastApplication >= FertMinimumDays) && (TopMineralN <= CriticalSoilN))
            {
                fertiliser.Apply(FertNAmount, FertType, FertApplicationDepth);
                lastApplicationDate = Clock.Today;
            }
        }
    }
}
```
        Manager RadiationWindFactor
```csharp
using System;
using Models.Core;
using Models.Interfaces;

namespace Models
{
    [Serializable]
    public class Script : Model
    {
        [Link] private IWeather weather;

        // ✅ Make these PUBLIC PROPERTIES so APSIM can see them
        public double RadiationFactor { get; set; } = 1.0;
        public double WindFactor { get; set; } = 1.0;

        [EventSubscribe("DoWeather")]
        private void OnDoWeather(object sender, EventArgs e)
        {
            weather.Radn *= RadiationFactor;
            weather.Wind *= WindFactor;
        }
    }
}
```
        RectangularZone Row: Length=100; Width=1.3; CanopyType=TreeRow; Slope=0; AspectAngle=0; Altitude=50
          Report RowZoneReport: EventNames=[Clock].DoReport
          Report KiwiReport: EventNames=[Clock].DoReport
            VariableNames:
              [Clock].Today
              [ResetDate].Script.SimulationYear as SimYear
              [Row].STRUM.AccumulatedWaterStress
              //[Row].STRUM.Arbitrator.DemandRatio
              [Row].Area
              [Row].STRUM.BaseHeight
              [Row].STRUM.Fruit.FreshYield_kgPerHa
              [Row].STRUM.CanopyArea
              [Row].STRUM.RootUptakesArbitrator.WaterDemand.Amount
              [Row].STRUM.RootUptakesArbitrator.WaterDemand.mm
              [Row].STRUM.RootUptakesArbitrator.NitrogenDemand.Amount
              [Row].STRUM.Root.Network.WtByLayerZone1
              [Row].STRUM.Root.Network.WtByLayerZone2
              [Row].STRUM.Arbitrator.Carbon.TotalPlantDemand
              [Row].STRUM.Arbitrator.Carbon.TotalPlantSupply
              [Row].STRUM.Arbitrator.Carbon.TotalPlantDemandsAllocated
              [Row].STRUM.Arbitrator.Fn
              [Row].STRUM.Arbitrator.Nitrogen.TotalPlantDemand
              [Row].STRUM.Arbitrator.Nitrogen.TotalPlantSupply
              [Row].STRUM.Arbitrator.Nitrogen.TotalPlantDemandsAllocated
              [Row].STRUM.Fruit.TotalCarbonDemand.RelativeFruitMass.Delta.Integral
              [Row].STRUM.Fruit.Allocated.Carbon.Total
              [Row].STRUM.Fruit.Allocated.Nitrogen.Total
              [Row].STRUM.Fruit.Carbon.Demands.Structural
              [Row].STRUM.Fruit.Carbon.Demands.Total
              [Row].STRUM.Fruit.DMC
              [Row].STRUM.Fruit.FreshWtPerFruit
              [Row].STRUM.Fruit.NextYearsFruitingBudSurvival
              [Row].STRUM.Fruit.Number.BudsSurvivalFromLastYear
              [Row].STRUM.Fruit.N
              [Row].STRUM.Fruit.Nitrogen.Demands.Total
              [Row].STRUM.Fruit.Number
              [Row].STRUM.Fruit.Diameter
              [Row].STRUM.Fruit.VolumePerFruit
              [Row].STRUM.Fruit.Wt
              [Row].STRUM.Fruit.PotentialDWPerFruit
              [Row].STRUM.Fruit.TotalCarbonDemand.RelativeFruitMass
              [Row].STRUM.Fruit.TotalCarbonDemand.CarbonConc
              [Row].STRUM.Height
              [Row].STRUM.Height.PrunedCanopyBaseHeight
              [Row].STRUM.Height.PrunedCanopyBaseHeight  + [Row].STRUM.Height.PrunedCanopyDepth
              [Row].STRUM.Height.PrunedCanopyBaseHeight  + [Row].STRUM.Height.PrunedCanopyDepth + [Row].STRUM.Height.SeasonalDepthGrowth
              [Row].STRUM.Leaf.Allocated.Carbon.Total
              [Row].STRUM.Leaf.Allocated.Nitrogen.Total
              [Row].STRUM.Leaf.Canopy.CoverGreen
              [Row].STRUM.Leaf.Canopy.Deepness
              [Row].STRUM.Leaf.Dead.Wt
              [Row].STRUM.Leaf.Carbon.Demands.Structural
              [Row].STRUM.Leaf.Carbon.Demands.Total
              [Row].STRUM.Leaf.Fn
              [Row].STRUM.Leaf.Canopy.Fw
              [Row].STRUM.Leaf.Canopy.LAI
              [Row].STRUM.Leaf.Live.Wt
              [Row].STRUM.Leaf.N
              [Row].STRUM.Leaf.Nitrogen.Demands.Total
              [Row].STRUM.Leaf.Canopy.PotentialEP
              [Row].STRUM.Leaf.Canopy.RadiationIntercepted
              [Row].STRUM.Leaf.Senesced.Weight.Structural
              [Row].STRUM.Leaf.SenescenceRate
              [Row].STRUM.Leaf.Canopy.Transpiration
              [Row].STRUM.Leaf.Canopy.WaterDemand
              [Row].STRUM.Leaf.Canopy.WaterAllocation
              [Row].STRUM.Leaf.Canopy.Width
              [Row].STRUM.Leaf.Canopy.GreenExtinctionCoefficient
              [Row].STRUM.Leaf.Wt
              [Row].STRUM.Phenology.Age.YearDecimal
              [Row].STRUM.Phenology.Age.Years
              [Row].STRUM.Phenology.CurrentStageName
              [Row].STRUM.Phenology.DaysSinceFlowering
              [Row].STRUM.Phenology.Stage
              [Row].STRUM.RelativeSeasonalDimension
              [Row].STRUM.RelativeAnnualDimension
              [Row].STRUM.Root.Allocated.Carbon.Total
              [Row].STRUM.Root.Allocated.Nitrogen.Total
              [Row].STRUM.Root.Network.Depth
              [Row].STRUM.Root.Carbon.Demands.Structural
              [Row].STRUM.Root.Carbon.Demands.Total
              [Row].STRUM.Root.N
              [Row].STRUM.Root.Nitrogen.Demands.Total
              [Row].STRUM.RootUptakesArbitrator.WaterUptake.AmountByZone
              [Row].STRUM.RootUptakesArbitrator.WaterUptake.Mm
              [Row].STRUM.RootUptakesArbitrator.WaterUptake.Amount
              [Row].STRUM.RootUptakesArbitrator.NitrogenUptake.AmountByZone
              [Row].STRUM.RootUptakesArbitrator.NitrogenUptake.Gpm2
              [Row].STRUM.RootUptakesArbitrator.NitrogenUptake.Amount
              [Row].STRUM.RootUptakesArbitrator.WaterSupply.AmountByZone
              [Row].STRUM.RootUptakesArbitrator.WaterSupply.Mm
              [Row].STRUM.RootUptakesArbitrator.WaterSupply.Amount
              [Row].STRUM.RootUptakesArbitrator.NitrogenSupply.AmountByZone
              [Row].STRUM.RootUptakesArbitrator.NitrogenSupply.Gpm2
              [Row].STRUM.RootUptakesArbitrator.NitrogenSupply.Amount
              [Row].STRUM.Root.Wt
              [Row].STRUM.TranspirationPerTree
              [Row].STRUM.Wood.Allocated.Carbon.Total
              [Row].STRUM.Wood.Allocated.Nitrogen.Total
              [Row].STRUM.Wood.Carbon.Demands.Structural
              [Row].STRUM.Wood.Carbon.Demands.Total
              [Row].STRUM.Wood.Carbon.Supplies.ReTranslocation
              [Row].STRUM.Wood.Live.Carbon.Structural * 1/0.4
              [Row].STRUM.Wood.Live.Carbon.Storage * 1/0.4
              [Row].STRUM.Wood.EnergyBalance.CoverTotal
              [Row].STRUM.Wood.EnergyBalance.DeadAreaIndex
              [Row].STRUM.Wood.EnergyBalance.LAIDead
              [Row].STRUM.Wood.EnergyBalance.RadiationInterceptedByDead
              [Row].STRUM.Wood.EnergyBalance.Transpiration
              [Row].STRUM.Wood.N
              [Row].STRUM.Wood.Nitrogen.Demands.Total
              [Row].STRUM.Wood.Wt
              [Row].STRUM.Width
              [Row].STRUM.Width.PrunedWidth
              [Row].STRUM.Width.PrunedWidth + [Row].STRUM.Width.SeasonalGrowth
              [Row].STRUM.TranspirationPerLeafArea
              [Row].SurfaceOrganicMatter.N
              [Row].SurfaceOrganicMatter.Wt
              [Row].Irrigation.IrrigationApplied
              [Row].Fertiliser.NitrogenApplied
              sum([Row].Soil.OutputLayers.SWmm)
              [Row].Soil.OutputLayers.SWmm
              ([Row].Soil.OutputLayers.SWmm[1] + [Row].Soil.OutputLayers.SWmm[2]+ [Row].Soil.OutputLayers.SWmm[3]) as SWmm0_120
              ([Row].Soil.OutputLayers.SWmm[1] + [Row].Soil.OutputLayers.SWmm[2]+ [Row].Soil.OutputLayers.SWmm[3] + [Row].Soil.OutputLayers.SWmm[4]) as SWmm0_160
              [Row].Soil.OutputLayers.SW
              [Row].Soil.OutputLayers.PAWmm
              ([Row].Soil.OutputLayers.PAWmm[1] + [Row].Soil.OutputLayers.PAWmm[2]+ [Row].Soil.OutputLayers.PAWmm[3]) as PAWmm0_120
              [Row].Soil.OutputLayers.SAT
              [Row].Soil.OutputLayers.DUL
              [Row].Soil.OutputLayers.LL15
              [Row].Soil.SoilWater.Evaporation
              [Row].Soil.SoilWater.Eo
              [Row].Soil.SoilWater.Runoff
              [Row].Soil.SoilWater.Drainage
              [Weather].PanEvap
              [Weather].Radn
              [Weather].Rain
              [STRUM].Leaf.TotalCarbonDemand.TotalDMDemand.SizeDemand.SizeDemand.SizeDemand.TargetSize
          Report Drainage: EventNames=[Clock].DoReport
            VariableNames:
              [Clock].Today
              sum of [Soil].SoilWater.Flux[5] from 2017-08-24 to 2024-03-15 as drainage
          SurfaceOrganicMatter: InitialResidueName=wheat_stubble; InitialResidueType=wheat; InitialResidueMass=500; InitialStandingFraction=0; InitialCPR=0; InitialCNR=100
          Fertiliser
          Manager AgrgateZoneVariables
```csharp
using Models.Climate;
using System;
using Models.Core;
using Models.PMF;
using System.Collections.Generic;
using Models.Soils;
using APSIM.Shared.Utilities;
using Models.Zones;
using Models.PMF.Organs;

namespace Models
{
    [Serializable]
    public class Script : Model
    {
        
    }
}
```
          Irrigation
          Operations
            2017-12-04  [Irrigation]. Apply (1.1)
            2017-12-07  [Irrigation]. Apply (6.5)
            2017-12-09  [Irrigation]. Apply (6.5)
            2017-12-11  [Irrigation]. Apply (6.5)
            2017-12-13  [Irrigation]. Apply (6.5)
            2017-12-15  [Irrigation]. Apply (6.3)
            2017-12-17  [Irrigation]. Apply (6.5)
            2017-12-19  [Irrigation]. Apply (6.4)
            2017-12-21  [Irrigation]. Apply (6.5)
            2017-12-23  [Irrigation]. Apply (6.2)
            2017-12-25  [Irrigation]. Apply (6.5)
            2017-12-31  [Irrigation]. Apply (5.2)
            2018-01-02  [Irrigation]. Apply (5.0)
            2018-01-30  [Irrigation]. Apply (4.5)
            2018-08-17  [Irrigation]. Apply (1.7)
            2018-10-06  [Irrigation]. Apply (5.2)
            2018-11-21  [Irrigation]. Apply (1.5)
            2018-12-07  [Irrigation]. Apply (7.0)
            2018-12-08  [Irrigation]. Apply (0.4)
            2019-01-07  [Irrigation]. Apply (6.2)
            2019-01-09  [Irrigation]. Apply (6.4)
            2019-01-11  [Irrigation]. Apply (6.1)
            2019-01-13  [Irrigation]. Apply (6.2)
            2019-01-21  [Irrigation]. Apply (6.5)
            2019-01-23  [Irrigation]. Apply (6.2)
            2019-01-25  [Irrigation]. Apply (6.4)
            2019-01-27  [Irrigation]. Apply (6.3)
            2019-01-29  [Irrigation]. Apply (7.3)
            2019-01-30  [Irrigation]. Apply (6.4)
            2019-01-31  [Irrigation]. Apply (2.1)
            2019-02-01  [Irrigation]. Apply (6.2)
            2019-02-03  [Irrigation]. Apply (6.4)
            2019-02-05  [Irrigation]. Apply (3.6)
            2019-02-07  [Irrigation]. Apply (3.9)
            2019-02-09  [Irrigation]. Apply (3.7)
            2019-02-11  [Irrigation]. Apply (5.1)
            2019-02-13  [Irrigation]. Apply (4.8)
            2019-02-15  [Irrigation]. Apply (4.4)
            2019-02-17  [Irrigation]. Apply (6.3)
            2019-02-19  [Irrigation]. Apply (6.1)
            2019-02-21  [Irrigation]. Apply (6.3)
            2019-02-27  [Irrigation]. Apply (4)
            2019-03-01  [Irrigation]. Apply (4.5)
            2019-03-03  [Irrigation]. Apply (3.7)
            2019-03-05  [Irrigation]. Apply (3.8)
            2019-03-07  [Irrigation]. Apply (3.8)
            2019-08-23  [Irrigation]. Apply (1.5)
            2019-10-03  [Irrigation]. Apply (6.1)
            2019-11-05  [Irrigation]. Apply (5.2)
            2019-11-07  [Irrigation]. Apply (5.2)
            2019-11-09  [Irrigation]. Apply (5.2)
            2019-11-25  [Irrigation]. Apply (5.2)
            2019-11-27  [Irrigation]. Apply (5.1)
            2019-11-29  [Irrigation]. Apply (5.1)
            2019-12-01  [Irrigation]. Apply (5.1)
            2019-12-03  [Irrigation]. Apply (5.1)
            2019-12-05  [Irrigation]. Apply (5.1)
            2019-12-07  [Irrigation]. Apply (5.1)
            2019-12-11  [Irrigation]. Apply (6.8)
            2019-12-13  [Irrigation]. Apply (5.0)
            2019-12-15  [Irrigation]. Apply (4.8)
            2019-12-17  [Irrigation]. Apply (4.7)
            2019-12-25  [Irrigation]. Apply (4.7)
            2020-01-01  [Irrigation]. Apply (0.2)
            2020-01-05  [Irrigation]. Apply (3.4)
            2020-01-07  [Irrigation]. Apply (3.7)
            2020-01-09  [Irrigation]. Apply (4.7)
            2020-01-11  [Irrigation]. Apply (5.1)
            2020-01-13  [Irrigation]. Apply (5.1)
            2020-01-15  [Irrigation]. Apply (5.1)
            2020-01-17  [Irrigation]. Apply (5.1)
            2020-01-19  [Irrigation]. Apply (5.0)
            2020-01-21  [Irrigation]. Apply (5.1)
            2020-01-23  [Irrigation]. Apply (5.1)
            2020-01-27  [Irrigation]. Apply (5.2)
            2020-01-29  [Irrigation]. Apply (5.0)
            2020-01-31  [Irrigation]. Apply (8.7)
            2020-02-02  [Irrigation]. Apply (5.0)
            2020-02-04  [Irrigation]. Apply (4.9)
            2020-02-05  [Irrigation]. Apply (1.0)
            2020-02-06  [Irrigation]. Apply (4.8)
            2020-02-08  [Irrigation]. Apply (7.1)
            2020-02-10  [Irrigation]. Apply (6.9)
            2020-02-12  [Irrigation]. Apply (4.2)
            2020-02-14  [Irrigation]. Apply (8.1)
            2020-02-16  [Irrigation]. Apply (7.7)
            2020-02-17  [Irrigation]. Apply (8.0)
            2020-02-18  [Irrigation]. Apply (7.7)
            2020-02-20  [Irrigation]. Apply (7.6)
            2020-02-22  [Irrigation]. Apply (7.5)
            2020-02-24  [Irrigation]. Apply (7.6)
            2020-02-26  [Irrigation]. Apply (5.1)
            2020-02-28  [Irrigation]. Apply (5.1)
            2020-03-01  [Irrigation]. Apply (5.1)
            2020-03-02  [Irrigation]. Apply (0.5)
            2020-03-03  [Irrigation]. Apply (4.7)
            2020-08-21  [Irrigation]. Apply (3.3)
            2020-09-16  [Irrigation]. Apply (0.7)
            2020-10-17  [Irrigation]. Apply (1.3)
            2020-12-06  [Irrigation]. Apply (4.8)
            2020-12-10  [Irrigation]. Apply (6.7)
            2020-12-13  [Irrigation]. Apply (5.1)
            2020-12-16  [Irrigation]. Apply (5.0)
            2020-12-18  [Irrigation]. Apply (4.8)
            2020-12-20  [Irrigation]. Apply (4.6)
            2020-12-22  [Irrigation]. Apply (4.9)
            2020-12-24  [Irrigation]. Apply (5.2)
            2020-12-26  [Irrigation]. Apply (5.1)
            2020-12-28  [Irrigation]. Apply (5.1)
            2020-12-30  [Irrigation]. Apply (5.0)
            2021-01-01  [Irrigation]. Apply (4.9)
            2021-01-03  [Irrigation]. Apply (4.9)
            2021-01-12  [Irrigation]. Apply (5.1)
            2021-01-14  [Irrigation]. Apply (4.9)
            2021-01-16  [Irrigation]. Apply (4.9)
            2021-01-18  [Irrigation]. Apply (4.3)
            2021-01-20  [Irrigation]. Apply (4.2)
            2021-01-22  [Irrigation]. Apply (2.3)
            2021-01-24  [Irrigation]. Apply (4.1)
            2021-01-26  [Irrigation]. Apply (4.1)
            2021-01-28  [Irrigation]. Apply (4.1)
            2021-01-30  [Irrigation]. Apply (4)
            2021-02-01  [Irrigation]. Apply (4.4)
            2021-02-03  [Irrigation]. Apply (4.1)
            2021-02-05  [Irrigation]. Apply (4.8)
            2021-02-07  [Irrigation]. Apply (4.7)
            2021-02-09  [Irrigation]. Apply (4.8)
            2021-02-11  [Irrigation]. Apply (3.9)
            2021-03-26  [Irrigation]. Apply (9.2)
            2021-08-26  [Irrigation]. Apply (1.3)
            2021-09-29  [Irrigation]. Apply (2)
            2021-11-20  [Irrigation]. Apply (5)
            2021-11-23  [Irrigation]. Apply (3.6)
            2021-11-25  [Irrigation]. Apply (4.6)
            2021-11-27  [Irrigation]. Apply (4.5)
            2021-11-30  [Irrigation]. Apply (4.6)
            2021-12-02  [Irrigation]. Apply (3.9)
            2021-12-09  [Irrigation]. Apply (5.3)
            2021-12-11  [Irrigation]. Apply (4.6)
            2021-12-22  [Irrigation]. Apply (4.7)
            2021-12-24  [Irrigation]. Apply (4.6)
            2021-12-26  [Irrigation]. Apply (0.7)
            2021-12-28  [Irrigation]. Apply (4.1)
            2021-12-30  [Irrigation]. Apply (4.7)
            2022-01-01  [Irrigation]. Apply (4.8)
            2022-01-03  [Irrigation]. Apply (4.7)
            2022-01-05  [Irrigation]. Apply (4.7)
            2022-01-07  [Irrigation]. Apply (4.7)
            2022-01-09  [Irrigation]. Apply (4.7)
            2022-01-11  [Irrigation]. Apply (4.7)
            2022-01-13  [Irrigation]. Apply (5)
            2022-01-15  [Irrigation]. Apply (4.9)
            2022-01-17  [Irrigation]. Apply (5)
            2022-01-19  [Irrigation]. Apply (4.8)
            2022-01-21  [Irrigation]. Apply (4.8)
            2022-01-23  [Irrigation]. Apply (4.6)
            2022-01-25  [Irrigation]. Apply (5)
            2022-01-27  [Irrigation]. Apply (4.7)
            2022-02-03  [Irrigation]. Apply (5)
            2022-02-05  [Irrigation]. Apply (5)
            2022-08-25  [Irrigation]. Apply (1.7)
            2022-09-07  [Irrigation]. Apply (6.8)
            2023-08-25  [Irrigation]. Apply (0.9)
            2023-12-18  [Irrigation]. Apply (5.2)
            2023-12-20  [Irrigation]. Apply (5.5)
            2023-12-22  [Irrigation]. Apply (0.2)
            2023-12-23  [Irrigation]. Apply (5.8)
            2023-12-26  [Irrigation]. Apply (5.7)
            2024-01-10  [Irrigation]. Apply (6.4)
            2024-02-09  [Irrigation]. Apply (5.9)
            2024-02-11  [Irrigation]. Apply (6.1)
            2024-02-13  [Irrigation]. Apply (6.1)
          Plant STRUM
          Soil: SoilType=Buried-allophanic Orthic Pumice Soils; Latitude=-41; Longitude=174; DataSource=Based on profile descriptions provided by Smap (Oropi_1a1)
            Chemical: PHUnits=Water
              Thickness  PH  CEC
              180        7   15.123
              180        7   8.039
              475        7   5.947
              1165       7   5.599
            Physical
              Thickness  ParticleSizeSand  ParticleSizeSilt  ParticleSizeClay  Rocks  BD     AirDry  LL15   DUL    SAT    KS
              180        57.5              34                8.5               0      0.894  0.082   0.125  0.275  0.566  1920
              180        64                29.5              6.5               0      1.043  0.111   0.111  0.249  0.534  1200
              275        56.5              32                11.5              0      0.96   0.126   0.126  0.276  0.536  1920
              288.3      56.5              32                11.5              0      0.96   0.146   0.146  0.336  0.536  1920
              299.8      54.5              35                10.5              0      0.984  0.162   0.162  0.412  0.557  1440
              388.3      54.5              35                10.5              0      0.984  0.162   0.162  0.392  0.557  1440
              388.6      54.5              35                10.5              0      0.984  0.162   0.162  0.392  0.557  1440
              SoilCrop STRUMSoil: LL=[0.15, 0.111, 0.126, 0.146, 0.162, 0.162, 0.162]; KL=[0.116, 0.077, 0.042, 0.013, 0.005, 0, 0.06]; XF=[1, 1, 1, 1, 1, 1, 1]
                LL, KL source: Calculated (layer 7)
            WaterBalance SoilWater: same as NZ Kiwifruit Expts.Orchard_LIN.Factors._.Gold.Soil.SoilWater
            Organic: same as NZ Kiwifruit Expts.Orchard_LIN.Factors._.Gold.Soil.Organic
            Water: Thickness=[180, 180, 275, 288.3, 299.8, 388.3, 388.3]; InitialValues=[0.275, 0.249, 0.276, 0.336, 0.412, 0.392, 0.392]; FilledFromTop=false
            Solute NO3: same as NZ Kiwifruit Expts.Orchard_LIN.Factors._.Gold.Soil.NO3
            Solute NH4: same as NZ Kiwifruit Expts.Orchard_LIN.Factors._.Gold.Soil.NH4
            Solute Urea: same as NZ Kiwifruit Expts.Orchard_LIN.Factors._.Gold.Soil.Urea
            Nutrient
            OutputLayers: Thickness=[400, 400, 400, 400, 200, 200]
            SoilTemperature Temperature: InteractionsPerDay=8
          StrumTreeInstance KiwiFruitOG (disabled): TreeType=Deciduous; RowSpacing=3.6; InterRowSpacing=3; AlleyZoneWidthFrac=0.1; BudBreakDate=19-Sep; StartFullCanopyDate=15-Dec; StartLeafFallDate=18-May; EndLeafFallDate=21-Jun; DBHatMaturity=5; TypicalCanopyArea=22; WoodBulkDensity=450; WoodStorageFraction=0.2; MaximumLeafBiomass=150; MaximumRootBiomass=200; AgeAtSimulationStart=6; YearsToMaxDimension=6; CrownShape=1; MatureCanopyBaseHeight=1.8; MaturePrunedCanopyBaseHeight=1.8; MatureHeight=2.4; MaturePrunedHeight=2.4; MatureWidth=3.4; MaturePrunedWidth=3.4; SummerPruneDates=[15-Jul]; FRemoveSummerPrune=0.25; RootNConc=0.01; LeafNConc=0.02; WoodNConc=0.005; FruitNConc=0.02; NFixationFrac=0; GRINZ=true; MaxRD=1; ExtinctCoeff=0.8; BaseCover=0.15; MaxCover=0.95; RUE=2; PSBaseT=10; PSLOptT=20; PSUOptT=25; PSMaxT=35; GSMax=0.011; R50=125; SurfaceKL=0.1; WaterStress=true; Number=60; PotentialFWPerFruit=140; DMC=0.17; FruitDensity=1.02; DateMaxBloom=7-Nov; DAFStartLinearGrowth=90; DAFEndLinearGrowth=180; DAFMaxSize=200
          StrumTreeInstance KiwiFruit: TreeType=Deciduous; RowSpacing=3.6; InterRowSpacing=3; AlleyZoneWidthFrac=0.1; BudBreakDate=19-Sep; StartFullCanopyDate=15-Dec; StartLeafFallDate=18-May; EndLeafFallDate=21-Jun; DBHatMaturity=5; TypicalCanopyArea=22; WoodBulkDensity=450; WoodStorageFraction=0.2; MaximumLeafBiomass=150; MaximumRootBiomass=200; AgeAtSimulationStart=6; YearsToMaxDimension=6; CrownShape=1; MatureCanopyBaseHeight=1.8; MaturePrunedCanopyBaseHeight=1.8; MatureHeight=2.4; MaturePrunedHeight=2.4; MatureWidth=3.4; MaturePrunedWidth=3.4; SummerPruneDates=[15-Jul]; FRemoveSummerPrune=0.25; RootNConc=0.01; LeafNConc=0.02; WoodNConc=0.005; FruitNConc=0.02; NFixationFrac=0; GRINZ=true; MaxRD=1; ExtinctCoeff=0.8; BaseCover=0; MaxCover=0.95; RUE=2; PSBaseT=10; PSLOptT=20; PSUOptT=25; PSMaxT=35; GSMax=0.011; R50=125; SurfaceKL=0.1; WaterStress=true; Number=60; PotentialFWPerFruit=140; DMC=0.17; FruitDensity=1.02; DateMaxBloom=7-Nov; DAFStartLinearGrowth=90; DAFEndLinearGrowth=180; DAFMaxSize=200
        Manager ResetDate
          ResetDate = 01-Jul
```csharp
using Newtonsoft.Json;
using Models.PMF.Organs;
using Models.Soils.Nutrients;
using Models.Interfaces;
using System;
using Models.Core;
using System.Collections.Generic;
using System.Text;
using Models.Soils;
using Models.PMF;
using Models;
using System.Xml.Serialization;
using APSIM.Shared.Utilities;
using Models.Climate;



namespace Models
{
    [Serializable] 
    //[System.Xml.Serialization.XmlInclude(typeof(Model))]
    public class Script : Model
    {
    
     [Link] private Clock Clock;
        
    [Separator("Helper script to summarise variables")]
    [Description(" Date to reset the day counter: ")]
    public string ResetDate { get; set; }
                  
        [JsonIgnore] public double SimulationYear { get; set; }
        [JsonIgnore] public double DAS { get; set; }
        
         [EventSubscribe("StartOfSimulation")]
        private void DoStartOfSimulation(object sender, EventArgs e)
        {
                DAS = 0;
                SimulationYear = Clock.Today.Year;
        }
        
        [EventSubscribe("StartOfDay")]
        private void OnStartOfDay(object sender, EventArgs e)
        {
            DAS += 1;
            if (DateUtilities.DatesAreEqual(ResetDate, Clock.Today.Date))
            //if (DateUtilities.DatesAreEqual("Jul-1", Clock.Today.Date))
            {
                SimulationYear += 1;
                DAS = 1;
                
            }
        }
    
    }
}
```
      Memo Reason why drainage looks bad
        The flux meters were flooded by a rising water table so the drainage observations are not representative of actual drainage
    Experiment Orchard_OPK
      Factors
        Factor _
          CompositeFactor Gold
            Specifications:
              [RadiationWindFactor].Script.RadiationFactor = 1
              [RadiationWindFactor].Script.WindFactor = 0.5
              [Soil]
            Soil: SoilType=Allophanic Orthic Pumice Soils; Latitude=-41; Longitude=174
              DataSource=Based on profile descriptions provided by Smap (Opotiki_1a1)
              Chemical: PHUnits=Water
                Thickness  PH  CEC
                210        7   15.39
                220        7   7.86369
                275        7   4.0213
                1295       7   4.49567
              Physical
                Thickness  ParticleSizeSand  ParticleSizeSilt  ParticleSizeClay  Rocks  BD     AirDry  LL15   DUL    SAT    KS
                210        55                36                9                 0      0.874  0.085   0.161  0.33   0.4    1920
                220        55                36                9                 0      1.009  0.125   0.137  0.313  0.407  1440
                275        62.5              34                3.5               0      1.026  0.191   0.192  0.32   0.375  1920
                323.8      65                26.5              8.5               0      1.053  0.209   0.209  0.35   0.42   1920
                323.8      65                26.5              8.5               0      1.053  0.219   0.219  0.39   0.51   1920
                323.8      65                26.5              8.5               0      1.053  0.219   0.219  0.39   0.51   1920
                323.8      65                26.5              8.5               0      1.053  0.109   0.109  0.32   0.431  1920
                Rocks source: Calculated
                SoilCrop STRUMSoil: LL=[0.161, 0.137, 0.192, 0.209, 0.219, 0.219, 0.109]; KL=[0.112, 0.068, 0.045, 0.023, 0.011, 0.004, 0]; XF=[1, 1, 1, 1, 1, 1, 1]
              WaterBalance SoilWater: SummerDate=1-oct; SummerU=9; SummerCona=4.4; WinterDate=1-apr; WinterU=4; WinterCona=2; DiffusConst=88; DiffusSlope=35; Salb=0.13; CN2Bare=77; CNRed=37; CNCov=0.8; DischargeWidth=0; CatchmentArea=0; PSIDul=-100
                Thickness  SWCON  KLAT
                210        0.4    0
                220        0.4    0
                275        0.45   0
                1295       0.3    0
              Organic: same as NZ Kiwifruit Expts.Orchard_LIN.Factors._.SMAP.Oropi_1a1.Organic
              Water: Thickness=[210, 220, 275, 323.8, 323.8, 323.8, 323.8]; InitialValues=[0.33, 0.313, 0.32, 0.35, 0.39, 0.39, 0.32]; FilledFromTop=false
              Solute NO3: Thickness=[210, 220, 275, 1295]; InitialValues=[7.24638, 2.60225, 0.0573329, 0.0558628]; InitialValuesUnits=ppm; WaterTableConcentration=0; D0=0; DepthConstant=0; MaxDepthSoluteAccessible=0; RunoffEffectivenessAtMovingSolute=0; MaxEffectiveRunoff=0
              Solute NH4: Thickness=[210, 220, 275, 1295]; InitialValues=[1.087, 0.39, 0.009, 0.008]; InitialValuesUnits=ppm; WaterTableConcentration=0; D0=0; DepthConstant=0; MaxDepthSoluteAccessible=0; RunoffEffectivenessAtMovingSolute=0; MaxEffectiveRunoff=0
              Solute Urea: Thickness=[210, 220, 275, 1295]; InitialValues=[0, 0, 0, 0]; InitialValuesUnits=kg/ha; WaterTableConcentration=0; D0=0; DepthConstant=0; MaxDepthSoluteAccessible=0; RunoffEffectivenessAtMovingSolute=0; MaxEffectiveRunoff=0
              Nutrient
              OutputLayers: Thickness=[400, 400, 400, 400, 200]
              SoilTemperature Temperature: InteractionsPerDay=8
          CompositeFactor SMAP
            Specifications:
              [RadiationWindFactor].Script.RadiationFactor = 1
              [RadiationWindFactor].Script.WindFactor = 0.5
              [Soil]
            Soil Opotiki_1a1: SoilType=Allophanic Orthic Pumice Soils; LocalName=Opotiki_1a1; Latitude=-41; Longitude=174
              DataSource=Profile descriptions provided by Smap based on the work done by Trevor Webb.
              Chemical: Thickness=[210, 220, 275, 1295]; PH=[7, 7, 7, 7]; PHUnits=Water
              Physical
                Thickness  ParticleSizeSand  ParticleSizeSilt  ParticleSizeClay  BD     AirDry  LL15   DUL    SAT    KS
                210        55                36                9                 0.874  0.085   0.171  0.403  0.598  1920
                220        55                36                9                 1.009  0.125   0.157  0.353  0.547  1440
                275        62.5              34                3.5               1.026  0.092   0.092  0.32   0.541  1920
                323.8      65                26.5              8.5               1.053  0.109   0.109  0.32   0.531  1920
                323.8      65                26.5              8.5               1.053  0.109   0.109  0.32   0.531  1920
                323.8      65                26.5              8.5               1.053  0.109   0.109  0.32   0.531  1920
                323.8      65                26.5              8.5               1.053  0.109   0.109  0.32   0.531  1920
                SoilCrop STRUMSoil
                  LL=[0.171, 0.157, 0.092, 0.109, 0.109, 0.109, 0.109]
                  KL=[0.11032, 0.0695932, 0.047773, 0.0251508, 0.0125665, 0.00627877, 0]
                  XF=[1, 1, 1, 1, 1, 1, 1]
              WaterBalance SoilWater: same as NZ Kiwifruit Expts.Orchard_OPK.Factors._.Gold.Soil.SoilWater
              Organic: same as NZ Kiwifruit Expts.Orchard_LIN.Factors._.SMAP.Oropi_1a1.Organic
              Water: Thickness=[210, 220, 275, 323.8, 323.8, 323.8, 323.8]; InitialValues=[0.3798, 0.3334, 0.2972, 0.2989, 0.2989, 0.2989, 0.2989]; FilledFromTop=false
              LayerStructure: Thickness=[210, 220, 275, 323.8, 323.8, 323.8, 323.8]
              Solute NO3: same as NZ Kiwifruit Expts.Orchard_OPK.Factors._.Gold.Soil.NO3
              Solute NH4: Thickness=[210, 220, 275, 1295]; InitialValues=[1.08696, 0.390337, 0.00859993, 0.00837942]; InitialValuesUnits=ppm; WaterTableConcentration=0; D0=0; DepthConstant=0; MaxDepthSoluteAccessible=0; RunoffEffectivenessAtMovingSolute=0; MaxEffectiveRunoff=0
              Solute Urea: same as NZ Kiwifruit Expts.Orchard_OPK.Factors._.Gold.Soil.Urea
              Nutrient
              SoilTemperature Temperature: InteractionsPerDay=8
              OutputLayers: Thickness=[400, 400, 400, 400, 200]
          CompositeFactor FSL
            Specifications:
              [RadiationWindFactor].Script.RadiationFactor = 1
              [RadiationWindFactor].Script.WindFactor = 0.5
              [Soil]
            Soil: SoilType=Allophanic Orthic Pumice Soils; Latitude=-41; Longitude=174
              DataSource=Based on profile descriptions provided by Smap (Opotiki_1a1)
              Chemical: PHUnits=Water
                Thickness  PH  CEC
                210        7   15.39
                220        7   7.86369
                275        7   4.0213
                1295       7   4.49567
              Physical
                Thickness  ParticleSizeSand  ParticleSizeSilt  ParticleSizeClay  Rocks  BD    AirDry  LL15   DUL    SAT    KS
                200        47.8              39                13.2              0      0.9   0.06    0.18   0.407  0.656  540
                300        50.1              33.1              16.8              0      0.93  0.178   0.198  0.376  0.644  1410
                200        50.1              33.1              16.8              0      0.93  0.198   0.198  0.376  0.644  1410
                200        40.8              33.2              26                0      0.82  0.315   0.315  0.492  0.687  86
                300        40.8              33.2              26                0      0.82  0.315   0.315  0.492  0.687  86
                400        40.8              33.2              26                0      0.82  0.315   0.315  0.492  0.687  86
                400        40.8              33.2              26                0      0.82  0.315   0.315  0.492  0.687  86
                SoilCrop STRUMSoil: LL=[0.18, 0.198, 0.198, 0.315, 0.315, 0.315, 0.315]; KL=[0.112, 0.068, 0.045, 0.023, 0.011, 0.004, 0]; XF=[1, 1, 1, 1, 1, 1, 1]
              WaterBalance SoilWater: SummerDate=1-oct; SummerU=9; SummerCona=4.4; WinterDate=1-apr; WinterU=4; WinterCona=2; DiffusConst=88; DiffusSlope=35; Salb=0.13; CN2Bare=77; CNRed=37; CNCov=0.8; DischargeWidth=0; CatchmentArea=0; PSIDul=-100
                Thickness  SWCON  KLAT
                200        0.263  0
                300        0.301  0
                200        0.339  0
                200        0.133  0
                300        0.101  0
                400        0.082  0
                400        0.082  0
              Organic: FOMCNRatio=40; CarbonUnits=Total
                Thickness  Carbon    SoilCNRatio  FBiom      FInert    FOM
                50         6         12.44        0.0788566  0.431898  124.07
                50         6         12.44        0.0610103  0.491926  115.105
                50         6         12.44        0.0477893  0.542739  106.788
                50         4.94864   12.44        0.037995   0.5956    99.0722
                50         3.38311   16           0.0307392  0.650815  91.9135
                50         2.3337    16           0.025364   0.69947   85.2722
                50         1.63026   16           0.0213819  0.742644  79.1107
                50         1.15873   16           0.0184319  0.781204  73.3945
                50         0.842658  16           0.0162465  0.815767  68.0912
                50         0.630787  16           0.0146275  0.846679  63.1712
                250        0.32975   16           0.0118814  0.917701  43.4169
                250        0.21756   12.5         0.0104198  0.97694   29.84
                500        0.200874  12.5         0.0100442  0.990833  14.0954
                500        0.200016  12.5         0.0100022  0.996255  6.6582
              Water: Thickness=[200, 300, 200, 200, 300, 400, 400]; InitialValues=[0.3843, 0.3582, 0.3582, 0.4743, 0.4743, 0.4743, 0.4743]; FilledFromTop=false
              Solute NO3: same as NZ Kiwifruit Expts.Orchard_OPK.Factors._.Gold.Soil.NO3
              Solute NH4: same as NZ Kiwifruit Expts.Orchard_OPK.Factors._.Gold.Soil.NH4
              Solute Urea: same as NZ Kiwifruit Expts.Orchard_OPK.Factors._.Gold.Soil.Urea
              Nutrient
              OutputLayers: Thickness=[400, 400, 400, 400, 200]
              SoilTemperature Temperature: InteractionsPerDay=8
              Memo ReadOrchardConfiguration
                1.   Sheltered - **ALL**

                2.   Netted - **LIN/Paengaroa, Pukehina, Waiuku**

                3.   Irrigated - **LIN/Paengaroa, OPK/Opotiki, OCR/Pukehina, Katikati, Pukehina, Waiuku**
      Simulation Orchard_OPK
        Memo ReadMe
          *	This is a Gold3 orchard
          *	Didn't irrigate during covid - 2019/20 was really dry
          *	Located in Opotiki

          *	Using Whakatane weather - see reason below -
          *	Many missing data points in Opotiki Metwatch!!!! (see csv file)
        Clock: Start=2016-07-01; End=2025-09-06
        Summary SummaryFile
        Weather: FileName=Weather_SG/WhakataneMetWatch.met
        MicroClimate: a_interception=0; b_interception=1; c_interception=0; d_interception=0; SoilHeatFluxFraction=0.4; MinimumHeightDiffForNewLayer=0; NightInterceptionFraction=0.5; ReferenceHeight=2
        SoilArbitrator Soil Arbitrator
        Manager AutomaticFertiliser
          AllowFertiliser = yes
          Depth2SoilN = 600
          CriticalSoilN = 120
          FertNAmount = 50
          FertType = UreaN
          FertApplicationDepth = 10
          FertMinimumDays = 15
          script: same as in NZ Kiwifruit Expts.Orchard_LIN.LIN_Gold.AutomaticFertiliser
        Manager RadiationWindFactor
```csharp
using System;
using Models.Core;
using Models.Interfaces;

namespace Models
{
    [Serializable]
    public class Script : Model
    {
        [Link] private IWeather weather;

        public double RadiationFactor { get; set; } = 1.0;
        public double WindFactor { get; set; } = 1.0;

        [EventSubscribe("DoWeather")]
        private void OnDoWeather(object sender, EventArgs e)
        {
            weather.Radn *= RadiationFactor;
            weather.Wind *= WindFactor;
        }
    }
}
```
        RectangularZone Row: Length=100; Width=1.3; CanopyType=TreeRow; Slope=0; AspectAngle=0; Altitude=50
          Report RowZoneReport: EventNames=[Clock].DoReport
          Report KiwiReport: EventNames=[Clock].DoReport
            VariableNames:
              [Clock].Today
              [ResetDate].Script.SimulationYear as SimYear
              [Row].Soil.SoilWater.Drainage
              [Row].STRUM.AccumulatedWaterStress
              //[Row].STRUM.Arbitrator.DemandRatio
              [Row].Area
              [Row].STRUM.BaseHeight
              [Row].STRUM.Fruit.FreshYield_kgPerHa
              [Row].STRUM.CanopyArea
              [Row].STRUM.RootUptakesArbitrator.WaterDemand.Amount
              [Row].STRUM.RootUptakesArbitrator.WaterDemand.mm
              [Row].STRUM.RootUptakesArbitrator.NitrogenDemand.Amount
              [Row].STRUM.Root.Network.WtByLayerZone1
              [Row].STRUM.Root.Network.WtByLayerZone2
              [Row].STRUM.Arbitrator.Carbon.TotalPlantDemand
              [Row].STRUM.Arbitrator.Carbon.TotalPlantSupply
              [Row].STRUM.Arbitrator.Carbon.TotalPlantDemandsAllocated
              [Row].STRUM.Arbitrator.Fn
              [Row].STRUM.Arbitrator.Nitrogen.TotalPlantDemand
              [Row].STRUM.Arbitrator.Nitrogen.TotalPlantSupply
              [Row].STRUM.Arbitrator.Nitrogen.TotalPlantDemandsAllocated
              [Row].STRUM.Fruit.TotalCarbonDemand.RelativeFruitMass.Delta.Integral
              [Row].STRUM.Fruit.Allocated.Carbon.Total
              [Row].STRUM.Fruit.Allocated.Nitrogen.Total
              [Row].STRUM.Fruit.Carbon.Demands.Structural
              [Row].STRUM.Fruit.Carbon.Demands.Total
              [Row].STRUM.Fruit.DMC
              [Row].STRUM.Fruit.FreshWtPerFruit
              [Row].STRUM.Fruit.NextYearsFruitingBudSurvival
              [Row].STRUM.Fruit.Number.BudsSurvivalFromLastYear
              [Row].STRUM.Fruit.N
              [Row].STRUM.Fruit.Nitrogen.Demands.Total
              [Row].STRUM.Fruit.Number
              [Row].STRUM.Fruit.Diameter
              [Row].STRUM.Fruit.VolumePerFruit
              [Row].STRUM.Fruit.Wt
              [Row].STRUM.Fruit.PotentialDWPerFruit
              [Row].STRUM.Fruit.TotalCarbonDemand.RelativeFruitMass
              [Row].STRUM.Fruit.TotalCarbonDemand.CarbonConc
              [Row].STRUM.Height
              [Row].STRUM.Height.PrunedCanopyBaseHeight
              [Row].STRUM.Height.PrunedCanopyBaseHeight  + [Row].STRUM.Height.PrunedCanopyDepth
              [Row].STRUM.Height.PrunedCanopyBaseHeight  + [Row].STRUM.Height.PrunedCanopyDepth + [Row].STRUM.Height.SeasonalDepthGrowth
              [Row].STRUM.Leaf.Allocated.Carbon.Total
              [Row].STRUM.Leaf.Allocated.Nitrogen.Total
              [Row].STRUM.Leaf.Canopy.CoverGreen
              [Row].STRUM.Leaf.Canopy.Deepness
              [Row].STRUM.Leaf.Dead.Wt
              [Row].STRUM.Leaf.Carbon.Demands.Structural
              [Row].STRUM.Leaf.Carbon.Demands.Total
              [Row].STRUM.Leaf.Fn
              [Row].STRUM.Leaf.Canopy.Fw
              [Row].STRUM.Leaf.Canopy.LAI
              [Row].STRUM.Leaf.Live.Wt
              [Row].STRUM.Leaf.N
              [Row].STRUM.Leaf.Nitrogen.Demands.Total
              [Row].STRUM.Leaf.Canopy.PotentialEP
              [Row].STRUM.Leaf.Canopy.RadiationIntercepted
              [Row].STRUM.Leaf.Senesced.Weight.Structural
              [Row].STRUM.Leaf.SenescenceRate
              [Row].STRUM.Leaf.Canopy.Transpiration
              [Row].STRUM.Leaf.Canopy.WaterDemand
              [Row].STRUM.Leaf.Canopy.WaterAllocation
              [Row].STRUM.Leaf.Canopy.Width
              [Row].STRUM.Leaf.Canopy.GreenExtinctionCoefficient
              [Row].STRUM.Leaf.Wt
              [Row].STRUM.Phenology.Age.YearDecimal
              [Row].STRUM.Phenology.Age.Years
              [Row].STRUM.Phenology.CurrentStageName
              [Row].STRUM.Phenology.DaysSinceFlowering
              [Row].STRUM.Phenology.Stage
              [Row].STRUM.RelativeSeasonalDimension
              [Row].STRUM.RelativeAnnualDimension
              [Row].STRUM.Root.Allocated.Carbon.Total
              [Row].STRUM.Root.Allocated.Nitrogen.Total
              [Row].STRUM.Root.Network.Depth
              [Row].STRUM.Root.Carbon.Demands.Structural
              [Row].STRUM.Root.Carbon.Demands.Total
              [Row].STRUM.Root.N
              [Row].STRUM.Root.Nitrogen.Demands.Total
              [Row].STRUM.RootUptakesArbitrator.WaterUptake.AmountByZone
              [Row].STRUM.RootUptakesArbitrator.WaterUptake.Mm
              [Row].STRUM.RootUptakesArbitrator.WaterUptake.Amount
              [Row].STRUM.RootUptakesArbitrator.NitrogenUptake.AmountByZone
              [Row].STRUM.RootUptakesArbitrator.NitrogenUptake.Gpm2
              [Row].STRUM.RootUptakesArbitrator.NitrogenUptake.Amount
              [Row].STRUM.RootUptakesArbitrator.WaterSupply.AmountByZone
              [Row].STRUM.RootUptakesArbitrator.WaterSupply.Mm
              [Row].STRUM.RootUptakesArbitrator.WaterSupply.Amount
              [Row].STRUM.RootUptakesArbitrator.NitrogenSupply.AmountByZone
              [Row].STRUM.RootUptakesArbitrator.NitrogenSupply.Gpm2
              [Row].STRUM.RootUptakesArbitrator.NitrogenSupply.Amount
              [Row].STRUM.Root.Wt
              [Row].STRUM.TranspirationPerTree
              [Row].STRUM.Wood.Allocated.Carbon.Total
              [Row].STRUM.Wood.Allocated.Nitrogen.Total
              [Row].STRUM.Wood.Carbon.Demands.Structural
              [Row].STRUM.Wood.Carbon.Demands.Total
              [Row].STRUM.Wood.Carbon.Supplies.ReTranslocation
              [Row].STRUM.Wood.Live.Carbon.Structural * 1/0.4
              [Row].STRUM.Wood.Live.Carbon.Storage * 1/0.4
              [Row].STRUM.Wood.EnergyBalance.CoverTotal
              [Row].STRUM.Wood.EnergyBalance.DeadAreaIndex
              [Row].STRUM.Wood.EnergyBalance.LAIDead
              [Row].STRUM.Wood.EnergyBalance.RadiationInterceptedByDead
              [Row].STRUM.Wood.EnergyBalance.Transpiration
              [Row].STRUM.Wood.N
              [Row].STRUM.Wood.Nitrogen.Demands.Total
              [Row].STRUM.Wood.Wt
              [Row].STRUM.Width
              [Row].STRUM.Width.PrunedWidth
              [Row].STRUM.Width.PrunedWidth + [Row].STRUM.Width.SeasonalGrowth
              [Row].STRUM.TranspirationPerLeafArea
              [Row].SurfaceOrganicMatter.N
              [Row].SurfaceOrganicMatter.Wt
              [Row].Irrigation.IrrigationApplied
              [Row].Fertiliser.NitrogenApplied
              sum([Row].Soil.OutputLayers.SWmm)
              [Row].Soil.OutputLayers.SWmm
              ([Row].Soil.OutputLayers.SWmm[1] + [Row].Soil.OutputLayers.SWmm[2]) as SWmm0_80
              ([Row].Soil.OutputLayers.SWmm[1] + [Row].Soil.OutputLayers.SWmm[2]+ [Row].Soil.OutputLayers.SWmm[3]) as SWmm0_120
              ([Row].Soil.OutputLayers.SWmm[1] + [Row].Soil.OutputLayers.SWmm[2]+ [Row].Soil.OutputLayers.SWmm[3] + [Row].Soil.OutputLayers.SWmm[4]) as SWmm0_160
              [Row].Soil.OutputLayers.SW
              ([Row].Soil.OutputLayers.SW[1] + [Row].Soil.OutputLayers.SW[2])/2 as VWC_0_80
              ([Row].Soil.OutputLayers.SW[1] + [Row].Soil.OutputLayers.SW[2] + [Row].Soil.OutputLayers.SW[3])/3 as VWC_0_120
              ([Row].Soil.OutputLayers.SW[1] + [Row].Soil.OutputLayers.SW[2] + [Row].Soil.OutputLayers.SW[3] + [Row].Soil.OutputLayers.SW[3])/4 as VWC_0_160
              [Row].Soil.OutputLayers.SAT
              [Row].Soil.OutputLayers.DUL
              [Row].Soil.OutputLayers.LL15
              [Row].Soil.OutputLayers.PAWmm
              ([Row].Soil.OutputLayers.PAWmm[1] + [Row].Soil.OutputLayers.PAWmm[2]+ [Row].Soil.OutputLayers.PAWmm[3]) as PAWmm0_120
              [Row].Soil.SoilWater.Evaporation
              [Row].Soil.SoilWater.Eo
              [Row].Soil.SoilWater.Runoff
              [Weather].PanEvap
              [Weather].Radn
              [Weather].Rain
              [STRUM].Leaf.TotalCarbonDemand.TotalDMDemand.SizeDemand.SizeDemand.SizeDemand.TargetSize
          Report Drainage: EventNames=[Clock].DoReport
            VariableNames:
              [Clock].Today
              sum of [Soil].SoilWater.Flux[5] from 2017-08-24 to 2024-03-15 as drainage
          SurfaceOrganicMatter: InitialResidueName=wheat_stubble; InitialResidueType=wheat; InitialResidueMass=500; InitialStandingFraction=0; InitialCPR=0; InitialCNR=100
          Fertiliser
          Manager AgrgateZoneVariables
            script: same as in NZ Kiwifruit Expts.Orchard_LIN.LIN_Gold.Row.AgrgateZoneVariables
          Irrigation
          Operations
            2016-12-29  [Irrigation]. Apply (4)
            2016-12-31  [Irrigation]. Apply (3.7)
            2017-01-02  [Irrigation]. Apply (3.8)
            2017-01-03  [Irrigation]. Apply (6.4)
            2017-01-05  [Irrigation]. Apply (3.4)
            2017-01-07  [Irrigation]. Apply (3.5)
            2017-01-09  [Irrigation]. Apply (3.4)
            2017-01-10  [Irrigation]. Apply (3.5)
            2017-01-12  [Irrigation]. Apply (3.6)
            2017-01-14  [Irrigation]. Apply (3.6)
            2017-01-16  [Irrigation]. Apply (3.5)
            2017-01-17  [Irrigation]. Apply (6.1)
            2017-01-19  [Irrigation]. Apply (3.5)
            2017-01-21  [Irrigation]. Apply (3.5)
            2017-01-28  [Irrigation]. Apply (3.4)
            2017-01-30  [Irrigation]. Apply (3.5)
            2017-02-02  [Irrigation]. Apply (3.9)
            2017-02-04  [Irrigation]. Apply (4)
            2017-02-06  [Irrigation]. Apply (3.9)
            2017-02-07  [Irrigation]. Apply (6.7)
            2017-02-09  [Irrigation]. Apply (4)
            2017-02-11  [Irrigation]. Apply (4)
            2017-02-13  [Irrigation]. Apply (4)
            2017-02-14  [Irrigation]. Apply (6.6)
            2017-02-16  [Irrigation]. Apply (3.9)
            2017-06-08  [Irrigation]. Apply (0.1)
            2017-12-01  [Irrigation]. Apply (0.6)
            2017-12-02  [Irrigation]. Apply (3.1)
            2017-12-03  [Irrigation]. Apply (0.6)
            2017-12-04  [Irrigation]. Apply (3)
            2017-12-05  [Irrigation]. Apply (1.9)
            2017-12-06  [Irrigation]. Apply (3.6)
            2017-12-09  [Irrigation]. Apply (0.3)
            2017-12-10  [Irrigation]. Apply (0.8)
            2017-12-11  [Irrigation]. Apply (3.4)
            2017-12-12  [Irrigation]. Apply (0.7)
            2017-12-13  [Irrigation]. Apply (3.3)
            2017-12-14  [Irrigation]. Apply (7.7)
            2017-12-15  [Irrigation]. Apply (4.3)
            2017-12-16  [Irrigation]. Apply (3.5)
            2017-12-17  [Irrigation]. Apply (0.7)
            2017-12-18  [Irrigation]. Apply (3.3)
            2017-12-23  [Irrigation]. Apply (4)
            2017-12-25  [Irrigation]. Apply (3.9)
            2017-12-27  [Irrigation]. Apply (4)
            2017-12-28  [Irrigation]. Apply (6.6)
            2017-12-29  [Irrigation]. Apply (3.9)
            2017-12-30  [Irrigation]. Apply (3.7)
            2018-01-01  [Irrigation]. Apply (3.7)
            2018-01-03  [Irrigation]. Apply (3.8)
            2018-01-15  [Irrigation]. Apply (3.8)
            2018-01-17  [Irrigation]. Apply (3.5)
            2018-01-18  [Irrigation]. Apply (6.4)
            2018-01-19  [Irrigation]. Apply (3.9)
            2018-01-20  [Irrigation]. Apply (3.9)
            2018-01-22  [Irrigation]. Apply (3.9)
            2018-01-29  [Irrigation]. Apply (3.9)
            2018-01-31  [Irrigation]. Apply (3.7)
            2018-02-01  [Irrigation]. Apply (6.4)
            2018-02-02  [Irrigation]. Apply (3.9)
            2018-02-03  [Irrigation]. Apply (3.2)
            2018-02-05  [Irrigation]. Apply (3.9)
            2018-02-07  [Irrigation]. Apply (3.9)
            2018-02-08  [Irrigation]. Apply (6)
            2018-02-09  [Irrigation]. Apply (3.8)
            2018-02-10  [Irrigation]. Apply (3.8)
            2019-01-31  [Irrigation]. Apply (4.6)
            2019-02-01  [Irrigation]. Apply (4)
            2019-02-02  [Irrigation]. Apply (0.2)
            2019-02-03  [Irrigation]. Apply (3.9)
            2019-02-04  [Irrigation]. Apply (6.3)
            2019-02-05  [Irrigation]. Apply (3.7)
            2019-02-09  [Irrigation]. Apply (1.7)
            2019-02-12  [Irrigation]. Apply (6.2)
            2019-02-13  [Irrigation]. Apply (6.5)
            2019-02-15  [Irrigation]. Apply (0.1)
            2019-02-16  [Irrigation]. Apply (6.2)
            2019-02-18  [Irrigation]. Apply (3.7)
            2019-02-20  [Irrigation]. Apply (3.5)
            2019-02-22  [Irrigation]. Apply (3.5)
            2019-02-24  [Irrigation]. Apply (1.2)
            2019-02-25  [Irrigation]. Apply (3.7)
            2019-02-27  [Irrigation]. Apply (3.9)
            2019-03-01  [Irrigation]. Apply (3.7)
            2019-03-03  [Irrigation]. Apply (3.7)
            2019-03-04  [Irrigation]. Apply (3.7)
            2019-03-06  [Irrigation]. Apply (3.6)
            2019-03-08  [Irrigation]. Apply (3.7)
            2019-11-29  [Irrigation]. Apply (1.1)
            2019-12-06  [Irrigation]. Apply (1.7)
            2019-12-07  [Irrigation]. Apply (0.4)
            2020-01-03  [Irrigation]. Apply (1.1)
            2020-01-10  [Irrigation]. Apply (2.1)
            2020-01-11  [Irrigation]. Apply (1.4)
            2020-01-12  [Irrigation]. Apply (2.1)
            2020-01-13  [Irrigation]. Apply (1.4)
            2020-01-14  [Irrigation]. Apply (2.1)
            2020-01-15  [Irrigation]. Apply (1.4)
            2020-01-17  [Irrigation]. Apply (2)
            2020-01-18  [Irrigation]. Apply (1.3)
            2020-01-19  [Irrigation]. Apply (1.9)
            2020-01-20  [Irrigation]. Apply (1.2)
            2020-01-21  [Irrigation]. Apply (2)
            2020-01-22  [Irrigation]. Apply (1.3)
            2020-01-24  [Irrigation]. Apply (3.2)
            2020-01-26  [Irrigation]. Apply (3.1)
            2020-01-29  [Irrigation]. Apply (3.1)
            2020-02-13  [Irrigation]. Apply (3.7)
            2021-02-02  [Irrigation]. Apply (2.3)
            2021-11-25  [Irrigation]. Apply (2.6)
            2021-12-02  [Irrigation]. Apply (3.2)
            2021-12-11  [Irrigation]. Apply (3.3)
            2022-01-11  [Irrigation]. Apply (0.1)
            2022-01-17  [Irrigation]. Apply (4.1)
            2022-02-04  [Irrigation]. Apply (3.4)
            2023-09-11  [Irrigation]. Apply (0.2)
            2023-12-20  [Irrigation]. Apply (3.2)
            2024-01-31  [Irrigation]. Apply (1.9)
          Plant STRUM
          Soil: SoilType=Allophanic Orthic Pumice Soils; Latitude=-41; Longitude=174
            DataSource=Based on profile descriptions provided by Smap (Opotiki_1a1)
            Chemical: PHUnits=Water
              Thickness  PH  CEC
              210        7   15.39
              220        7   7.86369
              275        7   4.0213
              1295       7   4.49567
            Physical
              Thickness  ParticleSizeSand  ParticleSizeSilt  ParticleSizeClay  Rocks  BD     AirDry  LL15   DUL    SAT    KS
              210        55                36                9                 0      0.874  0.085   0.161  0.33   0.4    1920
              220        55                36                9                 0      1.009  0.125   0.137  0.313  0.407  1440
              275        62.5              34                3.5               0      1.026  0.092   0.092  0.32   0.375  1920
              323.8      65                26.5              8.5               0      1.053  0.109   0.109  0.37   0.42   1920
              323.8      65                26.5              8.5               0      1.053  0.119   0.119  0.39   0.51   1920
              323.8      65                26.5              8.5               0      1.053  0.119   0.119  0.39   0.51   1920
              323.8      65                26.5              8.5               0      1.053  0.109   0.109  0.32   0.431  1920
              Rocks source: Calculated
              SoilCrop SCRUMSoil: LL=[0.171, 0.157, 0.092, 0.109, 0.119, 0.119, 0.109]; KL=[0.077, 0.077, 0.077, 0.077, 0.077, 0.077, 0.077]; XF=[1, 1, 1, 1, 1, 1, 1]
              SoilCrop STRUMSoil: LL=[0.171, 0.157, 0.092, 0.109, 0.119, 0.119, 0.109]; KL=[0.112, 0.068, 0.045, 0.023, 0.011, 0.004, 0]; XF=[1, 1, 1, 1, 1, 1, 1]
              SoilCrop SPRUMSoil: same as NZ Kiwifruit Expts.Orchard_OPK.Orchard_OPK.Row.Soil.Physical.STRUMSoil
            WaterBalance SoilWater: same as NZ Kiwifruit Expts.Orchard_OPK.Factors._.Gold.Soil.SoilWater
            Organic: same as NZ Kiwifruit Expts.Orchard_LIN.Factors._.SMAP.Oropi_1a1.Organic
            Water: Thickness=[210, 220, 275, 323.8, 323.8, 323.8, 323.8]; InitialValues=[0.33, 0.313, 0.32, 0.37, 0.39, 0.39, 0.32]; FilledFromTop=false
            Solute NO3: same as NZ Kiwifruit Expts.Orchard_OPK.Factors._.Gold.Soil.NO3
            Solute NH4: same as NZ Kiwifruit Expts.Orchard_OPK.Factors._.Gold.Soil.NH4
            Solute Urea: same as NZ Kiwifruit Expts.Orchard_OPK.Factors._.Gold.Soil.Urea
            Nutrient
            OutputLayers: Thickness=[400, 400, 400, 400, 200]
            SoilTemperature Temperature: InteractionsPerDay=8
          StrumTreeInstance KiwiFruit: same as NZ Kiwifruit Expts.Orchard_LIN.LIN_Gold.Row.KiwiFruit
        Manager ResetDate: same as NZ Kiwifruit Expts.Orchard_LIN.LIN_Gold.ResetDate
      Memo Reason why drainage looks bad
        The flux meters were flooded by a rising water table so the drainage observations are not representative of actual drainage
    Experiment Orchard_OCR
      Factors
        Factor _
          CompositeFactor Green
            Specifications:
              [RadiationWindFactor].Script.RadiationFactor = 1
              [RadiationWindFactor].Script.WindFactor = 0.5
              [Soil]
            Soil: SoilType=Typic Orthic Pumice Soils; Latitude=-41; Longitude=174
              DataSource=Based on profile descriptions provided by Smap (Turangi_8a1)
              Chemical: PHUnits=Water
                Thickness  PH  CEC
                150        7   12.915
                125        7   9.26612
                100        7   4.38429
                300        7   3.29409
                1325       7   1.88826
              Physical
                Thickness  ParticleSizeSand  ParticleSizeSilt  ParticleSizeClay  Rocks  BD     AirDry  LL15   DUL    SAT    KS
                150        80                15                5                 0      1.129  0.036   0.072  0.244  0.502  3600
                125        75                20                5                 0      1.146  0.037   0.075  0.229  0.495  1920
                100        87.5              9.5               3                 0      1.153  0.015   0.017  0.116  0.492  2400
                300        80                15                5                 0      1.198  0.053   0.053  0.204  0.475  1920
                331.3      87.5              9.5               3                 0      1.183  0.015   0.015  0.134  0.481  2400
                331.3      87.5              9.5               3                 0      1.183  0.015   0.015  0.134  0.481  2400
                331.3      87.5              9.5               3                 0      1.183  0.015   0.015  0.134  0.481  2400
                331.3      87.5              9.5               3                 0      1.183  0.015   0.015  0.134  0.48   2400
                Rocks source: Calculated
                SoilCrop STRUMSoil: LL=[0.072, 0.075, 0.017, 0.053, 0.015, 0.015, 0.015, 0.015]; KL=[0.14, 0.102, 0.079, 0.05, 0.024, 0.011, 0.004, 0]; XF=[1, 1, 1, 1, 1, 1, 1, 1]
              WaterBalance SoilWater: SummerDate=1-oct; SummerU=9; SummerCona=4.4; WinterDate=1-apr; WinterU=4; WinterCona=2; DiffusConst=88; DiffusSlope=35; Salb=0.13; CN2Bare=77; CNRed=37; CNCov=0.8; DischargeWidth=0; CatchmentArea=0; PSIDul=-100
                Thickness  SWCON  KLAT
                150        0.5    0
                125        0.45   0
                100        0.5    0
                300        0.45   0
                1325       0.5    0
              Organic: same as NZ Kiwifruit Expts.Orchard_LIN.Factors._.SMAP.Oropi_1a1.Organic
              Water: Thickness=[150, 125, 100, 300, 331.3, 331.3, 331.3, 331.3]; InitialValues=[0.244, 0.229, 0.116, 0.204, 0.134, 0.134, 0.134, 0.134]; FilledFromTop=false
              Solute NO3: Thickness=[150, 125, 100, 300, 1325]; InitialValues=[5.60968, 5.52647, 1.41149, 0.0491014, 0.049724]; InitialValuesUnits=ppm; WaterTableConcentration=0; D0=0; DepthConstant=0; MaxDepthSoluteAccessible=0; RunoffEffectivenessAtMovingSolute=0; MaxEffectiveRunoff=0
              Solute NH4: Thickness=[150, 125, 100, 300, 1325]; InitialValues=[0.841453, 0.82897, 0.211724, 0.00736522, 0.0074586]; InitialValuesUnits=ppm; WaterTableConcentration=0; D0=0; DepthConstant=0; MaxDepthSoluteAccessible=0; RunoffEffectivenessAtMovingSolute=0; MaxEffectiveRunoff=0
              Solute Urea: Thickness=[150, 125, 100, 300, 1325]; InitialValues=[0, 0, 0, 0, 0]; InitialValuesUnits=kg/ha; WaterTableConcentration=0; D0=0; DepthConstant=0; MaxDepthSoluteAccessible=0; RunoffEffectivenessAtMovingSolute=0; MaxEffectiveRunoff=0
              Nutrient
              SoilTemperature Temperature: InteractionsPerDay=8
              OutputLayers: Thickness=[600, 600, 800]
          CompositeFactor SMAP
            Specifications:
              [RadiationWindFactor].Script.RadiationFactor = 1
              [RadiationWindFactor].Script.WindFactor = 0.5
              [Soil]
            Soil Turangi_8a1: SoilType=Typic Orthic Pumice Soils; LocalName=Turangi_8a1; Latitude=-41; Longitude=174
              DataSource=Profile descriptions provided by Smap based on the work done by Trevor Webb.
              Chemical: Thickness=[150, 125, 100, 300, 1325]; PH=[7, 7, 7, 7, 7]; PHUnits=Water
              Physical
                Thickness  ParticleSizeSand  ParticleSizeSilt  ParticleSizeClay  BD     AirDry  LL15   DUL    SAT    KS
                150        80                15                5                 1.129  0.036   0.072  0.244  0.502  3600
                125        75                20                5                 1.146  0.037   0.075  0.229  0.495  1920
                100        87.5              9.5               3                 1.153  0.015   0.017  0.116  0.492  2400
                300        80                15                5                 1.198  0.053   0.053  0.204  0.475  1920
                331.3      87.5              9.5               3                 1.183  0.015   0.015  0.134  0.481  2400
                331.3      87.5              9.5               3                 1.183  0.015   0.015  0.134  0.481  2400
                331.3      87.5              9.5               3                 1.183  0.015   0.015  0.134  0.481  2400
                331.3      87.5              9.5               3                 1.183  0.015   0.015  0.134  0.48   2400
                SoilCrop STRUMSoil
                  LL=[0.072, 0.075, 0.017, 0.053, 0.015, 0.015, 0.015, 0.015]
                  KL=[0.137252, 0.102225, 0.0803268, 0.052328, 0.0266061, 0.0130816, 0.00643198, 0]
                  XF=[1, 1, 1, 1, 1, 1, 1, 1]
              WaterBalance SoilWater: same as NZ Kiwifruit Expts.Orchard_OCR.Factors._.Green.Soil.SoilWater
              Organic: same as NZ Kiwifruit Expts.Orchard_LIN.Factors._.SMAP.Oropi_1a1.Organic
              Water: Thickness=[150, 125, 100, 300, 331.3, 331.3, 331.3, 331.3]; InitialValues=[0.244, 0.229, 0.116, 0.204, 0.134, 0.134, 0.134, 0.134]; FilledFromTop=false
              LayerStructure: Thickness=[150, 125, 100, 300, 331.3, 331.3, 331.3, 331.3]
              Solute NO3: same as NZ Kiwifruit Expts.Orchard_OCR.Factors._.Green.Soil.NO3
              Solute NH4: same as NZ Kiwifruit Expts.Orchard_OCR.Factors._.Green.Soil.NH4
              Solute Urea: same as NZ Kiwifruit Expts.Orchard_OCR.Factors._.Green.Soil.Urea
              Nutrient
              SoilTemperature Temperature: InteractionsPerDay=8
              OutputLayers: Thickness=[600, 600, 800]
          CompositeFactor FSL
            Specifications:
              [RadiationWindFactor].Script.RadiationFactor = 1
              [RadiationWindFactor].Script.WindFactor = 0.5
              [Soil]
            Soil: SoilType=Typic Orthic Pumice Soils; Latitude=-41; Longitude=174
              DataSource=Based on profile descriptions provided by Smap (Turangi_8a1)
              Chemical: same as NZ Kiwifruit Expts.Orchard_OCR.Factors._.Green.Soil.Chemical
              Physical
                Thickness  ParticleSizeSand  ParticleSizeSilt  ParticleSizeClay  Rocks  BD    AirDry  LL15   DUL    SAT    KS
                200        70.7              25.4              3.9               0      1.11  0.03    0.09   0.309  0.575  1410
                200        66.7              30.1              3.2               0      1.15  0.043   0.048  0.281  0.56   2870
                100        78.6              20.4              1                 0      1.05  0.038   0.038  0.2    0.598  2870
                300        54.9              32.5              12.6              0      0.87  0.159   0.159  0.37   0.667  540
                400        62                28.6              9.4               0      0.98  0.136   0.136  0.299  0.625  1410
                400        62                28.6              9.4               0      0.98  0.136   0.136  0.299  0.625  1410
                200        62                28.6              9.4               0      0.98  0.136   0.136  0.299  0.625  1410
                200        62                28.6              9.4               0      0.98  0.136   0.136  0.299  0.625  1410
                SoilCrop STRUMSoil: LL=[0.09, 0.048, 0.038, 0.159, 0.136, 0.136, 0.136, 0.136]; KL=[0.14, 0.102, 0.079, 0.05, 0.024, 0.011, 0.004, 0.001]; XF=[1, 1, 1, 1, 1, 1, 1, 1]
              WaterBalance SoilWater: SummerDate=1-oct; SummerU=9; SummerCona=4.4; WinterDate=1-apr; WinterU=4; WinterCona=2; DiffusConst=88; DiffusSlope=35; Salb=0.13; CN2Bare=77; CNRed=37; CNCov=0.8; DischargeWidth=0; CatchmentArea=0; PSIDul=-100
                Thickness  SWCON  KLAT
                200        0.331  0
                200        0.37   0
                100        0.435  0
                300        0.213  0
                400        0.266  0
                400        0.266  0
                200        0.333  0
                200        0.333  0
              Organic: FOMCNRatio=40; CarbonUnits=Total
                Thickness  Carbon    SoilCNRatio  FBiom      FInert    FOM
                50         6         11.85        0.0788566  0.431898  124.07
                50         6         11.85        0.0610103  0.491926  115.105
                50         6         11.85        0.0477893  0.542739  106.788
                50         4.94864   11.85        0.037995   0.5956    99.0722
                50         3.38311   12           0.0307392  0.650815  91.9135
                50         2.3337    12           0.025364   0.69947   85.2722
                50         1.63026   12           0.0213819  0.742644  79.1107
                50         1.15873   12           0.0184319  0.781204  73.3945
                50         0.842658  10           0.0162465  0.815767  68.0912
                50         0.630787  10           0.0146275  0.846679  63.1712
                250        0.32975   6.36         0.0118814  0.917701  43.4169
                250        0.21756   12.5         0.0104198  0.97694   29.84
                500        0.200874  12.5         0.0100442  0.990833  14.0954
                500        0.200016  12.5         0.0100022  0.996255  6.6582
              Water: Thickness=[200, 200, 100, 300, 400, 400, 200, 200]; InitialValues=[0.309, 0.281, 0.2, 0.37, 0.299, 0.299, 0.299, 0.299]; FilledFromTop=false
              Solute NO3: same as NZ Kiwifruit Expts.Orchard_OCR.Factors._.Green.Soil.NO3
              Solute NH4: same as NZ Kiwifruit Expts.Orchard_OCR.Factors._.Green.Soil.NH4
              Solute Urea: same as NZ Kiwifruit Expts.Orchard_OCR.Factors._.Green.Soil.Urea
              Nutrient
              SoilTemperature Temperature: InteractionsPerDay=8
              OutputLayers: Thickness=[600, 600, 800]
      Simulation OCR_Green
        Memo ReadMe
          * 	Hayward orchard
          * 	Irrigated
          * 	On light Pumice soils
          * 	Nitrogen input reduced from 400 to 25 kg/ha
          * 	Recommended for use
          * 	Steve to update (to July 2024)
          *	Located in Pukehina
          *	Located near Paengaroa (weather)
        Clock: Start=2016-07-01; End=2025-09-06
        Summary SummaryFile
        Weather: FileName=Weather_SG/PaengaroaMetWatch.met
        MicroClimate: a_interception=0; b_interception=1; c_interception=0; d_interception=0; SoilHeatFluxFraction=0.4; MinimumHeightDiffForNewLayer=0; NightInterceptionFraction=0.5; ReferenceHeight=2
        SoilArbitrator Soil Arbitrator
        Manager AutomaticFertiliser
          AllowFertiliser = yes
          Depth2SoilN = 1500
          CriticalSoilN = 50
          FertNAmount = 50
          FertType = UreaN
          FertApplicationDepth = 10
          FertMinimumDays = 8
          script: same as in NZ Kiwifruit Expts.Orchard_LIN.LIN_Gold.AutomaticFertiliser
        Manager RadiationWindFactor: same as NZ Kiwifruit Expts.Orchard_OPK.Orchard_OPK.RadiationWindFactor
        RectangularZone Row: Length=100; Width=1.3; CanopyType=TreeRow; Slope=0; AspectAngle=0; Altitude=50
          Report RowZoneReport: EventNames=[Clock].DoReport
          Report KiwiReport: EventNames=[Clock].DoReport
            VariableNames:
              [Clock].Today
              [ResetDate].Script.SimulationYear as SimYear
              [Row].Soil.SoilWater.Drainage
              [Row].STRUM.AccumulatedWaterStress
              //[Row].STRUM.Arbitrator.DemandRatio
              [Row].Area
              [Row].STRUM.BaseHeight
              [Row].STRUM.Fruit.FreshYield_kgPerHa
              [Row].STRUM.CanopyArea
              [Row].STRUM.RootUptakesArbitrator.WaterDemand.Amount
              [Row].STRUM.RootUptakesArbitrator.WaterDemand.mm
              [Row].STRUM.RootUptakesArbitrator.NitrogenDemand.Amount
              [Row].STRUM.Root.Network.WtByLayerZone1
              [Row].STRUM.Root.Network.WtByLayerZone2
              [Row].STRUM.Arbitrator.Carbon.TotalPlantDemand
              [Row].STRUM.Arbitrator.Carbon.TotalPlantSupply
              [Row].STRUM.Arbitrator.Carbon.TotalPlantDemandsAllocated
              [Row].STRUM.Arbitrator.Fn
              [Row].STRUM.Arbitrator.Nitrogen.TotalPlantDemand
              [Row].STRUM.Arbitrator.Nitrogen.TotalPlantSupply
              [Row].STRUM.Arbitrator.Nitrogen.TotalPlantDemandsAllocated
              [Row].STRUM.Fruit.TotalCarbonDemand.RelativeFruitMass.Delta.Integral
              [Row].STRUM.Fruit.Allocated.Carbon.Total
              [Row].STRUM.Fruit.Allocated.Nitrogen.Total
              [Row].STRUM.Fruit.Carbon.Demands.Structural
              [Row].STRUM.Fruit.Carbon.Demands.Total
              [Row].STRUM.Fruit.DMC
              [Row].STRUM.Fruit.FreshWtPerFruit
              [Row].STRUM.Fruit.NextYearsFruitingBudSurvival
              [Row].STRUM.Fruit.Number.BudsSurvivalFromLastYear
              [Row].STRUM.Fruit.N
              [Row].STRUM.Fruit.Nitrogen.Demands.Total
              [Row].STRUM.Fruit.Number
              [Row].STRUM.Fruit.Diameter
              [Row].STRUM.Fruit.VolumePerFruit
              [Row].STRUM.Fruit.Wt
              [Row].STRUM.Fruit.PotentialDWPerFruit
              [Row].STRUM.Fruit.TotalCarbonDemand.RelativeFruitMass
              [Row].STRUM.Fruit.TotalCarbonDemand.CarbonConc
              [Row].STRUM.Height
              [Row].STRUM.Height.PrunedCanopyBaseHeight
              [Row].STRUM.Height.PrunedCanopyBaseHeight  + [Row].STRUM.Height.PrunedCanopyDepth
              [Row].STRUM.Height.PrunedCanopyBaseHeight  + [Row].STRUM.Height.PrunedCanopyDepth + [Row].STRUM.Height.SeasonalDepthGrowth
              [Row].STRUM.Leaf.Allocated.Carbon.Total
              [Row].STRUM.Leaf.Allocated.Nitrogen.Total
              [Row].STRUM.Leaf.Canopy.CoverGreen
              [Row].STRUM.Leaf.Canopy.Deepness
              [Row].STRUM.Leaf.Dead.Wt
              [Row].STRUM.Leaf.Carbon.Demands.Structural
              [Row].STRUM.Leaf.Carbon.Demands.Total
              [Row].STRUM.Leaf.Fn
              [Row].STRUM.Leaf.Canopy.Fw
              [Row].STRUM.Leaf.Canopy.LAI
              [Row].STRUM.Leaf.Live.Wt
              [Row].STRUM.Leaf.N
              [Row].STRUM.Leaf.Nitrogen.Demands.Total
              [Row].STRUM.Leaf.Canopy.PotentialEP
              [Row].STRUM.Leaf.Canopy.RadiationIntercepted
              [Row].STRUM.Leaf.Senesced.Weight.Structural
              [Row].STRUM.Leaf.SenescenceRate
              [Row].STRUM.Leaf.Canopy.Transpiration
              [Row].STRUM.Leaf.Canopy.WaterDemand
              [Row].STRUM.Leaf.Canopy.WaterAllocation
              [Row].STRUM.Leaf.Canopy.Width
              [Row].STRUM.Leaf.Canopy.GreenExtinctionCoefficient
              [Row].STRUM.Leaf.Wt
              [Row].STRUM.Phenology.Age.YearDecimal
              [Row].STRUM.Phenology.Age.Years
              [Row].STRUM.Phenology.CurrentStageName
              [Row].STRUM.Phenology.DaysSinceFlowering
              [Row].STRUM.Phenology.Stage
              [Row].STRUM.RelativeSeasonalDimension
              [Row].STRUM.RelativeAnnualDimension
              [Row].STRUM.Root.Allocated.Carbon.Total
              [Row].STRUM.Root.Allocated.Nitrogen.Total
              [Row].STRUM.Root.Network.Depth
              [Row].STRUM.Root.Carbon.Demands.Structural
              [Row].STRUM.Root.Carbon.Demands.Total
              [Row].STRUM.Root.N
              [Row].STRUM.Root.Nitrogen.Demands.Total
              [Row].STRUM.RootUptakesArbitrator.WaterUptake.AmountByZone
              [Row].STRUM.RootUptakesArbitrator.WaterUptake.Mm
              [Row].STRUM.RootUptakesArbitrator.WaterUptake.Amount
              [Row].STRUM.RootUptakesArbitrator.NitrogenUptake.AmountByZone
              [Row].STRUM.RootUptakesArbitrator.NitrogenUptake.Gpm2
              [Row].STRUM.RootUptakesArbitrator.NitrogenUptake.Amount
              [Row].STRUM.RootUptakesArbitrator.WaterSupply.AmountByZone
              [Row].STRUM.RootUptakesArbitrator.WaterSupply.Mm
              [Row].STRUM.RootUptakesArbitrator.WaterSupply.Amount
              [Row].STRUM.RootUptakesArbitrator.NitrogenSupply.AmountByZone
              [Row].STRUM.RootUptakesArbitrator.NitrogenSupply.Gpm2
              [Row].STRUM.RootUptakesArbitrator.NitrogenSupply.Amount
              [Row].STRUM.Root.Wt
              [Row].STRUM.TranspirationPerTree
              [Row].STRUM.Wood.Allocated.Carbon.Total
              [Row].STRUM.Wood.Allocated.Nitrogen.Total
              [Row].STRUM.Wood.Carbon.Demands.Structural
              [Row].STRUM.Wood.Carbon.Demands.Total
              [Row].STRUM.Wood.Carbon.Supplies.ReTranslocation
              [Row].STRUM.Wood.Live.Carbon.Structural * 1/0.4
              [Row].STRUM.Wood.Live.Carbon.Storage * 1/0.4
              [Row].STRUM.Wood.EnergyBalance.CoverTotal
              [Row].STRUM.Wood.EnergyBalance.DeadAreaIndex
              [Row].STRUM.Wood.EnergyBalance.LAIDead
              [Row].STRUM.Wood.EnergyBalance.RadiationInterceptedByDead
              [Row].STRUM.Wood.EnergyBalance.Transpiration
              [Row].STRUM.Wood.N
              [Row].STRUM.Wood.Nitrogen.Demands.Total
              [Row].STRUM.Wood.Wt
              [Row].STRUM.Width
              [Row].STRUM.Width.PrunedWidth
              [Row].STRUM.Width.PrunedWidth + [Row].STRUM.Width.SeasonalGrowth
              [Row].STRUM.TranspirationPerLeafArea
              [Row].SurfaceOrganicMatter.N
              [Row].SurfaceOrganicMatter.Wt
              [Row].Irrigation.IrrigationApplied
              [Row].Fertiliser.NitrogenApplied
              sum([Row].Soil.OutputLayers.SWmm)
              [Row].Soil.OutputLayers.SWmm
              [Row].Soil.OutputLayers.SWmm[1] as SWmm0_60
              ([Row].Soil.OutputLayers.SWmm[1] + [Row].Soil.OutputLayers.SWmm[2]) as SWmm0_120
              [Row].Soil.OutputLayers.SW
              ([Row].Soil.OutputLayers.SWmm[1] + [Row].Soil.OutputLayers.SWmm[2])/1200 as VCW_0_120
              ([Row].Soil.OutputLayers.SWmm[1] + [Row].Soil.OutputLayers.SWmm[2] + [Row].Soil.OutputLayers.SWmm[3])/2000 as VCW_0_200
              [Row].Soil.OutputLayers.SAT
              [Row].Soil.OutputLayers.DUL
              [Row].Soil.OutputLayers.LL15
              [Row].Soil.OutputLayers.PAWmm
              ([Row].Soil.OutputLayers.PAWmm[1] + [Row].Soil.OutputLayers.PAWmm[2]) as PAWmm0_120
              [Row].Soil.SoilWater.Evaporation
              [Row].Soil.SoilWater.Eo
              [Row].Soil.SoilWater.Runoff
              [Weather].PanEvap
              [Weather].Radn
              [Weather].Rain
              [STRUM].Leaf.TotalCarbonDemand.TotalDMDemand.SizeDemand.SizeDemand.SizeDemand.TargetSize
          SurfaceOrganicMatter: InitialResidueName=wheat_stubble; InitialResidueType=wheat; InitialResidueMass=500; InitialStandingFraction=0; InitialCPR=0; InitialCNR=100
          Fertiliser
          Irrigation
          Plant STRUM
          Operations
            2016-11-04  [Irrigation]. Apply (2.6)
            2016-11-05  [Irrigation]. Apply (3.8)
            2016-11-29  [Irrigation]. Apply (7.5)
            2016-12-04  [Irrigation]. Apply (2.9)
            2016-12-05  [Irrigation]. Apply (5.7)
            2016-12-06  [Irrigation]. Apply (5.3)
            2016-12-18  [Irrigation]. Apply (6.2)
            2016-12-19  [Irrigation]. Apply (7.6)
            2016-12-21  [Irrigation]. Apply (2.2)
            2016-12-22  [Irrigation]. Apply (2.9)
            2016-12-28  [Irrigation]. Apply (7.9)
            2017-01-01  [Irrigation]. Apply (4.5)
            2017-01-02  [Irrigation]. Apply (9.2)
            2017-01-08  [Irrigation]. Apply (4.1)
            2017-01-09  [Irrigation]. Apply (3.2)
            2017-01-11  [Irrigation]. Apply (7.4)
            2017-01-13  [Irrigation]. Apply (4.4)
            2017-01-14  [Irrigation]. Apply (2.8)
            2017-01-16  [Irrigation]. Apply (3.7)
            2017-01-17  [Irrigation]. Apply (4.5)
            2017-01-27  [Irrigation]. Apply (8.4)
            2017-01-30  [Irrigation]. Apply (8)
            2017-02-01  [Irrigation]. Apply (3.6)
            2017-02-02  [Irrigation]. Apply (5.3)
            2017-02-06  [Irrigation]. Apply (8)
            2017-02-09  [Irrigation]. Apply (2.7)
            2017-02-10  [Irrigation]. Apply (8.7)
            2017-02-13  [Irrigation]. Apply (6.5)
            2017-02-14  [Irrigation]. Apply (5)
            2017-05-20  [Irrigation]. Apply (1.1)
            2017-05-21  [Irrigation]. Apply (7.4)
            2017-05-22  [Irrigation]. Apply (6.5)
            2017-05-23  [Irrigation]. Apply (7.5)
            2019-01-10  [Irrigation]. Apply (7.9)
            2019-01-18  [Irrigation]. Apply (6.4)
            2019-01-19  [Irrigation]. Apply (0.5)
            2019-01-25  [Irrigation]. Apply (3.7)
            2019-01-26  [Irrigation]. Apply (4.9)
            2019-01-30  [Irrigation]. Apply (3.4)
            2019-01-31  [Irrigation]. Apply (5)
            2019-02-09  [Irrigation]. Apply (8)
            2019-02-14  [Irrigation]. Apply (4.8)
            2019-02-15  [Irrigation]. Apply (4.1)
            2019-02-17  [Irrigation]. Apply (4)
            2019-02-18  [Irrigation]. Apply (2.3)
            2019-03-02  [Irrigation]. Apply (4.4)
            2019-03-03  [Irrigation]. Apply (2.8)
            2019-03-17  [Irrigation]. Apply (5)
            2019-03-18  [Irrigation]. Apply (1.6)
            2019-06-12  [Irrigation]. Apply (0.2)
            2019-07-04  [Irrigation]. Apply (0.4)
            2019-12-07  [Irrigation]. Apply (6.5)
            2019-12-14  [Irrigation]. Apply (3.1)
            2020-01-03  [Irrigation]. Apply (6.2)
            2020-01-07  [Irrigation]. Apply (4)
            2020-01-08  [Irrigation]. Apply (3.2)
            2020-01-13  [Irrigation]. Apply (7.2)
            2020-01-17  [Irrigation]. Apply (5.6)
            2020-01-21  [Irrigation]. Apply (5.7)
            2020-01-26  [Irrigation]. Apply (5.8)
            2020-01-30  [Irrigation]. Apply (5.7)
            2020-02-04  [Irrigation]. Apply (5.7)
            2020-02-09  [Irrigation]. Apply (5.6)
            2020-02-10  [Irrigation]. Apply (1.5)
            2020-02-15  [Irrigation]. Apply (5.1)
            2020-02-18  [Irrigation]. Apply (6.4)
            2020-02-22  [Irrigation]. Apply (5.1)
            2020-02-27  [Irrigation]. Apply (3.9)
            2020-02-28  [Irrigation]. Apply (3.1)
            2020-03-19  [Irrigation]. Apply (6)
            2020-05-21  [Irrigation]. Apply (3.7)
            2020-09-21  [Irrigation]. Apply (6.2)
            2020-09-30  [Irrigation]. Apply (2.1)
            2020-10-03  [Irrigation]. Apply (3.8)
            2020-10-06  [Irrigation]. Apply (4.2)
            2020-10-07  [Irrigation]. Apply (4.9)
            2020-10-21  [Irrigation]. Apply (5.3)
            2020-10-26  [Irrigation]. Apply (4.9)
            2020-11-15  [Irrigation]. Apply (4.2)
            2020-11-20  [Irrigation]. Apply (3.8)
            2020-11-24  [Irrigation]. Apply (2.3)
            2020-12-01  [Irrigation]. Apply (2.3)
            2020-12-17  [Irrigation]. Apply (6.3)
            2020-12-19  [Irrigation]. Apply (3.7)
            2020-12-20  [Irrigation]. Apply (9.8)
            2020-12-21  [Irrigation]. Apply (8)
            2020-12-25  [Irrigation]. Apply (6.3)
            2020-12-26  [Irrigation]. Apply (3.1)
            2020-12-28  [Irrigation]. Apply (7.4)
            2021-01-11  [Irrigation]. Apply (4.8)
            2021-01-12  [Irrigation]. Apply (4.9)
            2021-01-14  [Irrigation]. Apply (8.7)
            2021-01-15  [Irrigation]. Apply (1)
            2021-01-18  [Irrigation]. Apply (4.3)
            2021-01-19  [Irrigation]. Apply (5.2)
            2021-01-23  [Irrigation]. Apply (7.2)
            2021-01-30  [Irrigation]. Apply (9.2)
            2021-01-31  [Irrigation]. Apply (0.2)
            2021-02-01  [Irrigation]. Apply (9.6)
            2021-02-03  [Irrigation]. Apply (5.9)
            2021-02-04  [Irrigation]. Apply (3.6)
            2021-02-11  [Irrigation]. Apply (8.6)
            2021-03-19  [Irrigation]. Apply (8.7)
            2021-03-20  [Irrigation]. Apply (0.7)
            2021-11-18  [Irrigation]. Apply (0.1)
            2021-11-19  [Irrigation]. Apply (6.9)
            2021-11-24  [Irrigation]. Apply (0.3)
            2021-11-25  [Irrigation]. Apply (4.3)
            2021-11-26  [Irrigation]. Apply (20.6)
            2021-11-29  [Irrigation]. Apply (2.9)
            2021-11-30  [Irrigation]. Apply (11.9)
            2021-12-09  [Irrigation]. Apply (8.9)
            2021-12-10  [Irrigation]. Apply (10)
            2021-12-27  [Irrigation]. Apply (17.3)
            2022-01-03  [Irrigation]. Apply (10.2)
            2022-01-12  [Irrigation]. Apply (8.2)
            2022-01-13  [Irrigation]. Apply (8.3)
            2022-01-17  [Irrigation]. Apply (7.5)
            2022-01-22  [Irrigation]. Apply (4.2)
            2022-01-23  [Irrigation]. Apply (3.3)
            2022-01-26  [Irrigation]. Apply (2.5)
            2023-12-21  [Irrigation]. Apply (8.4)
            2023-12-23  [Irrigation]. Apply (10.5)
            2024-01-11  [Irrigation]. Apply (1.6)
          Soil: SoilType=Typic Orthic Pumice Soils; Latitude=-41; Longitude=174
            DataSource=Based on profile descriptions provided by Smap (Turangi_8a1)
            Chemical: same as NZ Kiwifruit Expts.Orchard_OCR.Factors._.Green.Soil.Chemical
            Physical: same as NZ Kiwifruit Expts.Orchard_OCR.Factors._.Green.Soil.Physical
            WaterBalance SoilWater: same as NZ Kiwifruit Expts.Orchard_OCR.Factors._.Green.Soil.SoilWater
            Organic: same as NZ Kiwifruit Expts.Orchard_LIN.Factors._.SMAP.Oropi_1a1.Organic
            Water: Thickness=[150, 125, 100, 300, 331.3, 331.3, 331.3, 331.3]; FilledFromTop=false
              InitialValues=[0.2268, 0.2136, 0.1061, 0.1889, 0.1221, 0.1221, 0.1221, 0.1221]
            Solute NO3: same as NZ Kiwifruit Expts.Orchard_OCR.Factors._.Green.Soil.NO3
            Solute NH4: same as NZ Kiwifruit Expts.Orchard_OCR.Factors._.Green.Soil.NH4
            Solute Urea: same as NZ Kiwifruit Expts.Orchard_OCR.Factors._.Green.Soil.Urea
            Nutrient
            SoilTemperature Temperature: InteractionsPerDay=8
            OutputLayers: Thickness=[600, 600, 800]
          StrumTreeInstance KiwiFruit: TreeType=Deciduous; RowSpacing=3.6; InterRowSpacing=3; AlleyZoneWidthFrac=0.1; BudBreakDate=1-Oct; StartFullCanopyDate=1-Dec; StartLeafFallDate=18-May; EndLeafFallDate=21-Jun; DBHatMaturity=5; TypicalCanopyArea=22; WoodBulkDensity=450; WoodStorageFraction=0.2; MaximumLeafBiomass=150; MaximumRootBiomass=200; AgeAtSimulationStart=6; YearsToMaxDimension=6; CrownShape=1; MatureCanopyBaseHeight=1.8; MaturePrunedCanopyBaseHeight=1.8; MatureHeight=2.4; MaturePrunedHeight=2.4; MatureWidth=3.4; MaturePrunedWidth=3.4; SummerPruneDates=[15-Jul]; FRemoveSummerPrune=0.25; RootNConc=0.01; LeafNConc=0.02; WoodNConc=0.005; FruitNConc=0.02; NFixationFrac=0; GRINZ=false; MaxRD=1; ExtinctCoeff=0.8; BaseCover=0; MaxCover=0.95; RUE=2; PSBaseT=10; PSLOptT=20; PSUOptT=25; PSMaxT=35; GSMax=0.011; R50=125; SurfaceKL=0.1; WaterStress=true; Number=45; PotentialFWPerFruit=110; DMC=0.17; FruitDensity=1.02; DateMaxBloom=7-Nov; DAFStartLinearGrowth=90; DAFEndLinearGrowth=180; DAFMaxSize=200
        Manager ResetDate: same as NZ Kiwifruit Expts.Orchard_LIN.LIN_Gold.ResetDate
    Experiment Orchard_Katikati
      Factors
        Factor _
          CompositeFactor Gold
            Specifications:
              [RadiationWindFactor].Script.RadiationFactor = 1
              [RadiationWindFactor].Script.WindFactor = 0.5
              [Soil]
            Soil Otor_83a3: SoilType=Typic Orthic Allophanic Soils; LocalName=Otorohanga_28a1; Latitude=-41; Longitude=174
              DataSource=Profile descriptions provided by Smap based on the work done by Trevor Webb.
              Memo Otorohanga_83a3
                Soil data did not came from 'official'  smap. Values were adapted from factsheet...
              Chemical: Thickness=[175, 125, 250, 1450]; PH=[7, 7, 7, 7]; PHUnits=Water
              Physical
                Thickness  ParticleSizeSand  ParticleSizeSilt  ParticleSizeClay  Rocks  BD     AirDry  LL15   DUL    SAT    KS
                200        42                43                15                0      0.759  0.052   0.155  0.493  0.706  1920
                200        42                43                15                0      0.739  0.137   0.152  0.447  0.715  1920
                250        38                42                20                0      0.698  0.167   0.167  0.474  0.732  1920
                250        33                47                20                0      0.737  0.203   0.203  0.537  0.716  1440
                300        30                48                22                0      0.737  0.203   0.203  0.537  0.716  1440
                300        25                51                24                0      0.737  0.203   0.203  0.537  0.716  1440
                300        20                54                26                0      0.737  0.203   0.203  0.537  0.716  1440
                200        20                54                26                0      0.737  0.203   0.203  0.537  0.716  1440
                SoilCrop STRUMSoil: LL=[0.155, 0.152, 0.167, 0.203, 0.203, 0.203, 0.203, 0.203]; KL=[0.115, 0.097, 0.065, 0.029, 0.013, 0.006, 0, 0]; XF=[1, 1, 1, 1, 1, 1, 1, 1]
              WaterBalance SoilWater: SummerDate=1-oct; SummerU=9; SummerCona=4.4; WinterDate=1-apr; WinterU=4; WinterCona=2; DiffusConst=88; DiffusSlope=35; Salb=0.13; CN2Bare=83; CNRed=29; CNCov=0.8; DischargeWidth=0; CatchmentArea=0; PSIDul=-100
                Thickness  SWCON  KLAT
                200        0.346  0
                200        0.339  0
                250        0.321  0
                250        0.32   0
                300        0.305  0
                300        0.305  0
                300        0.305  0
                200        0.339  0
              Organic: FOMCNRatio=40; CarbonUnits=Total
                Thickness  Carbon    SoilCNRatio  FBiom      FInert    FOM
                50         10        11.1         0.0788566  0.575     124.07
                50         10        11.1         0.0610103  0.575     115.105
                50         10        11.1         0.0477893  0.613573  106.788
                50         8.22356   11.1         0.037995   0.662199  99.0722
                50         5.57835   11.1         0.0307392  0.709226  91.9135
                50         3.80522   11.1         0.025364   0.749972  85.2722
                50         2.61665   11.1         0.0213819  0.785433  79.1107
                50         1.81993   11.1         0.0184319  0.816456  73.3945
                50         1.28587   11.1         0.0162465  0.843742  68.0912
                50         0.927881  11.1         0.0146275  0.867834  63.1712
                250        0.419234  11.1         0.0118814  0.923972  43.4169
                250        0.22967   11.1         0.0104198  0.978156  29.84
                500        0.201477  11.1         0.0100442  0.990841  14.0954
                500        0.200027  11.1         0.0100022  0.996255  6.6582
              Water: Thickness=[200, 200, 250, 250, 300, 300, 300, 200]; InitialValues=[0.493, 0.447, 0.474, 0.537, 0.537, 0.537, 0.537, 0.537]; FilledFromTop=false
              LayerStructure: Thickness=[175, 125, 250, 362.5, 362.5, 362.5, 362.5]
              Solute NO3: Thickness=[175, 125, 250, 1450]; InitialValues=[8.34431, 8.57014, 0.0842744, 0.0798148]; InitialValuesUnits=ppm; WaterTableConcentration=0; D0=0; DepthConstant=0; MaxDepthSoluteAccessible=0; RunoffEffectivenessAtMovingSolute=0; MaxEffectiveRunoff=0
              Solute NH4: Thickness=[175, 125, 250, 1450]; InitialValues=[1.25165, 1.28552, 0.0126412, 0.0119722]; InitialValuesUnits=ppm; WaterTableConcentration=0; D0=0; DepthConstant=0; MaxDepthSoluteAccessible=0; RunoffEffectivenessAtMovingSolute=0; MaxEffectiveRunoff=0
              Solute Urea: Thickness=[175, 125, 250, 1450]; InitialValues=[0, 0, 0, 0]; InitialValuesUnits=kg/ha; WaterTableConcentration=0; D0=0; DepthConstant=0; MaxDepthSoluteAccessible=0; RunoffEffectivenessAtMovingSolute=0; MaxEffectiveRunoff=0
              Nutrient
              SoilTemperature Temperature: InteractionsPerDay=8
              OutputLayers: Thickness=[400, 400, 400, 400, 400]
          CompositeFactor SMAP
            Specifications:
              [RadiationWindFactor].Script.RadiationFactor = 1
              [RadiationWindFactor].Script.WindFactor = 0.5
              [Soil]
            Soil Ngakura_1a3: SoilType=Typic Orthic Allophanic Soils; LocalName=Ngakura_1a3; Latitude=-41; Longitude=174
              DataSource=Profile descriptions provided by Smap based on the work done by Trevor Webb.
              Chemical: Thickness=[195, 425, 1380]; PH=[7, 7, 7]; PHUnits=Water
              Physical
                Thickness  ParticleSizeSand  ParticleSizeSilt  ParticleSizeClay  BD     AirDry  LL15   DUL    SAT    KS
                195        42.5              42                15.5              0.764  0.12    0.24   0.466  0.64   1920
                425        41                40.5              18.5              0.727  0.223   0.254  0.444  0.654  1920
                345        25.5              51.5              23                0.82   0.323   0.323  0.531  0.619  480
                345        25.5              51.5              23                0.82   0.323   0.323  0.531  0.619  480
                345        25.5              51.5              23                0.82   0.323   0.323  0.531  0.619  480
                345        25.5              51.5              23                0.82   0.323   0.323  0.531  0.619  480
                SoilCrop STRUMSoil: LL=[0.24, 0.254, 0.323, 0.323, 0.323, 0.323]; KL=[0.112107, 0.0673106, 0.0210699, 0.0100599, 0.00480316, 0]; XF=[1, 1, 1, 1, 1, 1]
              WaterBalance SoilWater: SummerDate=1-oct; SummerU=9; SummerCona=4.4; WinterDate=1-apr; WinterU=4; WinterCona=2; DiffusConst=88; DiffusSlope=35; Salb=0.13; CN2Bare=75; CNRed=37; CNCov=0.8; DischargeWidth=0; CatchmentArea=0; PSIDul=-100
                Thickness  SWCON  KLAT
                195        0.4    0
                425        0.3    0
                1380       0.3    0
              Organic: same as NZ Kiwifruit Expts.Orchard_Katikati.Factors._.Gold.Otor_83a3.Organic
              Water: Thickness=[195, 425, 345, 345, 345, 345]; InitialValues=[0.4434, 0.425, 0.5102, 0.5102, 0.5102, 0.5102]; FilledFromTop=false
              LayerStructure: Thickness=[195, 425, 345, 345, 345, 345]
              Solute NO3: Thickness=[195, 425, 1380]; InitialValues=[8.2897, 2.2132, 0.071736]; InitialValuesUnits=ppm; WaterTableConcentration=0; D0=0; DepthConstant=0; MaxDepthSoluteAccessible=0; RunoffEffectivenessAtMovingSolute=0; MaxEffectiveRunoff=0
              Solute NH4: Thickness=[195, 425, 1380]; InitialValues=[1.24346, 0.33198, 0.0107604]; InitialValuesUnits=ppm; WaterTableConcentration=0; D0=0; DepthConstant=0; MaxDepthSoluteAccessible=0; RunoffEffectivenessAtMovingSolute=0; MaxEffectiveRunoff=0
              Solute Urea: Thickness=[195, 425, 1380]; InitialValues=[0, 0, 0]; InitialValuesUnits=kg/ha; WaterTableConcentration=0; D0=0; DepthConstant=0; MaxDepthSoluteAccessible=0; RunoffEffectivenessAtMovingSolute=0; MaxEffectiveRunoff=0
              Nutrient
              SoilTemperature Temperature: InteractionsPerDay=8
              OutputLayers: Thickness=[400, 400, 400, 400, 400]
          CompositeFactor FSL
            Specifications:
              [RadiationWindFactor].Script.RadiationFactor = 1
              [RadiationWindFactor].Script.WindFactor = 0.5
              [Soil]
            Soil Katikati: SoilType=Typic Orthic Allophanic Soils; LocalName=Otorohanga_28a1; Latitude=-41; Longitude=174
              DataSource=Profile descriptions provided by Smap based on the work done by Trevor Webb.
              Memo Katikati_silt_loam
                Soil data did not came from 'official'  smap. Values were adapted from factsheet...
              Chemical: Thickness=[175, 125, 250, 1450]; PH=[7, 7, 7, 7]; PHUnits=Water
              Physical
                Thickness  ParticleSizeSand  ParticleSizeSilt  ParticleSizeClay  Rocks  BD    AirDry  LL15   DUL    SAT    KS
                100        38.6              43.4              18                0      0.79  0.066   0.199  0.436  0.697  540
                100        46                41                13                0      0.79  0.179   0.199  0.436  0.697  540
                100        47.1              43.9              9                 0      0.75  0.171   0.171  0.409  0.713  540
                200        35.1              36.9              28                0      0.68  0.216   0.216  0.421  0.739  86
                200        34.1              46.9              19                0      0.76  0.328   0.328  0.501  0.708  86
                200        16.6              56.4              27                0      0.8   0.41    0.41   0.567  0.691  86
                300        16.6              56.4              27                0      0.8   0.41    0.41   0.567  0.691  86
                300        16.6              56.4              27                0      0.8   0.41    0.41   0.567  0.691  86
                300        16.6              56.4              27                0      0.8   0.41    0.41   0.567  0.691  86
                200        16.6              56.4              27                0      0.8   0.41    0.41   0.567  0.691  86
                SoilCrop STRUMSoil
                  LL=[0.199, 0.199, 0.171, 0.216, 0.328, 0.41, 0.41, 0.41, 0.41, 0.41]
                  KL=[0.115, 0.097, 0.065, 0.029, 0.013, 0.006, 0, 0, 0, 0]
                  XF=[1, 1, 1, 1, 1, 1, 1, 1, 1, 1]
              WaterBalance SoilWater: SummerDate=1-oct; SummerU=9; SummerCona=4.4; WinterDate=1-apr; WinterU=4; WinterCona=2; DiffusConst=88; DiffusSlope=35; Salb=0.13; CN2Bare=83; CNRed=29; CNCov=0.8; DischargeWidth=0; CatchmentArea=0; PSIDul=-100
                Thickness  SWCON  KLAT
                100        0.326  0
                100        0.326  0
                100        0.317  0
                200        0.097  0
                200        0.129  0
                200        0.171  0
                300        0.134  0
                300        0.134  0
                300        0.134  0
                200        0.171  0
              Organic: FOMCNRatio=40; CarbonUnits=Total
                Thickness  Carbon    SoilCNRatio  FBiom      FInert    FOM
                50         10        10.77        0.0788566  0.575     124.07
                50         10        10.77        0.0610103  0.575     115.105
                50         10        12.98        0.0477893  0.613573  106.788
                50         8.22356   12.98        0.037995   0.662199  99.0722
                50         5.57835   11.48        0.0307392  0.709226  91.9135
                50         3.80522   11.48        0.025364   0.749972  85.2722
                50         2.61665   9.47         0.0213819  0.785433  79.1107
                50         1.81993   9.47         0.0184319  0.816456  73.3945
                50         1.28587   9.47         0.0162465  0.843742  68.0912
                50         0.927881  9.47         0.0146275  0.867834  63.1712
                250        0.419234  8.5          0.0118814  0.923972  43.4169
                250        0.22967   9.29         0.0104198  0.978156  29.84
                500        0.201477  9.29         0.0100442  0.990841  14.0954
                500        0.200027  9.29         0.0100022  0.996255  6.6582
              Water: Thickness=[100, 100, 100, 200, 200, 200, 300, 300, 300, 200]; FilledFromTop=false
                InitialValues=[0.436, 0.436, 0.409, 0.421, 0.501, 0.567, 0.567, 0.567, 0.567, 0.567]
              LayerStructure: Thickness=[175, 125, 250, 362.5, 362.5, 362.5, 362.5]
              Solute NO3: same as NZ Kiwifruit Expts.Orchard_Katikati.Factors._.Gold.Otor_83a3.NO3
              Solute NH4: same as NZ Kiwifruit Expts.Orchard_Katikati.Factors._.Gold.Otor_83a3.NH4
              Solute Urea: same as NZ Kiwifruit Expts.Orchard_Katikati.Factors._.Gold.Otor_83a3.Urea
              Nutrient
              SoilTemperature Temperature: InteractionsPerDay=8
              OutputLayers: Thickness=[400, 400, 400, 400, 400]
      Simulation Katikati
        Memo ReadMe
          *	Located in Katikati
          * 	Study ran from 2021 to 2025- based oon  Green S, Arnold N, Snelgar P, Cummins M, Lawrence-Smith E, Jones Y. February 2026. SN22140 Vine water needs and set points for smart
          irrigation of ‘Zesy002’ (Gold3) kiwifruit; Final project report. A Bioeconomy Science Institute report prepared for: Zespri Group Limited. Milestone
          No. 92502. Contract No. 25/39697. Job code: P/442092/01. SPTS No. 28261
          *	Sheltered orchard with no netting(details in ref.)
          *	Irrigated (simulating the **well-watered only**)

          Measurements were
          *	Sap-flow
          *	Fruit growth
          *	Soil moisture (150–160; 30/20 cm interval); TDR
          *	Light interception.
        Clock: Start=2023-07-01; End=2026-04-06
        Summary SummaryFile
        Weather: FileName=Weather_SG/TePunaMetwWatch.met
        MicroClimate: a_interception=0; b_interception=1; c_interception=0; d_interception=0; SoilHeatFluxFraction=0.4; MinimumHeightDiffForNewLayer=0; NightInterceptionFraction=0.5; ReferenceHeight=2
        SoilArbitrator Soil Arbitrator
        Manager AutoIrrigationDeficitBased (disabled)
          AllowIrrigation = True
          depthPAWC = 3000
          triggerDeficit = 75
          irrigateAmount = 15
          returndays = 3
          IrrigateAlley = False
```csharp
using APSIM.Core;
using Models.Interfaces;
using System;
using Models.Core;
using Models.PMF;
using Models.Soils;
using System.Xml.Serialization;
using APSIM.Shared.Utilities;
using Newtonsoft.Json;

        
namespace Models
{
    [Serializable] 
    [System.Xml.Serialization.XmlInclude(typeof(Model))]
    public class Script : Model, IStructureDependency
    {
        [Link] private Clock Clock;
        [Link] private Zone patch;
        [Link] private ISummary summary;
        [Link] private Soil Soil;
        [Link(IsOptional = true)] private IPlant existingCrop;
        [Link] private IPhysical soilPhysical;
        [Link] private ISoilWater waterBalance;
        [Link(Type = LinkType.Scoped, ByName = true)] private Zone Row;
        [Link(Type = LinkType.Scoped, ByName = true, IsOptional = true)] private Zone Alley;
        private double TopDUL;
        private double TopLL;
        private int nLayers;
        public IStructure Structure { private get; set; }
        //[Link] private Irrigation Irrigation;
        
       
        // Parameters from user interface
        [Separator("Manager for controlling automatic irrigation")]
        [Description(" Allow this manager to control irrigation?")]
        public bool AllowIrrigation { get; set; }
      
        [Separator(" Parameters for the irrigation system")]
        [Description(" Depth to calculate PAWC and deficit (mm)")]
        public double depthPAWC { get; set; }
        [Description(" Deficit to trigger irrigations (% PAWC)")]
        public double triggerDeficit { get; set; }
        [Description(" Irrigation amount to apply each event (mm)")]
        public double irrigateAmount { get; set; }
        [Description(" Minimum days for irrigation to return")]
        public double returndays { get; set; }
        
        [Description("Is the Alley zone irrigated?")]
        public bool IrrigateAlley {get; set;}

        //Class members
        [JsonIgnore] public double IrrigLayerSWDeficit { get; set; }
        [JsonIgnore] public double TopSWC { get; set; }
        [JsonIgnore] public double DaysSinceIrrigation { get; set; }
        [JsonIgnore] public double AmountToApply { get; set; }
        [JsonIgnore] public double SeasonAppliedAmount { get; set; }
        
        private bool IrrigationIsAllowed { get; set; }
        private bool CropIsActive { get; set; }
        private bool IrrigatorIsAvailable { get; set; }
        private bool SoilIsDry { get; set; }

    
        //Calculate static soil variables

        

        [EventSubscribe("StartOfSimulation")]
        private void OnStartOfSimulation(object sender, EventArgs e)
        {
            
            //Can we irrigate at all?
            IrrigationIsAllowed = false; 
            if (AllowIrrigation)
                IrrigationIsAllowed = true; 

            //Calculate soil water variables
            double depthFromSurface = 0.0;
            double fracLayer = 0.0;
            nLayers = soilPhysical.Thickness.Length;
            for (int layer = 0; layer < nLayers; layer++)
            {
                fracLayer = Math.Min(1.0, (depthPAWC - depthFromSurface) / soilPhysical.Thickness[layer]);
                TopLL += soilPhysical.LL15mm[layer] * fracLayer;
                TopDUL += soilPhysical.DULmm[layer] * fracLayer;
                depthFromSurface += soilPhysical.Thickness[layer];
                if (depthFromSurface >= depthPAWC)
                    layer = nLayers;
            }
        }
             
        //Determine daily requirement for irrigation
        [EventSubscribe("StartOfDay")]
        private void OnStartOfDay(object sender, EventArgs e)
        {
            AmountToApply = 0.0;
            DaysSinceIrrigation += 1;

            //Is the row crop actively growing?
            CropIsActive = false;
            double StageCode = (double)Structure.Get("STRUM.Phenology.Stage", relativeTo: Row);
            if ((StageCode > 3.0) && (StageCode<5.0))
            {
                CropIsActive = true;
            }
          
            //Is the irrigator available?
            IrrigatorIsAvailable = false;
            if (DaysSinceIrrigation >= returndays)
                IrrigatorIsAvailable = true;
          
            //Is the soil dry enough to require irrigation?
            SoilIsDry = false;
            double depthFromSurface = 0.0;
            double fracLayer = 0.0;
            TopSWC = 0.0;
            for (int layer = 0; layer < nLayers; layer++)
            //for (int layer = 0; depthFromSurface < depthPAWC + soilPhysical.Thickness[layer]; layer++)
            {
                fracLayer = Math.Min(1.0, (depthPAWC - depthFromSurface) / soilPhysical.Thickness[layer]);
                TopSWC += waterBalance.SWmm[layer] * fracLayer;
                depthFromSurface += soilPhysical.Thickness[layer];
                if (depthFromSurface >= depthPAWC)
                    layer = nLayers;
            }
            
            IrrigLayerSWDeficit = TopSWC - TopDUL;
            if (Math.Max(0.0, -IrrigLayerSWDeficit) >= (TopDUL - TopLL) * (100 - triggerDeficit) / 100)
                SoilIsDry = true;

            //Are all the conditions ratifying irrigation
            if (IrrigationIsAllowed && CropIsActive && IrrigatorIsAvailable && SoilIsDry)
            {
                //Lets irrigate well !!!!
                Irrigation irrigRow = (Irrigation)Structure.Get("Irrigation", relativeTo: Row);
                irrigRow.Apply(irrigateAmount, depth: 0);
                DaysSinceIrrigation = 0;
                if (IrrigateAlley)
                {
                   Irrigation irrigAlley = (Irrigation)Structure.Get("Irrigation", relativeTo: Alley);
                   irrigAlley.Apply(irrigateAmount , depth: 0);           
                }
            }
        }
    }
}
```
        Manager AutomaticFertiliser
          Fertilise = True
          Season_Start = 1-Aug
          Season_End = 30-Apr
          Season_Allocation = 100000
          TriggerN = 50
          NApplicationAmount = 25
          Return_days = 3
          Top_Depth = 600
          script: same as in Replacements.AutomaticFertiliser
        Manager RadiationWindFactor: same as NZ Kiwifruit Expts.Orchard_OPK.Orchard_OPK.RadiationWindFactor
        RectangularZone Row: Length=100; Width=1; CanopyType=TreeRow; Slope=0; AspectAngle=0; Altitude=50
          Report RowZoneReport: EventNames=[Clock].DoReport
          Report KiwiReport: EventNames=[Clock].DoReport
            VariableNames:
              [Clock].Today
              [ResetDate].Script.SimulationYear as SimYear
              [Row].Soil.SoilWater.Drainage
              [Row].STRUM.AccumulatedWaterStress
              //[Row].STRUM.Arbitrator.DemandRatio
              [Row].Area
              [Row].STRUM.BaseHeight
              [Row].STRUM.Fruit.FreshYield_kgPerHa
              [Row].STRUM.CanopyArea
              [Row].STRUM.RootUptakesArbitrator.WaterDemand.Amount
              [Row].STRUM.RootUptakesArbitrator.WaterDemand.mm
              [Row].STRUM.RootUptakesArbitrator.NitrogenDemand.Amount
              [Row].STRUM.Root.Network.WtByLayerZone1
              [Row].STRUM.Root.Network.WtByLayerZone2
              [Row].STRUM.Arbitrator.Carbon.TotalPlantDemand
              [Row].STRUM.Arbitrator.Carbon.TotalPlantSupply
              [Row].STRUM.Arbitrator.Carbon.TotalPlantDemandsAllocated
              [Row].STRUM.Arbitrator.Fn
              [Row].STRUM.Arbitrator.Nitrogen.TotalPlantDemand
              [Row].STRUM.Arbitrator.Nitrogen.TotalPlantSupply
              [Row].STRUM.Arbitrator.Nitrogen.TotalPlantDemandsAllocated
              [Row].STRUM.Fruit.TotalCarbonDemand.RelativeFruitMass.Delta.Integral
              [Row].STRUM.Fruit.Allocated.Carbon.Total
              [Row].STRUM.Fruit.Allocated.Nitrogen.Total
              [Row].STRUM.Fruit.Carbon.Demands.Structural
              [Row].STRUM.Fruit.Carbon.Demands.Total
              [Row].STRUM.Fruit.DMC
              [Row].STRUM.Fruit.FreshWtPerFruit
              [Row].STRUM.Fruit.NextYearsFruitingBudSurvival
              [Row].STRUM.Fruit.Number.BudsSurvivalFromLastYear
              [Row].STRUM.Fruit.N
              [Row].STRUM.Fruit.Nitrogen.Demands.Total
              [Row].STRUM.Fruit.Number
              [Row].STRUM.Fruit.Diameter
              [Row].STRUM.Fruit.VolumePerFruit
              [Row].STRUM.Fruit.Wt
              [Row].STRUM.Fruit.PotentialDWPerFruit
              [Row].STRUM.Fruit.TotalCarbonDemand.RelativeFruitMass
              [Row].STRUM.Fruit.TotalCarbonDemand.CarbonConc
              [Row].STRUM.Height
              [Row].STRUM.Height.PrunedCanopyBaseHeight
              [Row].STRUM.Height.PrunedCanopyBaseHeight  + [Row].STRUM.Height.PrunedCanopyDepth
              [Row].STRUM.Height.PrunedCanopyBaseHeight  + [Row].STRUM.Height.PrunedCanopyDepth + [Row].STRUM.Height.SeasonalDepthGrowth
              [Row].STRUM.Leaf.Allocated.Carbon.Total
              [Row].STRUM.Leaf.Allocated.Nitrogen.Total
              [Row].STRUM.Leaf.Canopy.CoverGreen
              [Row].STRUM.Leaf.Canopy.Deepness
              [Row].STRUM.Leaf.Dead.Wt
              [Row].STRUM.Leaf.Carbon.Demands.Structural
              [Row].STRUM.Leaf.Carbon.Demands.Total
              [Row].STRUM.Leaf.Fn
              [Row].STRUM.Leaf.Canopy.Fw
              [Row].STRUM.Leaf.Canopy.LAI
              [Row].STRUM.Leaf.Live.Wt
              [Row].STRUM.Leaf.N
              [Row].STRUM.Leaf.Nitrogen.Demands.Total
              [Row].STRUM.Leaf.Canopy.PotentialEP
              [Row].STRUM.Leaf.Canopy.RadiationIntercepted
              [Row].STRUM.Leaf.Senesced.Weight.Structural
              [Row].STRUM.Leaf.SenescenceRate
              [Row].STRUM.Leaf.Canopy.Transpiration
              [Row].STRUM.Leaf.Canopy.WaterDemand
              [Row].STRUM.Leaf.Canopy.WaterAllocation
              [Row].STRUM.Leaf.Canopy.Width
              [Row].STRUM.Leaf.Canopy.GreenExtinctionCoefficient
              [Row].STRUM.Leaf.Wt
              [Row].STRUM.Phenology.Age.YearDecimal
              [Row].STRUM.Phenology.Age.Years
              [Row].STRUM.Phenology.CurrentStageName
              [Row].STRUM.Phenology.DaysSinceFlowering
              [Row].STRUM.Phenology.Stage
              [Row].STRUM.RelativeSeasonalDimension
              [Row].STRUM.RelativeAnnualDimension
              [Row].STRUM.Root.Allocated.Carbon.Total
              [Row].STRUM.Root.Allocated.Nitrogen.Total
              [Row].STRUM.Root.Network.Depth
              [Row].STRUM.Root.Carbon.Demands.Structural
              [Row].STRUM.Root.Carbon.Demands.Total
              [Row].STRUM.Root.N
              [Row].STRUM.Root.Nitrogen.Demands.Total
              [Row].STRUM.RootUptakesArbitrator.WaterUptake.AmountByZone
              [Row].STRUM.RootUptakesArbitrator.WaterUptake.Mm
              [Row].STRUM.RootUptakesArbitrator.WaterUptake.Amount
              [Row].STRUM.RootUptakesArbitrator.NitrogenUptake.AmountByZone
              [Row].STRUM.RootUptakesArbitrator.NitrogenUptake.Gpm2
              [Row].STRUM.RootUptakesArbitrator.NitrogenUptake.Amount
              [Row].STRUM.RootUptakesArbitrator.WaterSupply.AmountByZone
              [Row].STRUM.RootUptakesArbitrator.WaterSupply.Mm
              [Row].STRUM.RootUptakesArbitrator.WaterSupply.Amount
              [Row].STRUM.RootUptakesArbitrator.NitrogenSupply.AmountByZone
              [Row].STRUM.RootUptakesArbitrator.NitrogenSupply.Gpm2
              [Row].STRUM.RootUptakesArbitrator.NitrogenSupply.Amount
              [Row].STRUM.Root.Wt
              [Row].STRUM.TranspirationPerTree
              [Row].STRUM.Wood.Allocated.Carbon.Total
              [Row].STRUM.Wood.Allocated.Nitrogen.Total
              [Row].STRUM.Wood.Carbon.Demands.Structural
              [Row].STRUM.Wood.Carbon.Demands.Total
              [Row].STRUM.Wood.Carbon.Supplies.ReTranslocation
              [Row].STRUM.Wood.Live.Carbon.Structural * 1/0.4
              [Row].STRUM.Wood.Live.Carbon.Storage * 1/0.4
              [Row].STRUM.Wood.EnergyBalance.CoverTotal
              [Row].STRUM.Wood.EnergyBalance.DeadAreaIndex
              [Row].STRUM.Wood.EnergyBalance.LAIDead
              [Row].STRUM.Wood.EnergyBalance.RadiationInterceptedByDead
              [Row].STRUM.Wood.EnergyBalance.Transpiration
              [Row].STRUM.Wood.N
              [Row].STRUM.Wood.Nitrogen.Demands.Total
              [Row].STRUM.Wood.Wt
              [Row].STRUM.Width
              [Row].STRUM.Width.PrunedWidth
              [Row].STRUM.Width.PrunedWidth + [Row].STRUM.Width.SeasonalGrowth
              [Row].STRUM.TranspirationPerLeafArea
              [Row].SurfaceOrganicMatter.N
              [Row].SurfaceOrganicMatter.Wt
              [Row].Irrigation.IrrigationApplied
              [Row].Fertiliser.NitrogenApplied
              sum([Row].Soil.OutputLayers.SWmm)
              [Row].Soil.OutputLayers.SWmm
              ([Row].Soil.OutputLayers.SWmm[1] + [Row].Soil.OutputLayers.SWmm[2]) as SWmm0_80
              ([Row].Soil.OutputLayers.SWmm[1] + [Row].Soil.OutputLayers.SWmm[2]+ [Row].Soil.OutputLayers.SWmm[3]) as SWmm0_120
              ([Row].Soil.OutputLayers.SWmm[1] + [Row].Soil.OutputLayers.SWmm[2]+ [Row].Soil.OutputLayers.SWmm[3] + [Row].Soil.OutputLayers.SWmm[4]) as SWmm0_160
              [Row].Soil.OutputLayers.SW
              ([Row].Soil.OutputLayers.SW[1] + [Row].Soil.OutputLayers.SW[2])/2 as VWC_0_80
              ([Row].Soil.OutputLayers.SW[1] + [Row].Soil.OutputLayers.SW[2] + [Row].Soil.OutputLayers.SW[3] )/3 as VWC_0_120
              ([Row].Soil.OutputLayers.SW[1] + [Row].Soil.OutputLayers.SW[2] + [Row].Soil.OutputLayers.SW[3] + [Row].Soil.OutputLayers.SW[3])/4 as VWC_0_160
              [Row].Soil.OutputLayers.SAT
              [Row].Soil.OutputLayers.DUL
              [Row].Soil.OutputLayers.LL15
              [Row].Soil.OutputLayers.PAWmm
              ([Row].Soil.OutputLayers.PAWmm[1] + [Row].Soil.OutputLayers.PAWmm[2]+ [Row].Soil.OutputLayers.PAWmm[3]) as PAWmm0_120
              [Row].Soil.SoilWater.Evaporation
              [Row].Soil.SoilWater.Flux[2000mm] + [Row].Soil.SoilWater.Flow[2000mm] as ProfileDrainage
              [Row].Soil.SoilWater.Eo
              [Row].Soil.SoilWater.Runoff
              [Weather].PanEvap
              [Weather].Radn
              [Weather].Rain
              [STRUM].Leaf.TotalCarbonDemand.TotalDMDemand.SizeDemand.SizeDemand.SizeDemand.TargetSize
          SurfaceOrganicMatter: InitialResidueName=wheat_stubble; InitialResidueType=wheat; InitialResidueMass=500; InitialStandingFraction=0; InitialCPR=0; InitialCNR=100
          Fertiliser
          Irrigation
          Manager MulchResidues
```csharp
using Models.Surface;
using Models.Core;
using Newtonsoft.Json;
using Models.Interfaces;
using APSIM.Shared.Utilities;
using System.Xml.Serialization;
using System;
        
namespace Models
{
    [Serializable] 
    [System.Xml.Serialization.XmlInclude(typeof(Model))]
    public class Script : Model
    {
        [Link] private SurfaceOrganicMatter SurfOM;
        
        //Determine daily requirement for fertiliser
        [EventSubscribe("Pruning")]
        private void OnPrun(object sender, EventArgs e)
        { 
            SurfOM.Incorporate(80,50);
        }
    }
}
```
          Plant STRUM
          Operations
            2013-01-26  [Irrigation]. Apply (30)
            2013-02-02  [Irrigation]. Apply (30)
            2013-02-02  [Irrigation]. Apply (40)
            2013-02-09  [Irrigation]. Apply (10)
            2013-02-16  [Irrigation]. Apply (20)
            2013-02-16  [Irrigation]. Apply (30)
            2013-02-23  [Irrigation]. Apply (30)
            2013-02-23  [Irrigation]. Apply (30)
            2013-03-02  [Irrigation]. Apply (40)
            2013-03-02  [Irrigation]. Apply (40)
            2013-03-09  [Irrigation]. Apply (20)
            2013-03-09  [Irrigation]. Apply (20)
            2013-03-16  [Irrigation]. Apply (30)
            2013-03-16  [Irrigation]. Apply (30)
            2013-04-13  [Irrigation]. Apply (20)
            2013-04-13  [Irrigation]. Apply (20)
            2014-02-08  [Irrigation]. Apply (10)
            2014-03-01  [Irrigation]. Apply (10)
            2014-03-08  [Irrigation]. Apply (20)
            2014-03-08  [Irrigation]. Apply (30)
            2014-03-15  [Irrigation]. Apply (20)
            2014-03-15  [Irrigation]. Apply (20)
            2015-01-24  [Irrigation]. Apply (20)
            2015-01-24  [Irrigation]. Apply (30)
            2015-01-31  [Irrigation]. Apply (40)
            2015-01-31  [Irrigation]. Apply (30)
            2015-02-14  [Irrigation]. Apply (20)
            2015-02-14  [Irrigation]. Apply (30)
            2015-02-21  [Irrigation]. Apply (30)
            2015-02-21  [Irrigation]. Apply (30)
            2015-02-28  [Irrigation]. Apply (10)
            2015-03-07  [Irrigation]. Apply (20)
            2015-03-07  [Irrigation]. Apply (30)
            2015-03-14  [Irrigation]. Apply (10)
            2015-12-26  [Irrigation]. Apply (10)
            2015-12-26  [Irrigation]. Apply (10)
            2016-01-02  [Irrigation]. Apply (10)
            2016-01-02  [Irrigation]. Apply (10)
            2017-01-07  [Irrigation]. Apply (10)
            2017-01-07  [Irrigation]. Apply (20)
            2017-01-14  [Irrigation]. Apply (30)
            2017-01-14  [Irrigation]. Apply (20)
            2017-01-21  [Irrigation]. Apply (20)
            2017-01-21  [Irrigation]. Apply (30)
            2017-01-28  [Irrigation]. Apply (10)
            2017-02-04  [Irrigation]. Apply (20)
            2017-02-04  [Irrigation]. Apply (20)
            2017-02-11  [Irrigation]. Apply (20)
            2017-02-11  [Irrigation]. Apply (20)
            2017-02-18  [Irrigation]. Apply (20)
            2017-02-18  [Irrigation]. Apply (20)
            2017-03-04  [Irrigation]. Apply (20)
            2017-03-04  [Irrigation]. Apply (30)
            2017-03-11  [Irrigation]. Apply (10)
            2017-03-11  [Irrigation]. Apply (10)
            2017-03-18  [Irrigation]. Apply (10)
            2017-03-18  [Irrigation]. Apply (10)
            2018-01-13  [Irrigation]. Apply (10)
            2018-01-20  [Irrigation]. Apply (10)
            2018-01-20  [Irrigation]. Apply (10)
            2018-01-27  [Irrigation]. Apply (20)
            2018-01-27  [Irrigation]. Apply (20)
            2018-02-03  [Irrigation]. Apply (20)
            2018-02-03  [Irrigation]. Apply (20)
            2019-03-02  [Irrigation]. Apply (10)
            2019-03-09  [Irrigation]. Apply (30)
            2019-03-09  [Irrigation]. Apply (30)
            2019-03-16  [Irrigation]. Apply (20)
            2019-03-16  [Irrigation]. Apply (20)
            2019-03-23  [Irrigation]. Apply (10)
            2019-03-23  [Irrigation]. Apply (10)
            2020-01-11  [Irrigation]. Apply (10)
            2020-01-11  [Irrigation]. Apply (10)
            2020-01-18  [Irrigation]. Apply (10)
            2020-01-18  [Irrigation]. Apply (20)
            2020-02-08  [Irrigation]. Apply (20)
            2020-02-08  [Irrigation]. Apply (20)
            2020-02-15  [Irrigation]. Apply (20)
            2020-02-15  [Irrigation]. Apply (20)
            2020-02-22  [Irrigation]. Apply (30)
            2020-02-22  [Irrigation]. Apply (30)
            2020-02-29  [Irrigation]. Apply (20)
            2020-02-29  [Irrigation]. Apply (20)
            2020-03-07  [Irrigation]. Apply (20)
            2020-03-07  [Irrigation]. Apply (20)
            2020-03-14  [Irrigation]. Apply (20)
            2020-03-14  [Irrigation]. Apply (20)
            2020-03-21  [Irrigation]. Apply (20)
            2020-03-21  [Irrigation]. Apply (20)
            2020-03-28  [Irrigation]. Apply (10)
            2020-03-28  [Irrigation]. Apply (10)
            2020-04-11  [Irrigation]. Apply (10)
            2020-04-11  [Irrigation]. Apply (10)
            2020-04-18  [Irrigation]. Apply (10)
            2020-04-25  [Irrigation]. Apply (10)
            2021-02-06  [Irrigation]. Apply (20)
            2021-02-06  [Irrigation]. Apply (20)
            2021-02-13  [Irrigation]. Apply (10)
            2021-02-13  [Irrigation]. Apply (20)
            2021-02-20  [Irrigation]. Apply (20)
            2021-02-20  [Irrigation]. Apply (10)
            2021-02-27  [Irrigation]. Apply (20)
            2021-02-27  [Irrigation]. Apply (20)
            2021-03-06  [Irrigation]. Apply (20)
            2021-03-06  [Irrigation]. Apply (20)
            2021-03-13  [Irrigation]. Apply (10)
            2021-03-13  [Irrigation]. Apply (10)
            2021-03-20  [Irrigation]. Apply (10)
            2022-02-05  [Irrigation]. Apply (20)
            2022-02-05  [Irrigation]. Apply (20)
            2022-02-12  [Irrigation]. Apply (10)
            2022-02-12  [Irrigation]. Apply (10)
            2022-02-19  [Irrigation]. Apply (20)
            2022-02-19  [Irrigation]. Apply (30)
            2022-02-26  [Irrigation]. Apply (10)
            2022-02-26  [Irrigation]. Apply (10)
            2022-03-05  [Irrigation]. Apply (10)
            2022-03-05  [Irrigation]. Apply (10)
            2022-03-12  [Irrigation]. Apply (10)
            2022-03-12  [Irrigation]. Apply (10)
            2022-04-16  [Irrigation]. Apply (10)
            2023-10-07  [Irrigation]. Apply (2.1)
            2023-10-07  [Irrigation]. Apply (2.1)
            2024-09-14  [Irrigation]. Apply (0.2)
            2024-09-14  [Irrigation]. Apply (0.2)
            2024-11-23  [Irrigation]. Apply (7.7)
            2024-11-23  [Irrigation]. Apply (7.7)
            2024-12-14  [Irrigation]. Apply (5.4)
            2024-12-14  [Irrigation]. Apply (5.4)
            2025-01-11  [Irrigation]. Apply (21.2)
            2025-01-11  [Irrigation]. Apply (21.2)
            2025-01-18  [Irrigation]. Apply (5.3)
            2025-01-18  [Irrigation]. Apply (5.3)
            2025-02-15  [Irrigation]. Apply (24.2)
            2025-02-15  [Irrigation]. Apply (24.2)
            2025-03-22  [Irrigation]. Apply (5.2)
            2025-03-22  [Irrigation]. Apply (5.2)
            2025-03-29  [Irrigation]. Apply (29.5)
            2025-03-29  [Irrigation]. Apply (29.5)
            2025-06-07  [Irrigation]. Apply (2.3)
            2025-06-07  [Irrigation]. Apply (2.3)
            2025-08-30  [Irrigation]. Apply (0.8)
            2025-08-30  [Irrigation]. Apply (0.8)
            2025-09-13  [Irrigation]. Apply (0.8)
            2025-09-13  [Irrigation]. Apply (0.8)
          Soil Otor_83a3: same as NZ Kiwifruit Expts.Orchard_Katikati.Factors._.Gold.Otor_83a3
          StrumTreeInstance KiwiFruit: TreeType=Deciduous; RowSpacing=3.6; InterRowSpacing=3; AlleyZoneWidthFrac=0.1; BudBreakDate=19-Sep; StartFullCanopyDate=15-Dec; StartLeafFallDate=18-May; EndLeafFallDate=21-Jun; DBHatMaturity=5; TypicalCanopyArea=22; WoodBulkDensity=450; WoodStorageFraction=0.2; MaximumLeafBiomass=150; MaximumRootBiomass=200; AgeAtSimulationStart=6; YearsToMaxDimension=6; CrownShape=1; MatureCanopyBaseHeight=1.8; MaturePrunedCanopyBaseHeight=1.8; MatureHeight=2.4; MaturePrunedHeight=2.4; MatureWidth=3.4; MaturePrunedWidth=3.4; SummerPruneDates=[15-Jul]; FRemoveSummerPrune=0.25; RootNConc=0.01; LeafNConc=0.02; WoodNConc=0.005; FruitNConc=0.02; NFixationFrac=0; GRINZ=true; MaxRD=1.5; ExtinctCoeff=0.8; BaseCover=0; MaxCover=0.95; RUE=2; PSBaseT=10; PSLOptT=20; PSUOptT=25; PSMaxT=35; GSMax=0.011; R50=125; SurfaceKL=0.1; WaterStress=true; Number=60; PotentialFWPerFruit=140; DMC=0.17; FruitDensity=1.02; DateMaxBloom=7-Nov; DAFStartLinearGrowth=90; DAFEndLinearGrowth=180; DAFMaxSize=200
        Manager ResetDate: same as NZ Kiwifruit Expts.Orchard_LIN.LIN_Gold.ResetDate
    Experiment Orchard_Waiuku
      Factors
        Factor _
          CompositeFactor Gold
            Specifications:
              [RadiationWindFactor].Script.RadiationFactor = 0.8
              [RadiationWindFactor].Script.WindFactor = 0.5
              [Soil]
            Memo ReadMe
              *	Put here as a Decoy
            Soil Karaka_1a1: ASCOrder=L; SoilType=Mottled Orthic Allophanic Soils; LocalName=Karaka_1a1; Country=New Zealand; Latitude=-41; Longitude=174
              DataSource=Profile descriptions provided by Smap based on the work done by Trevor Webb.
              Memo Karaka_1a1
                *	Used measured hydraulic properties provided by SG
              Physical
                Thickness  ParticleSizeSand  ParticleSizeSilt  ParticleSizeClay  Rocks  BD     AirDry  LL15   DUL    SAT    KS
                100        12.5              47.5              40                0      0.82   0.139   0.278  0.485  0.619  1920
                100        12.5              47.5              40                0      0.82   0.139   0.278  0.485  0.619  1920
                200        9                 26                65                0      0.671  0.353   0.404  0.567  0.676  720
                200        9                 26                65                0      0.671  0.353   0.404  0.567  0.676  720
                233        15                35                50                0      0.749  0.375   0.375  0.554  0.646  720
                233        15                35                50                0      0.749  0.375   0.375  0.554  0.646  720
                233        15                35                50                0      0.749  0.375   0.375  0.554  0.646  720
                233        15                35                50                0      0.749  0.375   0.375  0.554  0.646  720
                233        15                35                50                0      0.749  0.375   0.375  0.554  0.646  720
                235        15                35                50                0      0.749  0.375   0.375  0.554  0.646  720
                SoilCrop STRUMSoil
                  LL=[0.278, 0.278, 0.404, 0.404, 0.375, 0.375, 0.375, 0.375, 0.375, 0.375]
                  KL=[0.111508, 0.111508, 0.0488579, 0.0488579, 0.00710178, 0.00710178, 0.00710178, 0.00710178, 0.00710178, 0.00710178]
                  XF=[1, 1, 1, 1, 1, 1, 1, 1, 1, 1]
              Organic: FOMCNRatio=40; CarbonUnits=Total
                Thickness  Carbon    SoilCNRatio  FBiom      FInert    FOM
                50         10        11.1         0.0788566  0.575     227.364
                50         10        11.1         0.0610103  0.575     220.546
                50         10        11.1         0.0477893  0.613573  177.533
                50         8.22356   11.1         0.037995   0.662199  138.263
                50         5.57835   11.1         0.0307392  0.709226  107.679
                50         3.80522   11.1         0.025364   0.749972  83.8606
                50         2.61665   11.1         0.0213819  0.785433  65.3107
                50         1.81993   11.1         0.0184319  0.816456  50.864
                50         1.28587   11.1         0.0162465  0.843742  39.6129
                50         0.927881  11.1         0.0146275  0.867834  30.8506
                250        0.419234  11.1         0.0118814  0.923972  77.4992
                250        0.22967   11.1         0.0104198  0.978156  22.2039
                500        0.201477  11.1         0.0100442  0.990841  8.18413
                500        0.200027  11.1         0.0100022  0.996255  0
              Chemical: PHUnits=Water
                Thickness  PH  CEC
                200        7   24.4375
                400        7   20.9173
                1400       7   16.146
              Water: Thickness=[200, 400, 1400]; InitialValues=[0.485, 0.567, 0.554]; FilledFromTop=false
              WaterBalance SoilWater: SummerDate=1-oct; SummerU=9; SummerCona=4.4; WinterDate=1-apr; WinterU=4; WinterCona=2; DiffusConst=88; DiffusSlope=35; Salb=0.13; CN2Bare=88; CNRed=21; CNCov=0.8; PSIDul=-100
                Thickness  SWCON  KLAT
                200        0.3    0
                400        0.3    0
                1400       0.3    0
              SoilTemperature Temperature: InteractionsPerDay=8
              Solute NO3: Thickness=[200, 400, 1400]; InitialValues=[12.6667, 6.5098, 0.823529]; InitialValuesUnits=kg/ha; WaterTableConcentration=0; D0=0; DepthConstant=0; MaxDepthSoluteAccessible=0; RunoffEffectivenessAtMovingSolute=0; MaxEffectiveRunoff=0
              Solute NH4: Thickness=[200, 400, 1400]; InitialValues=[1.9, 0.976471, 0.123529]; InitialValuesUnits=kg/ha; WaterTableConcentration=0; D0=0; DepthConstant=0; MaxDepthSoluteAccessible=0; RunoffEffectivenessAtMovingSolute=0; MaxEffectiveRunoff=0
              Solute Urea: Thickness=[200, 400, 1400]; InitialValues=[0, 0, 0]; InitialValuesUnits=ppm; WaterTableConcentration=0; D0=0; DepthConstant=0; MaxDepthSoluteAccessible=0; RunoffEffectivenessAtMovingSolute=0; MaxEffectiveRunoff=0
              Nutrient
              OutputLayers: Thickness=[900, 300, 300, 500]
          CompositeFactor SMAP
            Specifications:
              [RadiationWindFactor].Script.RadiationFactor = 0.8
              [RadiationWindFactor].Script.WindFactor = 0.5
              [Soil]
            Soil Otorohanga_24b1: ASCOrder=L; SoilType=Typic Orthic Allophanic Soils; LocalName=Otorohanga_24b1; Country=New Zealand; Latitude=-41; Longitude=174
              DataSource=Profile descriptions provided by Smap based on the work done by Trevor Webb.
              Memo ReadMe
                Straight from SMAP based on coordinates
              Physical
                Thickness  ParticleSizeSand  ParticleSizeSilt  ParticleSizeClay  Rocks  BD     AirDry  LL15   DUL    SAT    KS
                105        25                60                15                0      0.747  0.129   0.259  0.505  0.647  2400
                105        25                60                15                0      0.747  0.129   0.259  0.505  0.647  2400
                162        25                60                15                0      0.659  0.261   0.303  0.508  0.68   1440
                163        25                60                15                0      0.659  0.261   0.303  0.508  0.68   1440
                244        20                60                20                0      0.757  0.346   0.346  0.539  0.643  960
                244        20                60                20                0      0.757  0.346   0.346  0.539  0.643  960
                244        20                60                20                0      0.757  0.346   0.346  0.539  0.643  960
                244        20                60                20                0      0.757  0.346   0.346  0.539  0.643  960
                244        20                60                20                0      0.757  0.346   0.346  0.539  0.643  960
                245        20                60                20                0      0.757  0.346   0.346  0.539  0.643  960
                SoilCrop STRUMSoil
                  LL=[0.259, 0.259, 0.303, 0.303, 0.346, 0.346, 0.346, 0.346, 0.346, 0.346]
                  KL=[0.11032, 0.11032, 0.072553, 0.072553, 0.0091368, 0.0091368, 0.0091368, 0.0091368, 0.0091368, 0.0091368]
                  XF=[1, 1, 1, 1, 1, 1, 1, 1, 1, 1]
              Organic: same as NZ Kiwifruit Expts.Orchard_Waiuku.Factors._.Gold.Karaka_1a1.Organic
              Chemical: PHUnits=Water
                Thickness  PH  CEC
                210        7   18.6
                325        7   10.1825
                1465       7   9.81133
              Water: Thickness=[210, 325, 1465]; InitialValues=[0.505, 0.508, 0.539]; FilledFromTop=false
              WaterBalance SoilWater: SummerDate=1-oct; SummerU=9; SummerCona=4.4; WinterDate=1-apr; WinterU=4; WinterCona=2; DiffusConst=88; DiffusSlope=35; Salb=0.13; CN2Bare=83; CNRed=29; CNCov=0.8; PSIDul=-100
                Thickness  SWCON  KLAT
                210        0.4    0
                325        0.3    0
                1465       0.4    0
              SoilTemperature Temperature: InteractionsPerDay=8
              Solute NO3: Thickness=[210, 325, 1465]; InitialValues=[13.3, 5.83824, 0.861765]; InitialValuesUnits=kg/ha; WaterTableConcentration=0; D0=0; DepthConstant=0; MaxDepthSoluteAccessible=0; RunoffEffectivenessAtMovingSolute=0; MaxEffectiveRunoff=0
              Solute NH4: Thickness=[210, 325, 1465]; InitialValues=[1.995, 0.875735, 0.129265]; InitialValuesUnits=kg/ha; WaterTableConcentration=0; D0=0; DepthConstant=0; MaxDepthSoluteAccessible=0; RunoffEffectivenessAtMovingSolute=0; MaxEffectiveRunoff=0
              Solute Urea: Thickness=[210, 325, 1465]; InitialValues=[0, 0, 0]; InitialValuesUnits=ppm; WaterTableConcentration=0; D0=0; DepthConstant=0; MaxDepthSoluteAccessible=0; RunoffEffectivenessAtMovingSolute=0; MaxEffectiveRunoff=0
              Nutrient
              OutputLayers: Thickness=[900, 300, 300, 500]
          CompositeFactor FSL
            Specifications:
              [RadiationWindFactor].Script.RadiationFactor = 0.8
              [RadiationWindFactor].Script.WindFactor = 0.5
              [Soil]
            Soil Karaka_1a1: same as NZ Kiwifruit Expts.Orchard_Waiuku.Factors._.Gold.Karaka_1a1
      Simulation Gold
        Memo ReadMe
          *	Located in South Auckland
          * 	Sheltered and netted orchard
          *	Irrigated (SG to provide info)
          *	Use AKL airport weather

          Measurements were
          *	Sap-flow
          *	Fruit growth
          *	Soil moisture (150–160; 30/20 cm interval); TDR
          *	Light interception.
        Clock: Start=2023-07-01; End=2026-06-30
        Summary SummaryFile
        Weather: FileName=Weather_SG/PukekoheMetWatch.met
        MicroClimate: a_interception=0; b_interception=1; c_interception=0; d_interception=0; SoilHeatFluxFraction=0.4; MinimumHeightDiffForNewLayer=0; NightInterceptionFraction=0.5; ReferenceHeight=2
        SoilArbitrator Soil Arbitrator
        Manager AutomaticFertiliser: same as NZ Kiwifruit Expts.Orchard_Katikati.Katikati.AutomaticFertiliser
        Manager RadiationWindFactor: same as NZ Kiwifruit Expts.Orchard_OPK.Orchard_OPK.RadiationWindFactor
        RectangularZone Row: Length=100; Width=1; CanopyType=TreeRow; Slope=0; AspectAngle=0; Altitude=50
          Report RowZoneReport: EventNames=[Clock].DoReport
          Report KiwiReport: EventNames=[Clock].DoReport
            VariableNames:
              [Clock].Today
              [ResetDate].Script.SimulationYear as SimYear
              [Row].STRUM.AccumulatedWaterStress
              [Row].Soil.SoilWater.Drainage
              //[Row].STRUM.Arbitrator.DemandRatio
              [Row].Area
              [Row].STRUM.BaseHeight
              [Row].STRUM.Fruit.FreshYield_kgPerHa
              [Row].STRUM.CanopyArea
              [Row].STRUM.RootUptakesArbitrator.WaterDemand.Amount
              [Row].STRUM.RootUptakesArbitrator.WaterDemand.mm
              [Row].STRUM.RootUptakesArbitrator.NitrogenDemand.Amount
              [Row].STRUM.Root.Network.WtByLayerZone1
              [Row].STRUM.Root.Network.WtByLayerZone2
              [Row].STRUM.Arbitrator.Carbon.TotalPlantDemand
              [Row].STRUM.Arbitrator.Carbon.TotalPlantSupply
              [Row].STRUM.Arbitrator.Carbon.TotalPlantDemandsAllocated
              [Row].STRUM.Arbitrator.Fn
              [Row].STRUM.Arbitrator.Nitrogen.TotalPlantDemand
              [Row].STRUM.Arbitrator.Nitrogen.TotalPlantSupply
              [Row].STRUM.Arbitrator.Nitrogen.TotalPlantDemandsAllocated
              [Row].STRUM.Fruit.TotalCarbonDemand.RelativeFruitMass.Delta.Integral
              [Row].STRUM.Fruit.Allocated.Carbon.Total
              [Row].STRUM.Fruit.Allocated.Nitrogen.Total
              [Row].STRUM.Fruit.Carbon.Demands.Structural
              [Row].STRUM.Fruit.Carbon.Demands.Total
              [Row].STRUM.Fruit.DMC
              [Row].STRUM.Fruit.FreshWtPerFruit
              [Row].STRUM.Fruit.NextYearsFruitingBudSurvival
              [Row].STRUM.Fruit.Number.BudsSurvivalFromLastYear
              [Row].STRUM.Fruit.N
              [Row].STRUM.Fruit.NConc
              [Row].STRUM.Fruit.Nitrogen.Demands.Total
              [Row].STRUM.Fruit.Number
              [Row].STRUM.Fruit.Diameter
              [Row].STRUM.Fruit.VolumePerFruit
              [Row].STRUM.Fruit.Wt
              [Row].STRUM.Fruit.PotentialDWPerFruit
              [Row].STRUM.Fruit.TotalCarbonDemand.RelativeFruitMass
              [Row].STRUM.Fruit.TotalCarbonDemand.CarbonConc
              [Row].STRUM.Height
              [Row].STRUM.Height.PrunedCanopyBaseHeight
              [Row].STRUM.Height.PrunedCanopyBaseHeight  + [Row].STRUM.Height.PrunedCanopyDepth
              [Row].STRUM.Height.PrunedCanopyBaseHeight  + [Row].STRUM.Height.PrunedCanopyDepth + [Row].STRUM.Height.SeasonalDepthGrowth
              [Row].STRUM.Leaf.Allocated.Carbon.Total
              [Row].STRUM.Leaf.Allocated.Nitrogen.Total
              [Row].STRUM.Leaf.Canopy.CoverGreen
              [Row].STRUM.Leaf.Canopy.Deepness
              [Row].STRUM.Leaf.Dead.Wt
              [Row].STRUM.Leaf.Carbon.Demands.Structural
              [Row].STRUM.Leaf.Carbon.Demands.Total
              [Row].STRUM.Leaf.Fn
              [Row].STRUM.Leaf.Canopy.Fw
              [Row].STRUM.Leaf.Canopy.LAI
              [Row].STRUM.Leaf.Live.Wt
              [Row].STRUM.Leaf.NConc
              [Row].STRUM.Leaf.Nitrogen.Demands.Total
              [Row].STRUM.Leaf.Canopy.PotentialEP
              [Row].STRUM.Leaf.Canopy.RadiationIntercepted
              [Row].STRUM.Leaf.Senesced.Weight.Structural
              [Row].STRUM.Leaf.SenescenceRate
              [Row].STRUM.Leaf.Canopy.Transpiration
              [Row].STRUM.Leaf.Canopy.WaterDemand
              [Row].STRUM.Leaf.Canopy.WaterAllocation
              [Row].STRUM.Leaf.Canopy.Width
              [Row].STRUM.Leaf.Canopy.GreenExtinctionCoefficient
              [Row].STRUM.Leaf.Wt
              [Row].STRUM.Phenology.Age.YearDecimal
              [Row].STRUM.Phenology.Age.Years
              [Row].STRUM.Phenology.CurrentStageName
              [Row].STRUM.Phenology.DaysSinceFlowering
              [Row].STRUM.Phenology.Stage
              [Row].STRUM.RelativeSeasonalDimension
              [Row].STRUM.RelativeAnnualDimension
              [Row].STRUM.Root.Allocated.Carbon.Total
              [Row].STRUM.Root.Allocated.Nitrogen.Total
              [Row].STRUM.Root.Network.Depth
              [Row].STRUM.Root.Carbon.Demands.Structural
              [Row].STRUM.Root.Carbon.Demands.Total
              [Row].STRUM.Root.N
              [Row].STRUM.Root.Nitrogen.Demands.Total
              [Row].STRUM.RootUptakesArbitrator.WaterUptake.AmountByZone
              [Row].STRUM.RootUptakesArbitrator.WaterUptake.Mm
              [Row].STRUM.RootUptakesArbitrator.WaterUptake.Amount
              [Row].STRUM.RootUptakesArbitrator.NitrogenUptake.AmountByZone
              [Row].STRUM.RootUptakesArbitrator.NitrogenUptake.Gpm2
              [Row].STRUM.RootUptakesArbitrator.NitrogenUptake.Amount
              [Row].STRUM.RootUptakesArbitrator.WaterSupply.AmountByZone
              [Row].STRUM.RootUptakesArbitrator.WaterSupply.Mm
              [Row].STRUM.RootUptakesArbitrator.WaterSupply.Amount
              [Row].STRUM.RootUptakesArbitrator.NitrogenSupply.AmountByZone
              [Row].STRUM.RootUptakesArbitrator.NitrogenSupply.Gpm2
              [Row].STRUM.RootUptakesArbitrator.NitrogenSupply.Amount
              [Row].STRUM.Root.Wt
              [Row].STRUM.TranspirationPerTree
              [Row].STRUM.Wood.Allocated.Carbon.Total
              [Row].STRUM.Wood.Allocated.Nitrogen.Total
              [Row].STRUM.Wood.Carbon.Demands.Structural
              [Row].STRUM.Wood.Carbon.Demands.Total
              [Row].STRUM.Wood.Carbon.Supplies.ReTranslocation
              [Row].STRUM.Wood.Live.Carbon.Structural * 1/0.4
              [Row].STRUM.Wood.Live.Carbon.Storage * 1/0.4
              [Row].STRUM.Wood.EnergyBalance.CoverTotal
              [Row].STRUM.Wood.EnergyBalance.DeadAreaIndex
              [Row].STRUM.Wood.EnergyBalance.LAIDead
              [Row].STRUM.Wood.EnergyBalance.RadiationInterceptedByDead
              [Row].STRUM.Wood.EnergyBalance.Transpiration
              [Row].STRUM.Wood.N
              [Row].STRUM.Wood.Nitrogen.Demands.Total
              [Row].STRUM.Wood.Wt
              [Row].STRUM.Width
              [Row].STRUM.Width.PrunedWidth
              [Row].STRUM.Width.PrunedWidth + [Row].STRUM.Width.SeasonalGrowth
              [Row].STRUM.TranspirationPerLeafArea
              [Row].SurfaceOrganicMatter.N
              [Row].SurfaceOrganicMatter.Wt
              [Row].Irrigation.IrrigationApplied
              [Row].Fertiliser.NitrogenApplied
              sum([Row].Soil.OutputLayers.SWmm)
              [Row].Soil.OutputLayers.SWmm
              [Row].Soil.OutputLayers.SWmm[1] as SWmm0_90
              ([Row].Soil.OutputLayers.SWmm[1] + [Row].Soil.OutputLayers.SWmm[2]) as SWmm0_120
              ([Row].Soil.OutputLayers.SWmm[1] + [Row].Soil.OutputLayers.SWmm[2]+ [Row].Soil.OutputLayers.SWmm[3]) as SWmm0_150
              ([Row].Soil.OutputLayers.SWmm[1] + [Row].Soil.OutputLayers.SWmm[2]+ [Row].Soil.OutputLayers.SWmm[3] + [Row].Soil.OutputLayers.SWmm[4]) as SWmm0_200
              [Row].Soil.OutputLayers.SW
              [Row].Soil.OutputLayers.SAT
              [Row].Soil.OutputLayers.DUL
              [Row].Soil.OutputLayers.LL15
              [Row].Soil.OutputLayers.PAWmm
              ([Row].Soil.OutputLayers.PAWmm[1] + [Row].Soil.OutputLayers.PAWmm[2]) as PAWmm0_120
              [Row].Soil.SoilWater.Evaporation
              [Row].Soil.SoilWater.Eo
              [Row].Soil.SoilWater.Runoff
              [Weather].PanEvap
              [Weather].Radn
              [Weather].Rain
              [STRUM].Leaf.TotalCarbonDemand.TotalDMDemand.SizeDemand.SizeDemand.SizeDemand.TargetSize
          SurfaceOrganicMatter: InitialResidueName=wheat_stubble; InitialResidueType=wheat; InitialResidueMass=500; InitialStandingFraction=0; InitialCPR=0; InitialCNR=100
          Fertiliser
          Irrigation
          Manager MulchResidues: same as NZ Kiwifruit Expts.Orchard_Katikati.Katikati.Row.MulchResidues
          Soil Karaka_1a1: ASCOrder=L; SoilType=Mottled Orthic Allophanic Soils; LocalName=Karaka_1a1; Country=New Zealand; Latitude=-41; Longitude=174
            DataSource=Profile descriptions provided by Smap based on the work done by Trevor Webb.
            Physical: same as NZ Kiwifruit Expts.Orchard_Waiuku.Factors._.Gold.Karaka_1a1.Physical
            Organic: same as NZ Kiwifruit Expts.Orchard_Waiuku.Factors._.Gold.Karaka_1a1.Organic
            Chemical: PHUnits=Water
              Thickness  PH  CEC
              200        7   24.4375
              400        7   20.9173
              1400       7   16.146
            Water: Thickness=[200, 400, 1400]; InitialValues=[0.485, 0.567, 0.554]; FilledFromTop=false
            WaterBalance SoilWater: same as NZ Kiwifruit Expts.Orchard_Waiuku.Factors._.Gold.Karaka_1a1.SoilWater
            SoilTemperature Temperature: InteractionsPerDay=8
            Solute NO3: same as NZ Kiwifruit Expts.Orchard_Waiuku.Factors._.Gold.Karaka_1a1.NO3
            Solute NH4: same as NZ Kiwifruit Expts.Orchard_Waiuku.Factors._.Gold.Karaka_1a1.NH4
            Solute Urea: Thickness=[200, 400, 1400]; InitialValues=[0, 0, 0]; InitialValuesUnits=ppm; WaterTableConcentration=0; D0=0; DepthConstant=0; MaxDepthSoluteAccessible=0; RunoffEffectivenessAtMovingSolute=0; MaxEffectiveRunoff=0
            Nutrient
            OutputLayers: Thickness=[900, 300, 300, 500]
          Plant STRUM
          Operations
            2013-01-12  [Irrigation]. Apply (15)
            2013-01-19  [Irrigation]. Apply (15)
            2013-01-26  [Irrigation]. Apply (30)
            2013-01-26  [Irrigation]. Apply (30)
            2013-02-02  [Irrigation]. Apply (30)
            2013-02-02  [Irrigation]. Apply (30)
            2013-02-23  [Irrigation]. Apply (15)
            2013-03-02  [Irrigation]. Apply (15)
            2013-03-02  [Irrigation]. Apply (30)
            2013-03-09  [Irrigation]. Apply (15)
            2013-03-09  [Irrigation]. Apply (15)
            2013-03-16  [Irrigation]. Apply (30)
            2013-03-16  [Irrigation]. Apply (30)
            2014-01-25  [Irrigation]. Apply (15)
            2014-02-08  [Irrigation]. Apply (30)
            2014-02-08  [Irrigation]. Apply (15)
            2014-02-15  [Irrigation]. Apply (15)
            2014-02-15  [Irrigation]. Apply (15)
            2014-02-22  [Irrigation]. Apply (30)
            2014-02-22  [Irrigation]. Apply (15)
            2014-03-01  [Irrigation]. Apply (15)
            2014-03-01  [Irrigation]. Apply (30)
            2014-03-08  [Irrigation]. Apply (15)
            2014-03-08  [Irrigation]. Apply (15)
            2014-03-15  [Irrigation]. Apply (15)
            2014-03-15  [Irrigation]. Apply (15)
            2014-03-22  [Irrigation]. Apply (15)
            2014-03-29  [Irrigation]. Apply (15)
            2014-04-05  [Irrigation]. Apply (15)
            2014-04-05  [Irrigation]. Apply (15)
            2015-01-24  [Irrigation]. Apply (30)
            2015-01-31  [Irrigation]. Apply (30)
            2015-01-31  [Irrigation]. Apply (30)
            2015-02-14  [Irrigation]. Apply (15)
            2015-02-21  [Irrigation]. Apply (30)
            2015-02-21  [Irrigation]. Apply (15)
            2015-02-28  [Irrigation]. Apply (15)
            2015-02-28  [Irrigation]. Apply (15)
            2015-03-07  [Irrigation]. Apply (15)
            2015-03-07  [Irrigation]. Apply (15)
            2015-03-14  [Irrigation]. Apply (15)
            2015-03-14  [Irrigation]. Apply (15)
            2016-02-20  [Irrigation]. Apply (15)
            2017-01-21  [Irrigation]. Apply (15)
            2017-02-04  [Irrigation]. Apply (15)
            2017-02-11  [Irrigation]. Apply (15)
            2017-02-11  [Irrigation]. Apply (15)
            2017-02-18  [Irrigation]. Apply (15)
            2017-02-18  [Irrigation]. Apply (15)
            2017-12-30  [Irrigation]. Apply (15)
            2019-02-09  [Irrigation]. Apply (15)
            2019-02-16  [Irrigation]. Apply (15)
            2019-02-16  [Irrigation]. Apply (15)
            2019-02-23  [Irrigation]. Apply (30)
            2019-02-23  [Irrigation]. Apply (15)
            2019-03-09  [Irrigation]. Apply (15)
            2019-03-09  [Irrigation]. Apply (15)
            2020-01-18  [Irrigation]. Apply (15)
            2020-01-25  [Irrigation]. Apply (30)
            2020-01-25  [Irrigation]. Apply (15)
            2020-02-01  [Irrigation]. Apply (30)
            2020-02-01  [Irrigation]. Apply (30)
            2020-02-08  [Irrigation]. Apply (30)
            2020-02-08  [Irrigation]. Apply (30)
            2020-02-15  [Irrigation]. Apply (30)
            2020-02-15  [Irrigation]. Apply (15)
            2020-02-22  [Irrigation]. Apply (15)
            2020-02-22  [Irrigation]. Apply (30)
            2021-02-13  [Irrigation]. Apply (15)
            2021-03-27  [Irrigation]. Apply (15)
            2022-01-15  [Irrigation]. Apply (15)
            2022-01-22  [Irrigation]. Apply (30)
            2022-01-22  [Irrigation]. Apply (15)
            2022-01-29  [Irrigation]. Apply (15)
            2022-01-29  [Irrigation]. Apply (15)
            2022-02-05  [Irrigation]. Apply (30)
            2022-02-05  [Irrigation]. Apply (30)
            2022-03-12  [Irrigation]. Apply (15)
            2022-03-12  [Irrigation]. Apply (15)
            2022-03-19  [Irrigation]. Apply (15)
            2022-03-19  [Irrigation]. Apply (15)
            2022-03-26  [Irrigation]. Apply (15)
            2022-04-02  [Irrigation]. Apply (15)
            2022-04-09  [Irrigation]. Apply (15)
            2022-04-16  [Irrigation]. Apply (15)
            2022-04-23  [Irrigation]. Apply (15)
            2022-05-07  [Irrigation]. Apply (15)
            2024-01-06  [Irrigation]. Apply (5.6)
            2024-01-06  [Irrigation]. Apply (5.6)
            2024-01-13  [Irrigation]. Apply (8.5)
            2024-01-13  [Irrigation]. Apply (8.5)
            2024-01-20  [Irrigation]. Apply (5.7)
            2024-01-20  [Irrigation]. Apply (5.7)
            2024-01-27  [Irrigation]. Apply (3.4)
            2024-01-27  [Irrigation]. Apply (3.4)
            2024-02-03  [Irrigation]. Apply (5.4)
            2024-02-03  [Irrigation]. Apply (5.4)
            2024-02-10  [Irrigation]. Apply (3.2)
            2024-02-10  [Irrigation]. Apply (3.2)
            2024-02-17  [Irrigation]. Apply (7.4)
            2024-02-17  [Irrigation]. Apply (7.4)
            2024-02-24  [Irrigation]. Apply (2.4)
            2024-02-24  [Irrigation]. Apply (2.4)
            2024-05-04  [Irrigation]. Apply (1.8)
            2024-05-04  [Irrigation]. Apply (1.8)
            2024-05-18  [Irrigation]. Apply (0.1)
            2024-05-18  [Irrigation]. Apply (0.1)
            2024-05-25  [Irrigation]. Apply (0.7)
            2024-05-25  [Irrigation]. Apply (0.7)
            2024-09-14  [Irrigation]. Apply (0.6)
            2024-09-14  [Irrigation]. Apply (0.6)
            2024-09-21  [Irrigation]. Apply (0.1)
            2024-09-21  [Irrigation]. Apply (0.1)
            2024-10-12  [Irrigation]. Apply (1.9)
            2024-10-12  [Irrigation]. Apply (1.9)
            2024-10-26  [Irrigation]. Apply (2.8)
            2024-10-26  [Irrigation]. Apply (2.8)
            2024-11-02  [Irrigation]. Apply (8.3)
            2024-11-02  [Irrigation]. Apply (8.3)
            2024-11-09  [Irrigation]. Apply (2.8)
            2024-11-09  [Irrigation]. Apply (2.8)
            2024-11-23  [Irrigation]. Apply (5)
            2024-11-23  [Irrigation]. Apply (5)
            2024-11-30  [Irrigation]. Apply (2.5)
            2024-11-30  [Irrigation]. Apply (2.5)
            2024-12-07  [Irrigation]. Apply (3.5)
            2024-12-07  [Irrigation]. Apply (3.5)
            2024-12-14  [Irrigation]. Apply (5)
            2024-12-14  [Irrigation]. Apply (5)
            2024-12-21  [Irrigation]. Apply (5)
            2024-12-21  [Irrigation]. Apply (5)
            2024-12-28  [Irrigation]. Apply (2.9)
            2024-12-28  [Irrigation]. Apply (2.9)
            2025-01-04  [Irrigation]. Apply (4.2)
            2025-01-04  [Irrigation]. Apply (4.2)
            2025-01-11  [Irrigation]. Apply (5.6)
            2025-01-11  [Irrigation]. Apply (5.6)
            2025-01-18  [Irrigation]. Apply (2.5)
            2025-01-18  [Irrigation]. Apply (2.5)
            2025-01-25  [Irrigation]. Apply (5.9)
            2025-01-25  [Irrigation]. Apply (5.9)
            2025-02-01  [Irrigation]. Apply (5.9)
            2025-02-01  [Irrigation]. Apply (5.9)
            2025-02-08  [Irrigation]. Apply (6.1)
            2025-02-08  [Irrigation]. Apply (6.1)
            2025-02-15  [Irrigation]. Apply (1.8)
            2025-02-15  [Irrigation]. Apply (1.8)
            2025-02-22  [Irrigation]. Apply (2.1)
            2025-02-22  [Irrigation]. Apply (2.1)
            2025-03-15  [Irrigation]. Apply (0.2)
            2025-03-15  [Irrigation]. Apply (0.2)
            2025-03-29  [Irrigation]. Apply (2.5)
            2025-03-29  [Irrigation]. Apply (2.5)
            2025-09-20  [Irrigation]. Apply (1.6)
            2025-09-20  [Irrigation]. Apply (1.6)
            2025-09-27  [Irrigation]. Apply (1.7)
            2025-09-27  [Irrigation]. Apply (1.7)
            2025-10-04  [Irrigation]. Apply (0.3)
            2025-10-04  [Irrigation]. Apply (0.3)
            2025-10-11  [Irrigation]. Apply (1.7)
            2025-10-11  [Irrigation]. Apply (1.7)
            2025-10-18  [Irrigation]. Apply (1.7)
            2025-10-18  [Irrigation]. Apply (1.7)
            2025-11-01  [Irrigation]. Apply (1.7)
            2025-11-01  [Irrigation]. Apply (1.7)
            2025-11-08  [Irrigation]. Apply (4.3)
            2025-11-08  [Irrigation]. Apply (4.3)
            2025-11-22  [Irrigation]. Apply (1.7)
            2025-11-22  [Irrigation]. Apply (1.7)
            2025-11-29  [Irrigation]. Apply (5)
            2025-11-29  [Irrigation]. Apply (5)
            2025-12-06  [Irrigation]. Apply (5.4)
            2025-12-06  [Irrigation]. Apply (5.4)
            2025-12-13  [Irrigation]. Apply (6.2)
            2025-12-13  [Irrigation]. Apply (6.2)
            2025-12-20  [Irrigation]. Apply (3.8)
            2025-12-20  [Irrigation]. Apply (3.8)
            2025-12-27  [Irrigation]. Apply (7.6)
            2025-12-27  [Irrigation]. Apply (7.6)
            2026-01-03  [Irrigation]. Apply (2.6)
            2026-01-03  [Irrigation]. Apply (2.6)
            2026-01-10  [Irrigation]. Apply (8.4)
            2026-01-10  [Irrigation]. Apply (8.4)
            2026-01-17  [Irrigation]. Apply (0.1)
            2026-01-17  [Irrigation]. Apply (0.1)
            2026-02-07  [Irrigation]. Apply (2.5)
            2026-02-07  [Irrigation]. Apply (2.5)
            2026-02-14  [Irrigation]. Apply (0.7)
            2026-02-14  [Irrigation]. Apply (0.7)
            2026-02-28  [Irrigation]. Apply (1.6)
            2026-02-28  [Irrigation]. Apply (1.6)
            2026-03-07  [Irrigation]. Apply (3.4)
            2026-03-07  [Irrigation]. Apply (3.4)
            2026-03-14  [Irrigation]. Apply (1.7)
            2026-03-14  [Irrigation]. Apply (1.7)
          StrumTreeInstance KiwiFruit: same as NZ Kiwifruit Expts.Orchard_LIN.LIN_Gold.Row.KiwiFruit
          Operations Operations1 (disabled)
            2024-11-10  [Irrigation]. Apply (5)
            2024-11-21  [Irrigation]. Apply (4.6)
            2024-11-27  [Irrigation]. Apply (4.5)
            2024-11-29  [Irrigation]. Apply (3.1)
            2024-12-02  [Irrigation]. Apply (1.4)
            2024-12-03  [Irrigation]. Apply (1.2)
            2024-12-04  [Irrigation]. Apply (1.8)
            2024-12-05  [Irrigation]. Apply (4.6)
            2024-12-06  [Irrigation]. Apply (1.5)
            2024-12-08  [Irrigation]. Apply (3.1)
            2024-12-09  [Irrigation]. Apply (4.7)
            2024-12-13  [Irrigation]. Apply (4.5)
            2024-12-15  [Irrigation]. Apply (4.6)
            2024-12-20  [Irrigation]. Apply (4.6)
            2024-12-21  [Irrigation]. Apply (0)
            2024-12-22  [Irrigation]. Apply (3.1)
            2024-12-23  [Irrigation]. Apply (0)
            2024-12-24  [Irrigation]. Apply (1.5)
            2024-12-25  [Irrigation]. Apply (6.2)
            2024-12-26  [Irrigation]. Apply (0)
            2024-12-27  [Irrigation]. Apply (3.1)
            2024-12-28  [Irrigation]. Apply (1)
            2024-12-29  [Irrigation]. Apply (2.2)
            2024-12-30  [Irrigation]. Apply (2.9)
            2024-12-31  [Irrigation]. Apply (5)
            2025-01-01  [Irrigation]. Apply (4.2)
            2025-01-03  [Irrigation]. Apply (1.5)
            2025-01-04  [Irrigation]. Apply (1.5)
            2025-01-06  [Irrigation]. Apply (3.1)
            2025-01-08  [Irrigation]. Apply (4.6)
            2025-01-10  [Irrigation]. Apply (4)
            2025-01-11  [Irrigation]. Apply (3.3)
            2025-01-13  [Irrigation]. Apply (3.1)
            2025-01-14  [Irrigation]. Apply (3.1)
            2025-01-15  [Irrigation]. Apply (3.1)
            2025-01-18  [Irrigation]. Apply (4.6)
            2025-01-23  [Irrigation]. Apply (4.6)
            2025-01-25  [Irrigation]. Apply (3.1)
            2025-01-29  [Irrigation]. Apply (3.1)
            2025-02-01  [Irrigation]. Apply (3.1)
            2025-02-03  [Irrigation]. Apply (4.6)
            2025-02-05  [Irrigation]. Apply (3.1)
            2025-02-07  [Irrigation]. Apply (3.1)
            2025-02-08  [Irrigation]. Apply (3.1)
            2025-02-09  [Irrigation]. Apply (3.1)
            2025-02-11  [Irrigation]. Apply (4.9)
            2025-02-17  [Irrigation]. Apply (3.3)
            2025-02-18  [Irrigation]. Apply (3.3)
            2025-02-20  [Irrigation]. Apply (3.8)
            2025-03-14  [Irrigation]. Apply (0.4)
            2025-03-15  [Irrigation]. Apply (5.2)
            2025-03-29  [Irrigation]. Apply (0)
            2025-03-31  [Irrigation]. Apply (4.6)
        Manager ResetDate: same as NZ Kiwifruit Expts.Orchard_LIN.LIN_Gold.ResetDate
    Experiment Orchard_Pukehina
      Factors
        Factor _
          CompositeFactor Gold
            Specifications:
              [RadiationWindFactor].Script.RadiationFactor = 0.8
              [RadiationWindFactor].Script.WindFactor = 0.5
              //
              [Soil]
              //[Row].KiwiFruit.MaxRD = 1.0
            Soil: same as NZ Kiwifruit Expts.Orchard_OCR.Factors._.Green.Soil
          CompositeFactor SMAP
            Specifications:
              [RadiationWindFactor].Script.RadiationFactor = 0.8
              [RadiationWindFactor].Script.WindFactor = 0.5
              //
              [Soil]
            Soil Turangi_8a1: same as NZ Kiwifruit Expts.Orchard_OCR.Factors._.SMAP.Turangi_8a1
          CompositeFactor FSL
            Specifications:
              [RadiationWindFactor].Script.RadiationFactor = 0.8
              [RadiationWindFactor].Script.WindFactor = 0.5
              //
              [Soil]
            Soil: same as NZ Kiwifruit Expts.Orchard_OCR.Factors._.FSL.Soil
      Simulation PUK_Gold
        Memo ReadMe
          * 	This is a Gold3 orchard
          * 	Irrigated
          * 	Steve to provide update (to July 2024)
          * 	Weather station (Paengaroa) next door - Steve to provide weather data
          *	Located in Paengaroa

          ++++++++++++++++++++++++++++++++++++++++++++

          *	Using Hi (as opposed to Lo) measured data for this orchard
        Clock: Start=2023-07-01; End=2026-04-07
        Summary SummaryFile
        Weather: FileName=Weather_SG/PaengaroaMetWatch.met
        MicroClimate: a_interception=0; b_interception=1; c_interception=0; d_interception=0; SoilHeatFluxFraction=0.4; MinimumHeightDiffForNewLayer=0; NightInterceptionFraction=0.5; ReferenceHeight=2
        SoilArbitrator Soil Arbitrator
        Manager AutomaticFertiliser: same as NZ Kiwifruit Expts.Orchard_LIN.LIN_Gold.AutomaticFertiliser
        Manager RadiationWindFactor: same as NZ Kiwifruit Expts.Orchard_LIN.LIN_Gold.RadiationWindFactor
        RectangularZone Row: Length=100; Width=1.3; CanopyType=TreeRow; Slope=0; AspectAngle=0; Altitude=50
          Report RowZoneReport: EventNames=[Clock].DoReport
          Report KiwiReport: EventNames=[Clock].DoReport
            VariableNames:
              [Clock].Today
              [ResetDate].Script.SimulationYear as SimYear
              [Row].STRUM.AccumulatedWaterStress
              //[Row].STRUM.Arbitrator.DemandRatio
              [Row].Area
              [Row].STRUM.BaseHeight
              [Row].STRUM.Fruit.FreshYield_kgPerHa
              [Row].STRUM.CanopyArea
              [Row].STRUM.RootUptakesArbitrator.WaterDemand.Amount
              [Row].STRUM.RootUptakesArbitrator.WaterDemand.mm
              [Row].STRUM.RootUptakesArbitrator.NitrogenDemand.Amount
              [Row].STRUM.Root.Network.WtByLayerZone1
              [Row].STRUM.Root.Network.WtByLayerZone2
              [Row].STRUM.Arbitrator.Carbon.TotalPlantDemand
              [Row].STRUM.Arbitrator.Carbon.TotalPlantSupply
              [Row].STRUM.Arbitrator.Carbon.TotalPlantDemandsAllocated
              [Row].STRUM.Arbitrator.Fn
              [Row].STRUM.Arbitrator.Nitrogen.TotalPlantDemand
              [Row].STRUM.Arbitrator.Nitrogen.TotalPlantSupply
              [Row].STRUM.Arbitrator.Nitrogen.TotalPlantDemandsAllocated
              [Row].STRUM.Fruit.TotalCarbonDemand.RelativeFruitMass.Delta.Integral
              [Row].STRUM.Fruit.Allocated.Carbon.Total
              [Row].STRUM.Fruit.Allocated.Nitrogen.Total
              [Row].STRUM.Fruit.Carbon.Demands.Structural
              [Row].STRUM.Fruit.Carbon.Demands.Total
              [Row].STRUM.Fruit.DMC
              [Row].STRUM.Fruit.FreshWtPerFruit
              [Row].STRUM.Fruit.NextYearsFruitingBudSurvival
              [Row].STRUM.Fruit.Number.BudsSurvivalFromLastYear
              [Row].STRUM.Fruit.N
              [Row].STRUM.Fruit.Nitrogen.Demands.Total
              [Row].STRUM.Fruit.Number
              [Row].STRUM.Fruit.Diameter
              [Row].STRUM.Fruit.VolumePerFruit
              [Row].STRUM.Fruit.Wt
              [Row].STRUM.Fruit.PotentialDWPerFruit
              [Row].STRUM.Fruit.TotalCarbonDemand.RelativeFruitMass
              [Row].STRUM.Fruit.TotalCarbonDemand.CarbonConc
              [Row].STRUM.Height
              [Row].STRUM.Height.PrunedCanopyBaseHeight
              [Row].STRUM.Height.PrunedCanopyBaseHeight  + [Row].STRUM.Height.PrunedCanopyDepth
              [Row].STRUM.Height.PrunedCanopyBaseHeight  + [Row].STRUM.Height.PrunedCanopyDepth + [Row].STRUM.Height.SeasonalDepthGrowth
              [Row].STRUM.Leaf.Allocated.Carbon.Total
              [Row].STRUM.Leaf.Allocated.Nitrogen.Total
              [Row].STRUM.Leaf.Canopy.CoverGreen
              [Row].STRUM.Leaf.Canopy.Deepness
              [Row].STRUM.Leaf.Dead.Wt
              [Row].STRUM.Leaf.Carbon.Demands.Structural
              [Row].STRUM.Leaf.Carbon.Demands.Total
              [Row].STRUM.Leaf.Fn
              [Row].STRUM.Leaf.Canopy.Fw
              [Row].STRUM.Leaf.Canopy.LAI
              [Row].STRUM.Leaf.Live.Wt
              [Row].STRUM.Leaf.N
              [Row].STRUM.Leaf.Nitrogen.Demands.Total
              [Row].STRUM.Leaf.Canopy.PotentialEP
              [Row].STRUM.Leaf.Canopy.RadiationIntercepted
              [Row].STRUM.Leaf.Senesced.Weight.Structural
              [Row].STRUM.Leaf.SenescenceRate
              [Row].STRUM.Leaf.Canopy.Transpiration
              [Row].STRUM.Leaf.Canopy.WaterDemand
              [Row].STRUM.Leaf.Canopy.WaterAllocation
              [Row].STRUM.Leaf.Canopy.Width
              [Row].STRUM.Leaf.Canopy.GreenExtinctionCoefficient
              [Row].STRUM.Leaf.Wt
              [Row].STRUM.Phenology.Age.YearDecimal
              [Row].STRUM.Phenology.Age.Years
              [Row].STRUM.Phenology.CurrentStageName
              [Row].STRUM.Phenology.DaysSinceFlowering
              [Row].STRUM.Phenology.Stage
              [Row].STRUM.RelativeSeasonalDimension
              [Row].STRUM.RelativeAnnualDimension
              [Row].STRUM.Root.Allocated.Carbon.Total
              [Row].STRUM.Root.Allocated.Nitrogen.Total
              [Row].STRUM.Root.Network.Depth
              [Row].STRUM.Root.Carbon.Demands.Structural
              [Row].STRUM.Root.Carbon.Demands.Total
              [Row].STRUM.Root.N
              [Row].STRUM.Root.Nitrogen.Demands.Total
              [Row].STRUM.RootUptakesArbitrator.WaterUptake.AmountByZone
              [Row].STRUM.RootUptakesArbitrator.WaterUptake.Mm
              [Row].STRUM.RootUptakesArbitrator.WaterUptake.Amount
              [Row].STRUM.RootUptakesArbitrator.NitrogenUptake.AmountByZone
              [Row].STRUM.RootUptakesArbitrator.NitrogenUptake.Gpm2
              [Row].STRUM.RootUptakesArbitrator.NitrogenUptake.Amount
              [Row].STRUM.RootUptakesArbitrator.WaterSupply.AmountByZone
              [Row].STRUM.RootUptakesArbitrator.WaterSupply.Mm
              [Row].STRUM.RootUptakesArbitrator.WaterSupply.Amount
              [Row].STRUM.RootUptakesArbitrator.NitrogenSupply.AmountByZone
              [Row].STRUM.RootUptakesArbitrator.NitrogenSupply.Gpm2
              [Row].STRUM.RootUptakesArbitrator.NitrogenSupply.Amount
              [Row].STRUM.Root.Wt
              [Row].STRUM.TranspirationPerTree
              [Row].STRUM.Wood.Allocated.Carbon.Total
              [Row].STRUM.Wood.Allocated.Nitrogen.Total
              [Row].STRUM.Wood.Carbon.Demands.Structural
              [Row].STRUM.Wood.Carbon.Demands.Total
              [Row].STRUM.Wood.Carbon.Supplies.ReTranslocation
              [Row].STRUM.Wood.Live.Carbon.Structural * 1/0.4
              [Row].STRUM.Wood.Live.Carbon.Storage * 1/0.4
              [Row].STRUM.Wood.EnergyBalance.CoverTotal
              [Row].STRUM.Wood.EnergyBalance.DeadAreaIndex
              [Row].STRUM.Wood.EnergyBalance.LAIDead
              [Row].STRUM.Wood.EnergyBalance.RadiationInterceptedByDead
              [Row].STRUM.Wood.EnergyBalance.Transpiration
              [Row].STRUM.Wood.N
              [Row].STRUM.Wood.Nitrogen.Demands.Total
              [Row].STRUM.Wood.Wt
              [Row].STRUM.Width
              [Row].STRUM.Width.PrunedWidth
              [Row].STRUM.Width.PrunedWidth + [Row].STRUM.Width.SeasonalGrowth
              [Row].STRUM.TranspirationPerLeafArea
              [Row].SurfaceOrganicMatter.N
              [Row].SurfaceOrganicMatter.Wt
              [Row].Irrigation.IrrigationApplied
              [Row].Fertiliser.NitrogenApplied
              sum([Row].Soil.OutputLayers.SWmm)
              [Row].Soil.OutputLayers.SWmm
              ([Row].Soil.OutputLayers.SWmm[1] + [Row].Soil.OutputLayers.SWmm[2]+ [Row].Soil.OutputLayers.SWmm[3]) as SWmm0_120
              ([Row].Soil.OutputLayers.SWmm[1] + [Row].Soil.OutputLayers.SWmm[2]+ [Row].Soil.OutputLayers.SWmm[3] + [Row].Soil.OutputLayers.SWmm[4]) as SWmm0_160
              [Row].Soil.OutputLayers.SW
              [Row].Soil.OutputLayers.SAT
              [Row].Soil.OutputLayers.DUL
              [Row].Soil.OutputLayers.LL15
              [Row].Soil.SoilWater.Evaporation
              [Row].Soil.SoilWater.Eo
              [Row].Soil.SoilWater.Runoff
              [Row].Soil.SoilWater.Drainage
              [Weather].PanEvap
              [Weather].Radn
              [Weather].Rain
              [STRUM].Leaf.TotalCarbonDemand.TotalDMDemand.SizeDemand.SizeDemand.SizeDemand.TargetSize
          Report Drainage: EventNames=[Clock].DoReport
            VariableNames:
              [Clock].Today
              sum of [Soil].SoilWater.Flux[5] from 2017-08-24 to 2024-03-15 as drainage
          SurfaceOrganicMatter: InitialResidueName=wheat_stubble; InitialResidueType=wheat; InitialResidueMass=500; InitialStandingFraction=0; InitialCPR=0; InitialCNR=100
          Fertiliser
          Manager AgrgateZoneVariables
            script: same as in NZ Kiwifruit Expts.Orchard_LIN.LIN_Gold.Row.AgrgateZoneVariables
          Irrigation
          Operations
            2012-12-29  [Irrigation]. Apply (15)
            2013-01-19  [Irrigation]. Apply (15)
            2013-01-19  [Irrigation]. Apply (30)
            2013-01-26  [Irrigation]. Apply (30)
            2013-01-26  [Irrigation]. Apply (30)
            2013-02-02  [Irrigation]. Apply (30)
            2013-02-02  [Irrigation]. Apply (15)
            2013-02-09  [Irrigation]. Apply (15)
            2013-02-23  [Irrigation]. Apply (30)
            2013-02-23  [Irrigation]. Apply (15)
            2013-03-02  [Irrigation]. Apply (15)
            2013-03-02  [Irrigation]. Apply (30)
            2013-03-09  [Irrigation]. Apply (30)
            2013-03-09  [Irrigation]. Apply (15)
            2013-03-16  [Irrigation]. Apply (30)
            2013-03-16  [Irrigation]. Apply (15)
            2013-03-30  [Irrigation]. Apply (15)
            2013-04-13  [Irrigation]. Apply (15)
            2013-04-13  [Irrigation]. Apply (30)
            2015-01-31  [Irrigation]. Apply (15)
            2015-02-21  [Irrigation]. Apply (15)
            2015-12-26  [Irrigation]. Apply (30)
            2016-01-02  [Irrigation]. Apply (15)
            2016-01-02  [Irrigation]. Apply (15)
            2017-02-04  [Irrigation]. Apply (15)
            2017-02-18  [Irrigation]. Apply (15)
            2017-03-11  [Irrigation]. Apply (15)
            2020-02-15  [Irrigation]. Apply (15)
            2020-02-22  [Irrigation]. Apply (15)
            2020-02-29  [Irrigation]. Apply (15)
            2020-02-29  [Irrigation]. Apply (30)
            2020-03-07  [Irrigation]. Apply (30)
            2020-03-14  [Irrigation]. Apply (30)
            2020-03-21  [Irrigation]. Apply (15)
            2020-03-28  [Irrigation]. Apply (30)
            2021-11-20  [Irrigation]. Apply (15)
            2021-11-20  [Irrigation]. Apply (15)
            2021-11-27  [Irrigation]. Apply (15)
            2021-11-27  [Irrigation]. Apply (15)
            2021-12-04  [Irrigation]. Apply (15)
            2021-12-04  [Irrigation]. Apply (15)
            2021-12-11  [Irrigation]. Apply (15)
            2021-12-11  [Irrigation]. Apply (15)
            2021-12-25  [Irrigation]. Apply (15)
            2021-12-25  [Irrigation]. Apply (15)
            2022-01-08  [Irrigation]. Apply (15)
            2022-01-08  [Irrigation]. Apply (15)
            2022-01-15  [Irrigation]. Apply (15)
            2022-01-15  [Irrigation]. Apply (15)
            2022-01-22  [Irrigation]. Apply (15)
            2022-01-22  [Irrigation]. Apply (15)
            2022-02-12  [Irrigation]. Apply (15)
            2022-02-12  [Irrigation]. Apply (15)
            2022-12-31  [Irrigation]. Apply (30)
            2022-12-31  [Irrigation]. Apply (15)
            2023-12-16  [Irrigation]. Apply (15)
            2023-12-16  [Irrigation]. Apply (15)
            2023-12-23  [Irrigation]. Apply (15)
            2023-12-23  [Irrigation]. Apply (30)
            2024-02-03  [Irrigation]. Apply (15)
            2024-02-03  [Irrigation]. Apply (30)
            2024-02-17  [Irrigation]. Apply (30)
            2024-02-17  [Irrigation]. Apply (30)
            2024-11-09  [Irrigation]. Apply (30)
            2024-11-09  [Irrigation]. Apply (30)
            2024-11-16  [Irrigation]. Apply (15)
            2024-11-16  [Irrigation]. Apply (15)
            2024-11-23  [Irrigation]. Apply (30)
            2024-11-23  [Irrigation]. Apply (15)
            2024-11-30  [Irrigation]. Apply (15)
            2024-11-30  [Irrigation]. Apply (15)
            2024-12-07  [Irrigation]. Apply (30)
            2024-12-07  [Irrigation]. Apply (15)
            2024-12-14  [Irrigation]. Apply (15)
            2024-12-14  [Irrigation]. Apply (15)
            2025-01-04  [Irrigation]. Apply (30)
            2025-01-04  [Irrigation]. Apply (30)
            2025-01-11  [Irrigation]. Apply (15)
            2025-01-11  [Irrigation]. Apply (15)
            2025-12-06  [Irrigation]. Apply (15)
            2025-12-06  [Irrigation]. Apply (15)
            2025-12-13  [Irrigation]. Apply (15)
            2025-12-13  [Irrigation]. Apply (15)
            2025-12-20  [Irrigation]. Apply (15)
            2025-12-20  [Irrigation]. Apply (15)
            2025-12-27  [Irrigation]. Apply (15)
            2025-12-27  [Irrigation]. Apply (15)
            2026-01-03  [Irrigation]. Apply (5.6)
            2026-01-03  [Irrigation]. Apply (5.6)
            2026-01-10  [Irrigation]. Apply (8.5)
            2026-01-10  [Irrigation]. Apply (8.5)
          Plant STRUM
          Soil: same as NZ Kiwifruit Expts.Orchard_LIN.LIN_Gold.Row.Soil
          StrumTreeInstance KiwiFruit: TreeType=Deciduous; RowSpacing=3.8; InterRowSpacing=2.8; AlleyZoneWidthFrac=0.1; BudBreakDate=19-Sep; StartFullCanopyDate=15-Dec; StartLeafFallDate=18-May; EndLeafFallDate=21-Jun; DBHatMaturity=5; TypicalCanopyArea=22; WoodBulkDensity=450; WoodStorageFraction=0.2; MaximumLeafBiomass=150; MaximumRootBiomass=200; AgeAtSimulationStart=6; YearsToMaxDimension=6; CrownShape=1; MatureCanopyBaseHeight=1.8; MaturePrunedCanopyBaseHeight=1.8; MatureHeight=2.4; MaturePrunedHeight=2.4; MatureWidth=3.4; MaturePrunedWidth=3.4; SummerPruneDates=[15-Jul]; FRemoveSummerPrune=0.25; RootNConc=0.01; LeafNConc=0.02; WoodNConc=0.005; FruitNConc=0.02; NFixationFrac=0; GRINZ=true; MaxRD=1; ExtinctCoeff=0.8; BaseCover=0; MaxCover=0.95; RUE=2; PSBaseT=10; PSLOptT=20; PSUOptT=25; PSMaxT=35; GSMax=0.011; R50=125; SurfaceKL=0.1; WaterStress=true; Number=50; PotentialFWPerFruit=140; DMC=0.17; FruitDensity=1.02; DateMaxBloom=7-Nov; DAFStartLinearGrowth=90; DAFEndLinearGrowth=180; DAFMaxSize=200
          Operations Operations1 (disabled)
            2024-11-07  [Irrigation]. Apply (15.74)
            2024-11-12  [Irrigation]. Apply (6.99)
            2024-11-13  [Irrigation]. Apply (0.13)
            2024-11-15  [Irrigation]. Apply (3.35)
            2024-11-20  [Irrigation]. Apply (7.52)
            2024-11-22  [Irrigation]. Apply (1.14)
            2024-11-23  [Irrigation]. Apply (7.13)
            2024-11-24  [Irrigation]. Apply (7.19)
            2024-11-26  [Irrigation]. Apply (7.66)
            2024-11-28  [Irrigation]. Apply (8.32)
            2024-11-30  [Irrigation]. Apply (19.14)
            2024-12-05  [Irrigation]. Apply (6.17)
            2024-12-07  [Irrigation]. Apply (9.18)
            2024-12-16  [Irrigation]. Apply (2.51)
            2025-01-02  [Irrigation]. Apply (7.01)
            2025-01-06  [Irrigation]. Apply (2.93)
            2025-01-10  [Irrigation]. Apply (1.22)
            2025-01-11  [Irrigation]. Apply (15.51)
        Manager ResetDate: same as NZ Kiwifruit Expts.Orchard_LIN.LIN_Gold.ResetDate
      Memo Reason why drainage looks bad
        The flux meters were flooded by a rising water table so the drainage observations are not representative of actual drainage
    Experiment Orchard_Omahu_AshburtonSoil (disabled)
      Factors
        Factor _
          CompositeFactor Gold
            Specifications:
              [RadiationWindFactor].Script.RadiationFactor = 0.75
              [RadiationWindFactor].Script.WindFactor = 0.5
      Simulation Omahu_Gold
        Memo ReadMe
          *	Located Hawke's Bay
          * 	Sheltered and netted
          *	Irrigated (SG to provide info)

          Measurements were
          *	Sap-flow
          *	Fruit growth
          *	Soil moisture (150–160; 30/20 cm interval); TDR
          *	Light interception.
        Clock: Start=2017-07-01; End=2025-12-01
        Summary SummaryFile
        Weather: FileName=Weather_SG/TrinityHill.met
        MicroClimate: a_interception=0; b_interception=1; c_interception=0; d_interception=0; SoilHeatFluxFraction=0.4; MinimumHeightDiffForNewLayer=0; NightInterceptionFraction=0.5; ReferenceHeight=2
        SoilArbitrator Soil Arbitrator
        Manager AutoIrrigationDeficitBased: same as NZ Kiwifruit Expts.Orchard_Katikati.Katikati.AutoIrrigationDeficitBased
        Manager AutomaticFertiliser
          Fertilise = True
          Season_Start = 1-Aug
          Season_End = 30-Apr
          Season_Allocation = 100000
          TriggerN = 50
          NApplicationAmount = 25
          Return_days = 3
          Top_Depth = 600
          script: same as in Replacements.AutomaticFertiliser
        Manager RadiationWindFactor
          script: same as in NZ Kiwifruit Expts.Orchard_OPK.Orchard_OPK.RadiationWindFactor
        RectangularZone Row: Length=100; Width=1; CanopyType=TreeRow; Slope=0; AspectAngle=0; Altitude=50
          Report RowZoneReport: EventNames=[Clock].DoReport
          Report KiwiReport: EventNames=[Clock].DoReport
            VariableNames:
              [Clock].Today
              [Row].STRUM.AccumulatedWaterStress
              //[Row].STRUM.Arbitrator.DemandRatio
              [Row].Area
              [Row].STRUM.BaseHeight
              [Row].STRUM.Fruit.FreshYield_kgPerHa
              [Row].STRUM.CanopyArea
              [Row].STRUM.RootUptakesArbitrator.WaterDemand.Amount
              [Row].STRUM.RootUptakesArbitrator.WaterDemand.mm
              [Row].STRUM.RootUptakesArbitrator.NitrogenDemand.Amount
              [Row].STRUM.Root.Network.WtByLayerZone1
              [Row].STRUM.Root.Network.WtByLayerZone2
              [Row].STRUM.Arbitrator.Carbon.TotalPlantDemand
              [Row].STRUM.Arbitrator.Carbon.TotalPlantSupply
              [Row].STRUM.Arbitrator.Carbon.TotalPlantDemandsAllocated
              [Row].STRUM.Arbitrator.Fn
              [Row].STRUM.Arbitrator.Nitrogen.TotalPlantDemand
              [Row].STRUM.Arbitrator.Nitrogen.TotalPlantSupply
              [Row].STRUM.Arbitrator.Nitrogen.TotalPlantDemandsAllocated
              [Row].STRUM.Fruit.TotalCarbonDemand.RelativeFruitMass.Delta.Integral
              [Row].STRUM.Fruit.Allocated.Carbon.Total
              [Row].STRUM.Fruit.Allocated.Nitrogen.Total
              [Row].STRUM.Fruit.Carbon.Demands.Structural
              [Row].STRUM.Fruit.Carbon.Demands.Total
              [Row].STRUM.Fruit.DMC
              [Row].STRUM.Fruit.FreshWtPerFruit
              [Row].STRUM.Fruit.NextYearsFruitingBudSurvival
              [Row].STRUM.Fruit.Number.BudsSurvivalFromLastYear
              [Row].STRUM.Fruit.N
              [Row].STRUM.Fruit.Nitrogen.Demands.Total
              [Row].STRUM.Fruit.Number
              [Row].STRUM.Fruit.Diameter
              [Row].STRUM.Fruit.VolumePerFruit
              [Row].STRUM.Fruit.Wt
              [Row].STRUM.Fruit.PotentialDWPerFruit
              [Row].STRUM.Fruit.TotalCarbonDemand.RelativeFruitMass
              [Row].STRUM.Fruit.TotalCarbonDemand.CarbonConc
              [Row].STRUM.Height
              [Row].STRUM.Height.PrunedCanopyBaseHeight
              [Row].STRUM.Height.PrunedCanopyBaseHeight  + [Row].STRUM.Height.PrunedCanopyDepth
              [Row].STRUM.Height.PrunedCanopyBaseHeight  + [Row].STRUM.Height.PrunedCanopyDepth + [Row].STRUM.Height.SeasonalDepthGrowth
              [Row].STRUM.Leaf.Allocated.Carbon.Total
              [Row].STRUM.Leaf.Allocated.Nitrogen.Total
              [Row].STRUM.Leaf.Canopy.CoverGreen
              [Row].STRUM.Leaf.Canopy.Deepness
              [Row].STRUM.Leaf.Dead.Wt
              [Row].STRUM.Leaf.Carbon.Demands.Structural
              [Row].STRUM.Leaf.Carbon.Demands.Total
              [Row].STRUM.Leaf.Fn
              [Row].STRUM.Leaf.Canopy.Fw
              [Row].STRUM.Leaf.Canopy.LAI
              [Row].STRUM.Leaf.Live.Wt
              [Row].STRUM.Leaf.N
              [Row].STRUM.Leaf.Nitrogen.Demands.Total
              [Row].STRUM.Leaf.Canopy.PotentialEP
              [Row].STRUM.Leaf.Canopy.RadiationIntercepted
              [Row].STRUM.Leaf.Senesced.Weight.Structural
              [Row].STRUM.Leaf.SenescenceRate
              [Row].STRUM.Leaf.Canopy.Transpiration
              [Row].STRUM.Leaf.Canopy.WaterDemand
              [Row].STRUM.Leaf.Canopy.WaterAllocation
              [Row].STRUM.Leaf.Canopy.Width
              [Row].STRUM.Leaf.Canopy.GreenExtinctionCoefficient
              [Row].STRUM.Leaf.Wt
              [Row].STRUM.Phenology.Age.YearDecimal
              [Row].STRUM.Phenology.Age.Years
              [Row].STRUM.Phenology.CurrentStageName
              [Row].STRUM.Phenology.DaysSinceFlowering
              [Row].STRUM.Phenology.Stage
              [Row].STRUM.RelativeSeasonalDimension
              [Row].STRUM.RelativeAnnualDimension
              [Row].STRUM.Root.Allocated.Carbon.Total
              [Row].STRUM.Root.Allocated.Nitrogen.Total
              [Row].STRUM.Root.Network.Depth
              [Row].STRUM.Root.Carbon.Demands.Structural
              [Row].STRUM.Root.Carbon.Demands.Total
              [Row].STRUM.Root.N
              [Row].STRUM.Root.Nitrogen.Demands.Total
              [Row].STRUM.RootUptakesArbitrator.WaterUptake.AmountByZone
              [Row].STRUM.RootUptakesArbitrator.WaterUptake.Mm
              [Row].STRUM.RootUptakesArbitrator.WaterUptake.Amount
              [Row].STRUM.RootUptakesArbitrator.NitrogenUptake.AmountByZone
              [Row].STRUM.RootUptakesArbitrator.NitrogenUptake.Gpm2
              [Row].STRUM.RootUptakesArbitrator.NitrogenUptake.Amount
              [Row].STRUM.RootUptakesArbitrator.WaterSupply.AmountByZone
              [Row].STRUM.RootUptakesArbitrator.WaterSupply.Mm
              [Row].STRUM.RootUptakesArbitrator.WaterSupply.Amount
              [Row].STRUM.RootUptakesArbitrator.NitrogenSupply.AmountByZone
              [Row].STRUM.RootUptakesArbitrator.NitrogenSupply.Gpm2
              [Row].STRUM.RootUptakesArbitrator.NitrogenSupply.Amount
              [Row].STRUM.Root.Wt
              [Row].STRUM.TranspirationPerTree
              [Row].STRUM.Wood.Allocated.Carbon.Total
              [Row].STRUM.Wood.Allocated.Nitrogen.Total
              [Row].STRUM.Wood.Carbon.Demands.Structural
              [Row].STRUM.Wood.Carbon.Demands.Total
              [Row].STRUM.Wood.Carbon.Supplies.ReTranslocation
              [Row].STRUM.Wood.Live.Carbon.Structural * 1/0.4
              [Row].STRUM.Wood.Live.Carbon.Storage * 1/0.4
              [Row].STRUM.Wood.EnergyBalance.CoverTotal
              [Row].STRUM.Wood.EnergyBalance.DeadAreaIndex
              [Row].STRUM.Wood.EnergyBalance.LAIDead
              [Row].STRUM.Wood.EnergyBalance.RadiationInterceptedByDead
              [Row].STRUM.Wood.EnergyBalance.Transpiration
              [Row].STRUM.Wood.N
              [Row].STRUM.Wood.Nitrogen.Demands.Total
              [Row].STRUM.Wood.Wt
              [Row].STRUM.Width
              [Row].STRUM.Width.PrunedWidth
              [Row].STRUM.Width.PrunedWidth + [Row].STRUM.Width.SeasonalGrowth
              [Row].STRUM.TranspirationPerLeafArea
              [Row].SurfaceOrganicMatter.N
              [Row].SurfaceOrganicMatter.Wt
              [Row].Irrigation.IrrigationApplied
              [Row].Fertiliser.NitrogenApplied
              sum([Row].Soil.OutputLayers.SWmm)
              [Row].Soil.OutputLayers.SWmm
              ([Row].Soil.OutputLayers.SWmm[1] + [Row].Soil.OutputLayers.SWmm[2]+ [Row].Soil.OutputLayers.SWmm[3]) as SWmm0_120
              ([Row].Soil.OutputLayers.SWmm[1] + [Row].Soil.OutputLayers.SWmm[2]+ [Row].Soil.OutputLayers.SWmm[3] + [Row].Soil.OutputLayers.SWmm[4]) as SWmm0_160
              [Row].Soil.OutputLayers.SW
              [Row].Soil.OutputLayers.SAT
              [Row].Soil.OutputLayers.DUL
              [Row].Soil.OutputLayers.LL15
              [Row].Soil.SoilWater.Evaporation
              [Row].Soil.SoilWater.Eo
              [Weather].PanEvap
              [Weather].Radn
              [Weather].Rain
              [STRUM].Leaf.TotalCarbonDemand.TotalDMDemand.SizeDemand.SizeDemand.SizeDemand.TargetSize
          SurfaceOrganicMatter: InitialResidueName=wheat_stubble; InitialResidueType=wheat; InitialResidueMass=500; InitialStandingFraction=0; InitialCPR=0; InitialCNR=100
          Fertiliser
          Irrigation
          Manager MulchResidues
            script: same as in NZ Kiwifruit Expts.Orchard_Katikati.Katikati.Row.MulchResidues
          Plant STRUM
          StrumTreeInstance KiwiFruit: TreeType=Deciduous; RowSpacing=3.6; InterRowSpacing=3; AlleyZoneWidthFrac=0.1; BudBreakDate=19-Sep; StartFullCanopyDate=15-Dec; StartLeafFallDate=18-May; EndLeafFallDate=21-Jun; DBHatMaturity=5; TypicalCanopyArea=22; WoodBulkDensity=450; WoodStorageFraction=0.2; MaximumLeafBiomass=150; MaximumRootBiomass=200; AgeAtSimulationStart=6; YearsToMaxDimension=6; CrownShape=2; MatureCanopyBaseHeight=1.8; MaturePrunedCanopyBaseHeight=1.8; MatureHeight=2.4; MaturePrunedHeight=2.4; MatureWidth=3.4; MaturePrunedWidth=3.4; SummerPruneDates=[15-Jul]; FRemoveSummerPrune=0.25; RootNConc=0.01; LeafNConc=0.02; WoodNConc=0.005; FruitNConc=0.02; NFixationFrac=0; GRINZ=true; MaxRD=2; ExtinctCoeff=0.8; BaseCover=0.15; MaxCover=0.85; RUE=3; PSBaseT=10; PSLOptT=20; PSUOptT=25; PSMaxT=35; GSMax=0.015; R50=125; SurfaceKL=0.1; WaterStress=true; Number=60; PotentialFWPerFruit=140; DMC=0.17; FruitDensity=1.02; DateMaxBloom=7-Nov; DAFStartLinearGrowth=90; DAFEndLinearGrowth=200; DAFMaxSize=240
          Soil Ashburton_37a1: ASCOrder=W; SoilType=Fluvial Raw Soils; LocalName=Ashburton_37a1; Country=New Zealand; Latitude=-41; Longitude=174
            DataSource=Profile descriptions provided by Smap based on the work done by Trevor Webb.
            Physical
              Thickness  ParticleSizeSand  ParticleSizeSilt  ParticleSizeClay  Rocks  BD     AirDry  LL15   DUL    SAT    KS
              110        72.5              22.5              5                 12.5   1.085  0.02    0.04   0.184  0.433  14400
              236        72.5              22.5              5                 60     0.519  0.016   0.017  0.076  0.19   9600
              236        72.5              22.5              5                 60     0.519  0.016   0.017  0.076  0.19   9600
              236        72.5              22.5              5                 60     0.519  0.016   0.017  0.076  0.19   9600
              236        72.5              22.5              5                 60     0.519  0.016   0.017  0.076  0.19   9600
              236        72.5              22.5              5                 60     0.519  0.016   0.017  0.076  0.19   9600
              236        72.5              22.5              5                 60     0.519  0.016   0.017  0.076  0.19   9600
              236        72.5              22.5              5                 60     0.519  0.016   0.017  0.076  0.19   9600
              238        72.5              22.5              5                 60     0.519  0.016   0.017  0.076  0.19   9600
              SoilCrop STRUMSoil
                LL=[0.04, 0.017, 0.017, 0.017, 0.017, 0.017, 0.017, 0.017, 0.017]
                KL=[0.143262, 0.0168074, 0.0168074, 0.0168074, 0.0168074, 0.0168074, 0.0168074, 0.0168074, 0.0168074]
                XF=[0.834, 0.696, 0.696, 0.696, 0.696, 0.696, 0.696, 0.696, 0.696]
            Organic: FOMCNRatio=40; CarbonUnits=Total
              Thickness  Carbon    SoilCNRatio  FBiom      FInert    FOM
              50         1         11           0.0788566  0.158981  227.364
              50         1         11           0.0610103  0.21901   220.546
              50         1         11           0.0477893  0.269823  177.533
              50         0.854985  11           0.037995   0.312835  138.263
              50         0.639049  11           0.0307392  0.349244  107.679
              50         0.494304  11           0.025364   0.380064  83.8606
              50         0.397278  11           0.0213819  0.406152  65.3107
              50         0.332239  11           0.0184319  0.539823  50.864
              50         0.288643  11           0.0162465  0.659987  39.6129
              50         0.259419  11           0.0146275  0.752092  30.8506
              250        0.217897  11           0.0118814  0.902619  77.4992
              250        0.202422  11           0.0104198  0.975216  22.2039
              500        0.200121  11           0.0100442  0.990824  8.18413
              500        0.200002  11           0.0100022  0.996255  0
            Chemical: PHUnits=Water
              Thickness  PH  CEC
              110        7   13.4175
              1890       7   3.29976
            Water: Thickness=[110, 1890]; InitialValues=[0.184, 0.076]; FilledFromTop=false
            WaterBalance SoilWater: SummerDate=1-oct; SummerU=9; SummerCona=4.4; WinterDate=1-apr; WinterU=4; WinterCona=2; DiffusConst=88; DiffusSlope=35; Salb=0.13; CN2Bare=77; CNRed=37; CNCov=0.8; PSIDul=-100
              Thickness  SWCON  KLAT
              110        0.5    0
              1890       0.5    0
            SoilTemperature Temperature: InteractionsPerDay=8
            Solute NO3: Thickness=[110, 1890]; InitialValues=[6.96667, 13.0333]; InitialValuesUnits=kg/ha; WaterTableConcentration=0; D0=0; DepthConstant=0; MaxDepthSoluteAccessible=0; RunoffEffectivenessAtMovingSolute=0; MaxEffectiveRunoff=0
            Solute NH4: Thickness=[110, 1890]; InitialValues=[1.045, 1.955]; InitialValuesUnits=kg/ha; WaterTableConcentration=0; D0=0; DepthConstant=0; MaxDepthSoluteAccessible=0; RunoffEffectivenessAtMovingSolute=0; MaxEffectiveRunoff=0
            Solute Urea: Thickness=[110, 1890]; InitialValues=[0, 0]; InitialValuesUnits=ppm; WaterTableConcentration=0; D0=0; DepthConstant=0; MaxDepthSoluteAccessible=0; RunoffEffectivenessAtMovingSolute=0; MaxEffectiveRunoff=0
            Nutrient
            OutputLayers: Thickness=[400, 400, 400, 400, 400]
        Manager ResetDate
          ResetDate = 01-Jul
          script: same as in NZ Kiwifruit Expts.Orchard_LIN.LIN_Gold.ResetDate
      Memo Reason why drainage looks bad
        The flux meters were flooded by a rising water table so the drainage observations are not representative of actual drainage
    Experiment Orchard_Omahu_SelwynSoil (disabled)
      Factors: same as NZ Kiwifruit Expts.Orchard_Omahu_AshburtonSoil.Factors
      Simulation Omahu_Goldx
        Memo ReadMe
          *	Located Hawke's Bay
          * 	Sheltered and netted
          *	Irrigated (SG to provide info)

          Measurements were
          *	Sap-flow
          *	Fruit growth
          *	Soil moisture (150–160; 30/20 cm interval); TDR
          *	Light interception.
        Clock: Start=2017-07-01; End=2025-12-01
        Summary SummaryFile
        Weather: FileName=Weather_SG/TrinityHill.met
        MicroClimate: a_interception=0; b_interception=1; c_interception=0; d_interception=0; SoilHeatFluxFraction=0.4; MinimumHeightDiffForNewLayer=0; NightInterceptionFraction=0.5; ReferenceHeight=2
        SoilArbitrator Soil Arbitrator
        Manager AutoIrrigationDeficitBased: same as NZ Kiwifruit Expts.Orchard_Katikati.Katikati.AutoIrrigationDeficitBased
        Manager AutomaticFertiliser: same as NZ Kiwifruit Expts.Orchard_Omahu_AshburtonSoil.Omahu_Gold.AutomaticFertiliser
        Manager RadiationWindFactor: same as NZ Kiwifruit Expts.Orchard_Omahu_AshburtonSoil.Omahu_Gold.RadiationWindFactor
        RectangularZone Row: Length=100; Width=1; CanopyType=TreeRow; Slope=0; AspectAngle=0; Altitude=50
          Report RowZoneReport: EventNames=[Clock].DoReport
          Report KiwiReport: same as NZ Kiwifruit Expts.Orchard_Omahu_AshburtonSoil.Omahu_Gold.Row.KiwiReport
          SurfaceOrganicMatter: InitialResidueName=wheat_stubble; InitialResidueType=wheat; InitialResidueMass=500; InitialStandingFraction=0; InitialCPR=0; InitialCNR=100
          Fertiliser
          Irrigation
          Manager MulchResidues: same as NZ Kiwifruit Expts.Orchard_Omahu_AshburtonSoil.Omahu_Gold.Row.MulchResidues
          Plant STRUM
          StrumTreeInstance KiwiFruit: same as NZ Kiwifruit Expts.Orchard_Omahu_AshburtonSoil.Omahu_Gold.Row.KiwiFruit
          Soil Selwyn_51a1: ASCOrder=R; SoilType=Typic Fluvial Recent Soils; LocalName=Selwyn_51a1; Country=New Zealand; Latitude=-41; Longitude=174
            DataSource=Profile descriptions provided by Smap based on the work done by Trevor Webb.
            Physical
              Thickness  ParticleSizeSand  ParticleSizeSilt  ParticleSizeClay  Rocks  BD     AirDry  LL15   DUL    SAT    KS
              91         20                65                15                0      1.279  0.064   0.129  0.365  0.481  2400
              91         20                65                15                0      1.279  0.064   0.129  0.365  0.481  2400
              93         20                65                15                0      1.279  0.064   0.129  0.365  0.481  2400
              150        20                65                15                0      1.306  0.115   0.126  0.354  0.472  2400
              150        20                65                15                0      1.282  0.117   0.117  0.354  0.48   960
              150        20                65                15                0      1.282  0.117   0.117  0.354  0.48   960
              212        50                37.5              12.5              60     0.515  0.024   0.024  0.096  0.192  1440
              212        50                37.5              12.5              60     0.515  0.024   0.024  0.096  0.192  1440
              212        50                37.5              12.5              60     0.515  0.024   0.024  0.096  0.192  1440
              212        50                37.5              12.5              60     0.515  0.024   0.024  0.096  0.192  1440
              212        50                37.5              12.5              60     0.515  0.024   0.024  0.096  0.192  1440
              215        50                37.5              12.5              60     0.515  0.024   0.024  0.096  0.192  1440
              SoilCrop STRUMSoil
                LL=[0.129, 0.129, 0.129, 0.126, 0.117, 0.117, 0.024, 0.024, 0.024, 0.024, 0.024, 0.024]
                KL=[0.102898, 0.102898, 0.102898, 0.0652601, 0.0402954, 0.0402954, 0.00745391, 0.00745391, 0.00745391, 0.00745391, 0.00745391, 0.00745391]
                XF=[1, 1, 1, 1, 1, 1, 0.834, 0.834, 0.834, 0.834, 0.834, 0.834]
            Organic: FOMCNRatio=40; CarbonUnits=Total
              Thickness  Carbon    SoilCNRatio  FBiom      FInert    FOM
              50         3.5       10.4         0.0788566  0.30541   227.364
              50         3.5       10.4         0.0610103  0.365438  220.546
              50         3.5       10.4         0.0477893  0.416251  177.533
              50         2.90181   10.4         0.037995   0.477639  138.263
              50         2.01108   10.4         0.0307392  0.549551  107.679
              50         1.414     10.4         0.025364   0.614528  83.8606
              50         1.01377   10.4         0.0213819  0.673618  65.3107
              50         0.745486  10.4         0.0184319  0.727416  50.864
              50         0.56565   10.4         0.0162465  0.776021  39.6129
              50         0.445103  10.4         0.0146275  0.819115  30.8506
              250        0.273824  10.4         0.0118814  0.911701  77.4992
              250        0.209991  10.4         0.0104198  0.976109  22.2039
              500        0.200497  10.4         0.0100442  0.990829  8.18413
              500        0.200009  10.4         0.0100022  0.996255  0
            Chemical: PHUnits=Water
              Thickness  PH  CEC
              275        7   18.935
              150        7   10.8542
              300        7   9.1479
              1275       7   6.30062
            Water: Thickness=[275, 150, 300, 1275]; InitialValues=[0.365, 0.354, 0.354, 0.096]; FilledFromTop=false
            WaterBalance SoilWater: SummerDate=1-oct; SummerU=9; SummerCona=4.4; WinterDate=1-apr; WinterU=4; WinterCona=2; DiffusConst=88; DiffusSlope=35; Salb=0.13; CN2Bare=83; CNRed=29; CNCov=0.8; PSIDul=-100
              Thickness  SWCON  KLAT
              275        0.5    0
              150        0.5    0
              300        0.3    0
              1275       0.35   0
            SoilTemperature Temperature: InteractionsPerDay=8
            Solute NO3: Thickness=[275, 150, 300, 1275]; InitialValues=[17.4167, 1.65686, 0.176471, 0.75]; InitialValuesUnits=kg/ha; WaterTableConcentration=0; D0=0; DepthConstant=0; MaxDepthSoluteAccessible=0; RunoffEffectivenessAtMovingSolute=0; MaxEffectiveRunoff=0
            Solute NH4: Thickness=[275, 150, 300, 1275]; InitialValues=[2.6125, 0.248529, 0.0264706, 0.1125]; InitialValuesUnits=kg/ha; WaterTableConcentration=0; D0=0; DepthConstant=0; MaxDepthSoluteAccessible=0; RunoffEffectivenessAtMovingSolute=0; MaxEffectiveRunoff=0
            Solute Urea: Thickness=[275, 150, 300, 1275]; InitialValues=[0, 0, 0, 0]; InitialValuesUnits=ppm; WaterTableConcentration=0; D0=0; DepthConstant=0; MaxDepthSoluteAccessible=0; RunoffEffectivenessAtMovingSolute=0; MaxEffectiveRunoff=0
            Nutrient
            OutputLayers: Thickness=[400, 400, 400, 400, 400]
        Manager ResetDate: same as NZ Kiwifruit Expts.Orchard_Omahu_AshburtonSoil.Omahu_Gold.ResetDate
      Memo Reason why drainage looks bad
        The flux meters were flooded by a rising water table so the drainage observations are not representative of actual drainage
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