Simulations: Version=216
  Memo TitlePage
    # The STRUM model
    A simple representation of the shape and mass of rows of fruit trees which can be used in a multizone simulation with a row of mown grass to model the water N and C balance of an orchard system.
  Folder Replacements
    Report KiwiReport: EventNames=[Clock].DoReport
      VariableNames:
        [Clock].Today
        [ResetDate].Script.SimulationYear as SimYear
        [Row].STRUM.AccumulatedWaterStress
        //[Row].STRUM.Arbitrator.DemandRatio
        [Row].Area
        [Row].STRUM.BaseHeight
        [Row].STRUM.Fruit.FreshYield_kgPerHa
        [Row].STRUM.CanopyArea
        [Row].STRUM.RootUptakesArbitrator.WaterDemand.Amount
        [Row].STRUM.RootUptakesArbitrator.WaterDemand.mm
        [Row].STRUM.RootUptakesArbitrator.NitrogenDemand.Amount
        [Row].STRUM.Root.Network.WtByLayerZone1
        [Row].STRUM.Root.Network.WtByLayerZone2
        [Row].STRUM.Arbitrator.Carbon.TotalPlantDemand
        [Row].STRUM.Arbitrator.Carbon.TotalPlantSupply
        [Row].STRUM.Arbitrator.Carbon.TotalPlantDemandsAllocated
        [Row].STRUM.Arbitrator.Fn
        [Row].STRUM.Arbitrator.Nitrogen.TotalPlantDemand
        [Row].STRUM.Arbitrator.Nitrogen.TotalPlantSupply
        [Row].STRUM.Arbitrator.Nitrogen.TotalPlantDemandsAllocated
        [Row].STRUM.Fruit.TotalCarbonDemand.RelativeFruitMass.Delta.Integral
        [Row].STRUM.Fruit.Allocated.Carbon.Total
        [Row].STRUM.Fruit.Allocated.Nitrogen.Total
        [Row].STRUM.Fruit.Carbon.Demands.Structural
        [Row].STRUM.Fruit.Carbon.Demands.Total
        [Row].STRUM.Fruit.DMC
        [Row].STRUM.Fruit.FreshWtPerFruit
        [Row].STRUM.Fruit.NextYearsFruitingBudSurvival
        [Row].STRUM.Fruit.Number.BudsSurvivalFromLastYear
        [Row].STRUM.Fruit.N
        [Row].STRUM.Fruit.Nitrogen.Demands.Total
        [Row].STRUM.Fruit.Number
        [Row].STRUM.Fruit.Diameter
        [Row].STRUM.Fruit.VolumePerFruit
        [Row].STRUM.Fruit.Wt
        [Row].STRUM.Fruit.PotentialDWPerFruit
        [Row].STRUM.Fruit.TotalCarbonDemand.RelativeFruitMass
        [Row].STRUM.Fruit.TotalCarbonDemand.CarbonConc
        [Row].STRUM.Height
        [Row].STRUM.Height.PrunedCanopyBaseHeight
        [Row].STRUM.Height.PrunedCanopyBaseHeight  + [Row].STRUM.Height.PrunedCanopyDepth
        [Row].STRUM.Height.PrunedCanopyBaseHeight  + [Row].STRUM.Height.PrunedCanopyDepth + [Row].STRUM.Height.SeasonalDepthGrowth
        [Row].STRUM.Leaf.Allocated.Carbon.Total
        [Row].STRUM.Leaf.Allocated.Nitrogen.Total
        [Row].STRUM.Leaf.Canopy.CoverGreen
        [Row].STRUM.Leaf.Canopy.Deepness
        [Row].STRUM.Leaf.Dead.Wt
        [Row].STRUM.Leaf.Carbon.Demands.Structural
        [Row].STRUM.Leaf.Carbon.Demands.Total
        [Row].STRUM.Leaf.Fn
        [Row].STRUM.Leaf.Canopy.Fw
        [Row].STRUM.Leaf.Canopy.LAI
        [Row].STRUM.Leaf.Live.Wt
        [Row].STRUM.Leaf.N
        [Row].STRUM.Leaf.Nitrogen.Demands.Total
        [Row].STRUM.Leaf.Canopy.PotentialEP
        [Row].STRUM.Leaf.Canopy.RadiationIntercepted
        [Row].STRUM.Leaf.Senesced.Weight.Structural
        [Row].STRUM.Leaf.SenescenceRate
        [Row].STRUM.Leaf.Canopy.Transpiration
        [Row].STRUM.Leaf.Canopy.WaterDemand
        [Row].STRUM.Leaf.Canopy.WaterAllocation
        [Row].STRUM.Leaf.Canopy.Width
        [Row].STRUM.Leaf.Canopy.GreenExtinctionCoefficient
        [Row].STRUM.Leaf.Wt
        [Row].STRUM.Leaf.Canopy.PotentialEP
        [Row].STRUM.Phenology.Age.YearDecimal
        [Row].STRUM.Phenology.Age.Years
        [Row].STRUM.Phenology.CurrentStageName
        [Row].STRUM.Phenology.DaysSinceFlowering
        [Row].STRUM.Phenology.Stage
        [Row].STRUM.RelativeSeasonalDimension
        [Row].STRUM.RelativeAnnualDimension
        [Row].STRUM.Root.Allocated.Carbon.Total
        [Row].STRUM.Root.Allocated.Nitrogen.Total
        [Row].STRUM.Root.Network.Depth
        [Row].STRUM.Root.Carbon.Demands.Structural
        [Row].STRUM.Root.Carbon.Demands.Total
        [Row].STRUM.Root.N
        [Row].STRUM.Root.Nitrogen.Demands.Total
        [Row].STRUM.RootUptakesArbitrator.WaterUptake.AmountByZone
        [Row].STRUM.RootUptakesArbitrator.WaterUptake.Mm
        [Row].STRUM.RootUptakesArbitrator.WaterUptake.Amount
        [Row].STRUM.RootUptakesArbitrator.NitrogenUptake.AmountByZone
        [Row].STRUM.RootUptakesArbitrator.NitrogenUptake.Gpm2
        [Row].STRUM.RootUptakesArbitrator.NitrogenUptake.Amount
        [Row].STRUM.RootUptakesArbitrator.WaterSupply.AmountByZone
        [Row].STRUM.RootUptakesArbitrator.WaterSupply.Mm
        [Row].STRUM.RootUptakesArbitrator.WaterSupply.Amount
        [Row].STRUM.RootUptakesArbitrator.NitrogenSupply.AmountByZone
        [Row].STRUM.RootUptakesArbitrator.NitrogenSupply.Gpm2
        [Row].STRUM.RootUptakesArbitrator.NitrogenSupply.Amount
        [Row].STRUM.Root.Wt
        [Row].STRUM.TranspirationPerTree
        [Row].STRUM.Wood.Allocated.Carbon.Total
        [Row].STRUM.Wood.Allocated.Nitrogen.Total
        [Row].STRUM.Wood.Carbon.Demands.Structural
        [Row].STRUM.Wood.Carbon.Demands.Total
        [Row].STRUM.Wood.Carbon.Supplies.ReTranslocation
        [Row].STRUM.Wood.Live.Carbon.Structural * 1/0.4
        [Row].STRUM.Wood.Live.Carbon.Storage * 1/0.4
        [Row].STRUM.Wood.EnergyBalance.CoverTotal
        [Row].STRUM.Wood.EnergyBalance.DeadAreaIndex
        [Row].STRUM.Wood.EnergyBalance.LAIDead
        [Row].STRUM.Wood.EnergyBalance.RadiationInterceptedByDead
        [Row].STRUM.Wood.EnergyBalance.Transpiration
        [Row].STRUM.Wood.N
        [Row].STRUM.Wood.Nitrogen.Demands.Total
        [Row].STRUM.Wood.Wt
        [Row].STRUM.Width
        [Row].STRUM.Width.PrunedWidth
        [Row].STRUM.Width.PrunedWidth + [Row].STRUM.Width.SeasonalGrowth
        [Row].STRUM.TranspirationPerLeafArea
        [Row].SurfaceOrganicMatter.N
        [Row].SurfaceOrganicMatter.Wt
        [Row].Irrigation.IrrigationApplied
        [Row].Fertiliser.NitrogenApplied
        sum([Row].Soil.OutputLayers.SWmm)
        [Row].Soil.OutputLayers.SWmm
        ([Row].Soil.OutputLayers.SWmm[1] + [Row].Soil.OutputLayers.SWmm[2]+ [Row].Soil.OutputLayers.SWmm[3]) as SWmm0_120
        ([Row].Soil.OutputLayers.SWmm[1] + [Row].Soil.OutputLayers.SWmm[2]+ [Row].Soil.OutputLayers.SWmm[3] + [Row].Soil.OutputLayers.SWmm[4]) as SWmm0_160
        [Row].Soil.OutputLayers.SW
        [Row].Soil.OutputLayers.SAT
        [Row].Soil.OutputLayers.DUL
        [Row].Soil.OutputLayers.LL15
        [Row].Soil.SoilWater.Evaporation
        [Row].Soil.SoilWater.Eo
        [Row].Soil.SoilWater.Runoff as Runoff
        [Row].Soil.SoilWater.Flux
        [Row].Soil.SoilWater.Drainage as Drainage
        [Weather].PanEvap
        [Weather].Radn
        [Weather].Rain
        [STRUM].Leaf.TotalCarbonDemand.TotalDMDemand.SizeDemand.SizeDemand.SizeDemand.TargetSize
    Report RowZoneReport: EventNames=[Clock].DoReport
      VariableNames:
        [Clock].Today
        [Row].STRUM.AccumulatedWaterStress
        //[Row].STRUM.Arbitrator.DemandRatio
        [Row].Area
        [Row].STRUM.BaseHeight
        [Row].STRUM.Fruit.FreshYield_kgPerHa
        [Row].STRUM.CanopyArea
        [Row].STRUM.RootUptakesArbitrator.WaterDemand.Amount
        [Row].STRUM.RootUptakesArbitrator.WaterDemand.mm
        [Row].STRUM.RootUptakesArbitrator.NitrogenDemand.Amount
        [Row].STRUM.Root.Network.WtByLayerZone1
        [Row].STRUM.Root.Network.WtByLayerZone2
        [Row].STRUM.Arbitrator.Carbon.TotalPlantDemand
        [Row].STRUM.Arbitrator.Carbon.TotalPlantSupply
        [Row].STRUM.Arbitrator.Carbon.TotalPlantDemandsAllocated
        [Row].STRUM.Arbitrator.Fn
        [Row].STRUM.Arbitrator.Nitrogen.TotalPlantDemand
        [Row].STRUM.Arbitrator.Nitrogen.TotalPlantSupply
        [Row].STRUM.Arbitrator.Nitrogen.TotalPlantDemandsAllocated
        [Row].STRUM.Fruit.TotalCarbonDemand.RelativeFruitMass.Delta.Integral
        [Row].STRUM.Fruit.Allocated.Carbon.Total
        [Row].STRUM.Fruit.Allocated.Nitrogen.Total
        [Row].STRUM.Fruit.Carbon.Demands.Structural
        [Row].STRUM.Fruit.Carbon.Demands.Total
        [Row].STRUM.Fruit.DMC
        [Row].STRUM.Fruit.FreshWtPerFruit
        [Row].STRUM.Fruit.NextYearsFruitingBudSurvival
        [Row].STRUM.Fruit.Number.BudsSurvivalFromLastYear
        [Row].STRUM.Fruit.N
        [Row].STRUM.Fruit.Nitrogen.Demands.Total
        [Row].STRUM.Fruit.Number
        [Row].STRUM.Fruit.Diameter
        [Row].STRUM.Fruit.VolumePerFruit
        [Row].STRUM.Fruit.Wt
        [Row].STRUM.Fruit.PotentialDWPerFruit
        [Row].STRUM.Fruit.TotalCarbonDemand.RelativeFruitMass
        [Row].STRUM.Fruit.TotalCarbonDemand.CarbonConc
        [Row].STRUM.Height
        [Row].STRUM.Height.PrunedCanopyBaseHeight
        [Row].STRUM.Height.PrunedCanopyBaseHeight  + [Row].STRUM.Height.PrunedCanopyDepth
        [Row].STRUM.Height.PrunedCanopyBaseHeight  + [Row].STRUM.Height.PrunedCanopyDepth + [Row].STRUM.Height.SeasonalDepthGrowth
        [Row].STRUM.Leaf.Allocated.Carbon.Total
        [Row].STRUM.Leaf.Allocated.Nitrogen.Total
        [Row].STRUM.Leaf.Canopy.CoverGreen
        [Row].STRUM.Leaf.Canopy.Deepness
        [Row].STRUM.Leaf.Dead.Wt
        [Row].STRUM.Leaf.Carbon.Demands.Structural
        [Row].STRUM.Leaf.Carbon.Demands.Total
        [Row].STRUM.Leaf.Fn
        [Row].STRUM.Leaf.Canopy.Fw
        [Row].STRUM.Leaf.Canopy.LAI
        [Row].STRUM.Leaf.Live.Wt
        [Row].STRUM.Leaf.N
        [Row].STRUM.Leaf.Nitrogen.Demands.Total
        [Row].STRUM.Leaf.Canopy.PotentialEP
        [Row].STRUM.Leaf.Canopy.RadiationIntercepted
        [Row].STRUM.Leaf.Senesced.Weight.Structural
        [Row].STRUM.Leaf.SenescenceRate
        [Row].STRUM.Leaf.Canopy.Transpiration
        [Row].STRUM.Leaf.Canopy.WaterDemand
        [Row].STRUM.Leaf.Canopy.WaterAllocation
        [Row].STRUM.Leaf.Canopy.Width
        [Row].STRUM.Leaf.Canopy.GreenExtinctionCoefficient
        [Row].STRUM.Leaf.Wt
        [Row].STRUM.Phenology.Age.YearDecimal
        [Row].STRUM.Phenology.Age.Years
        [Row].STRUM.Phenology.CurrentStageName
        [Row].STRUM.Phenology.DaysSinceFlowering
        [Row].STRUM.Phenology.Stage
        [Row].STRUM.RelativeSeasonalDimension
        [Row].STRUM.RelativeAnnualDimension
        [Row].STRUM.Root.Allocated.Carbon.Total
        [Row].STRUM.Root.Allocated.Nitrogen.Total
        [Row].STRUM.Root.Network.Depth
        [Row].STRUM.Root.Carbon.Demands.Structural
        [Row].STRUM.Root.Carbon.Demands.Total
        [Row].STRUM.Root.N
        [Row].STRUM.Root.Nitrogen.Demands.Total
        [Row].STRUM.RootUptakesArbitrator.WaterUptake.AmountByZone
        [Row].STRUM.RootUptakesArbitrator.WaterUptake.Mm
        [Row].STRUM.RootUptakesArbitrator.WaterUptake.Amount
        [Row].STRUM.RootUptakesArbitrator.NitrogenUptake.AmountByZone
        [Row].STRUM.RootUptakesArbitrator.NitrogenUptake.Gpm2
        [Row].STRUM.RootUptakesArbitrator.NitrogenUptake.Amount
        [Row].STRUM.RootUptakesArbitrator.WaterSupply.AmountByZone
        [Row].STRUM.RootUptakesArbitrator.WaterSupply.Mm
        [Row].STRUM.RootUptakesArbitrator.WaterSupply.Amount
        [Row].STRUM.RootUptakesArbitrator.NitrogenSupply.AmountByZone
        [Row].STRUM.RootUptakesArbitrator.NitrogenSupply.Gpm2
        [Row].STRUM.RootUptakesArbitrator.NitrogenSupply.Amount
        [Row].STRUM.Root.Wt
        [Row].STRUM.TranspirationPerTree
        [Row].STRUM.Wood.Allocated.Carbon.Total
        [Row].STRUM.Wood.Allocated.Nitrogen.Total
        [Row].STRUM.Wood.Carbon.Demands.Structural
        [Row].STRUM.Wood.Carbon.Demands.Total
        [Row].STRUM.Wood.Carbon.Supplies.ReTranslocation
        [Row].STRUM.Wood.Live.Carbon.Structural * 1/0.4
        [Row].STRUM.Wood.Live.Carbon.Storage * 1/0.4
        [Row].STRUM.Wood.EnergyBalance.CoverTotal
        [Row].STRUM.Wood.EnergyBalance.DeadAreaIndex
        [Row].STRUM.Wood.EnergyBalance.LAIDead
        [Row].STRUM.Wood.EnergyBalance.RadiationInterceptedByDead
        [Row].STRUM.Wood.EnergyBalance.Transpiration
        [Row].STRUM.Wood.N
        [Row].STRUM.Wood.Nitrogen.Demands.Total
        [Row].STRUM.Wood.Wt
        [Row].STRUM.Width
        [Row].STRUM.Width.PrunedWidth
        [Row].STRUM.Width.PrunedWidth + [Row].STRUM.Width.SeasonalGrowth
        [Row].STRUM.TranspirationPerLeafArea
        [Row].SurfaceOrganicMatter.N
        [Row].SurfaceOrganicMatter.Wt
        [Row].Irrigation.IrrigationApplied
        [Row].Fertiliser.NitrogenApplied
        sum([Row].Soil.OutputLayers.SWmm)
        ([Row].Soil.OutputLayers.SWmm[1] + [Row].Soil.OutputLayers.SWmm[1] + [Row].Soil.OutputLayers.SWmm[1]) as SWmm90
        [Row].Soil.OutputLayers.SW
        [Row].Soil.OutputLayers.SAT
        [Row].Soil.OutputLayers.DUL
        [Row].Soil.OutputLayers.LL15
        [Row].Soil.SoilWater.Evaporation
        [Row].Soil.SoilWater.Eo
        [Weather].PanEvap
        [Weather].Radn
        [Weather].Rain
        [STRUM].Leaf.TotalCarbonDemand.TotalDMDemand.SizeDemand.SizeDemand.SizeDemand.TargetSize
    Report AlleyZoneReport: EventNames=[Clock].DoReport
      VariableNames:
        [Clock].Today
        [Alley].Area
        [Alley].SPRUM.RootUptakesArbitrator.WaterDemand.Amount
        [Alley].SPRUM.RootUptakesArbitrator.WaterSupply.Amount
        [Alley].SPRUM.RootUptakesArbitrator.WaterUptake.Amount
        [Alley].SPRUM.RootUptakesArbitrator.NitrogenDemand.Amount
        [Alley].SPRUM.RootUptakesArbitrator.NitrogenSupply.Amount
        [Alley].SPRUM.RootUptakesArbitrator.NitrogenUptake.Amount
        [Alley].SPRUM.Root.Network.WtByLayerZone1
        [Alley].SPRUM.Root.Network.WtByLayerZone2
        [Alley].SPRUM.Arbitrator.Carbon.TotalPlantDemand
        [Alley].SPRUM.Arbitrator.Carbon.TotalPlantSupply
        [Alley].SPRUM.Arbitrator.Carbon.TotalPlantDemandsAllocated
        [Alley].SPRUM.Arbitrator.Fn
        [Alley].SPRUM.Arbitrator.Nitrogen.TotalPlantDemand
        [Alley].SPRUM.Arbitrator.Nitrogen.TotalPlantSupply
        [Alley].SPRUM.Arbitrator.Nitrogen.TotalPlantDemandsAllocated
        [Alley].SPRUM.Height
        [Alley].SPRUM.Leaf.Allocated.Carbon.Total
        [Alley].SPRUM.Leaf.Allocated.Nitrogen.Total
        [Alley].SPRUM.Leaf.Canopy.CoverGreen
        [Alley].SPRUM.Leaf.Dead.Wt
        [Alley].SPRUM.Leaf.Carbon.Demands.Structural
        [Alley].SPRUM.Leaf.Carbon.Demands.Total
        [Alley].SPRUM.Leaf.Fn
        [Alley].SPRUM.Leaf.Canopy.Fw
        [Alley].SPRUM.Leaf.Canopy.LAI
        [Alley].SPRUM.Leaf.Live.Wt
        [Alley].SPRUM.Leaf.N
        [Alley].SPRUM.Leaf.Nitrogen.Demands.Total
        [Alley].SPRUM.Leaf.Canopy.PotentialEP
        [Alley].SPRUM.Leaf.Canopy.RadiationIntercepted
        [Alley].SPRUM.Leaf.Senesced.Weight.Structural
        [Alley].SPRUM.Leaf.SenescenceRate
        [Alley].SPRUM.Leaf.Canopy.Transpiration
        [Alley].SPRUM.Leaf.Canopy.WaterDemand
        [Alley].SPRUM.Leaf.Canopy.WaterAllocation
        [Alley].SPRUM.Leaf.Canopy.Width
        [Alley].SPRUM.Leaf.Wt
        [Alley].SPRUM.Phenology.Age.YearDecimal
        [Alley].SPRUM.Phenology.Age.Years
        [Alley].SPRUM.Phenology.CurrentStageName
        [Alley].SPRUM.Phenology.Stage
        [Alley].SPRUM.RelativeAnnualDimension
        [Alley].SPRUM.Root.Allocated.Carbon.Total
        [Alley].SPRUM.Root.Allocated.Nitrogen.Total
        [Alley].SPRUM.Root.Network.Depth
        [Alley].SPRUM.Root.Carbon.Demands.Structural
        [Alley].SPRUM.Root.Carbon.Demands.Total
        [Alley].SPRUM.Root.N
        [Alley].SPRUM.Root.Nitrogen.Demands.Total
        [Alley].SPRUM.RootUptakesArbitrator.WaterUptake.AmountByZone
        [Alley].SPRUM.RootUptakesArbitrator.WaterUptake.Mm
        [Alley].SPRUM.RootUptakesArbitrator.WaterUptake.Amount
        [Alley].SPRUM.RootUptakesArbitrator.NitrogenUptake.AmountByZone
        [Alley].SPRUM.RootUptakesArbitrator.NitrogenUptake.Gpm2
        [Alley].SPRUM.RootUptakesArbitrator.NitrogenUptake.Amount
        [Alley].SPRUM.RootUptakesArbitrator.WaterSupply.AmountByZone
        [Alley].SPRUM.RootUptakesArbitrator.WaterSupply.Mm
        [Alley].SPRUM.RootUptakesArbitrator.WaterSupply.Amount
        [Alley].SPRUM.RootUptakesArbitrator.NitrogenSupply.AmountByZone
        [Alley].SPRUM.RootUptakesArbitrator.NitrogenSupply.Gpm2
        [Alley].SPRUM.RootUptakesArbitrator.NitrogenSupply.Amount
        [Alley].SPRUM.Root.Wt
        [Alley].SPRUM.Residue.Allocated.Carbon.Total
        [Alley].SPRUM.Residue.Allocated.Nitrogen.Total
        [Alley].SPRUM.Residue.Carbon.Demands.Structural
        [Alley].SPRUM.Residue.Carbon.Demands.Total
        [Alley].SPRUM.Residue.N
        [Alley].SPRUM.Residue.Nitrogen.Demands.Total
        [Alley].SPRUM.Residue.Wt
        [Alley].SurfaceOrganicMatter.N
        [Alley].SurfaceOrganicMatter.Wt
        [Alley].Irrigation.IrrigationApplied
        [Alley].Fertiliser.NitrogenApplied
        sum([Alley].Soil.OutputLayers.SWmm)
        ([Alley].Soil.OutputLayers.SWmm[1] + [Alley].Soil.OutputLayers.SWmm[1] + [Alley].Soil.OutputLayers.SWmm[1]) as SWmm90
        [Alley].Soil.OutputLayers.SW
        [Alley].Soil.OutputLayers.SAT
        [Alley].Soil.OutputLayers.DUL
        [Alley].Soil.OutputLayers.LL15
        [Alley].Soil.SoilWater.Drainage
        [Alley].Soil.SoilWater.Evaporation
        [Alley].Soil.SoilWater.Eo
        [Weather].PanEvap
        [Weather].Radn
        [Weather].Rain
    Report ZoneAgregateReport: EventNames=[Clock].DoReport
      VariableNames:
        [Clock].Today
        [ZoneAgregate].SimulationArea
        [ZoneAgregate].Eop.Amount
        [ZoneAgregate].Eop.Pm2
        [ZoneAgregate].Eop.AmountByZone[1]
        [ZoneAgregate].Eop.AmountByZone[2]
        [ZoneAgregate].Ro.Amount
        [ZoneAgregate].Ro.Pm2
        [ZoneAgregate].Ro.AmountByZone[1]
        [ZoneAgregate].Ro.AmountByZone[2]
        [ZoneAgregate].Ri.Amount
        [ZoneAgregate].Ri.Pm2
        [ZoneAgregate].Ri.AmountByZone[1]
        [ZoneAgregate].Ri.AmountByZone[2]
        [ZoneAgregate].Et.Amount
        [ZoneAgregate].Et.Pm2
        [ZoneAgregate].Et.AmountByZone[1]
        [ZoneAgregate].Et.AmountByZone[2]
        [ZoneAgregate].AccumulatedIrrigation.Amount
        [ZoneAgregate].AccumulatedIrrigation.Pm2
        [ZoneAgregate].AccumulatedIrrigation.AmountByZone[1]
        [ZoneAgregate].AccumulatedIrrigation.AmountByZone[2]
        [ZoneAgregate].AccumulatedNitrogen.Amount
        [ZoneAgregate].AccumulatedNitrogen.Pm2
        [ZoneAgregate].AccumulatedNitrogen.AmountByZone[1]
        [ZoneAgregate].AccumulatedNitrogen.AmountByZone[2]
        [ZoneAgregate].FintTreeGreen
        [ZoneAgregate].FintTreeDead
        [ZoneAgregate].FintTreeTotal
        [ZoneAgregate].FintUnderstoryGreen
        [ZoneAgregate].FintUnderstoryDead
    Manager AutomaticFertiliser
      Fertilise = True
      Season_Start = 1-Aug
      Season_End = 30-May
      Season_Allocation = 100000
      TriggerN = 60
      NApplicationAmount = 50
      Return_days = 1
      Top_Depth = 600
```csharp
using Newtonsoft.Json;
using Models.PMF.Phen;
using Models.Soils.Nutrients;
using Models.Interfaces;
using APSIM.Shared.Utilities;
using Models.PMF;
using System.Xml.Serialization;
using Models.Soils;
using Models.Core;
using System;
using Models.PMF.Organs;

        
namespace Models
{
    [Serializable] 
    [System.Xml.Serialization.XmlInclude(typeof(Model))]
    public class Script : Model
    {
        [Link] private ISummary summary;
        [Link] private Fertiliser Fertiliser;
        [Link] private Clock Clock;
        [Link] private Plant SCRUM;
        [Link(ByName = true)]
        private ISolute NO3;
        [Link] private Soils.Soil Soil;
        [Link(Type = LinkType.Path, Path = "[STRUM].Root.Network")]
        private RootNetwork root;
        [Link(Type = LinkType.Path, Path = "[STRUM].Phenology")]
        private Phenology phenology;
        [Link]
        private IPhysical soilPhysical;
        //Communication to other modules
       
        //User inputs from properties tab
        [Description("Fertilise (tick for yes)")]
        public bool Fertilise { get; set; }
        [Description("SeasonStart (dd-MMM)")]
        public string Season_Start { get; set; }
        [Description("SeasonEnd (dd-MMM)")]
        public string Season_End { get; set; }
        [Description("Season Allocation (kg/ha)")]
        public double Season_Allocation { get; set; }
        [Description("Mineral N to maintain soil above (kg/ha)")]
        public double TriggerN { get; set; }
        [Description("Amount of N to apply (kg/ha)")]
        public double NApplicationAmount { get; set; }
        [Description("Minimum days for Fertiliser spreader to return")]
        public double Return_days { get; set; }
        [Description("Depth to calculate mineral N (mm)")]
        public double Top_Depth { get; set; }
       
        //Class members
        [JsonIgnore] private bool FertiliserIsAvailable { get; set; }
        [JsonIgnore] public bool SeasonIsOpen { get; set; }
        [JsonIgnore] private bool CropIsActive { get; set; }
        [JsonIgnore] private bool FertSpreaderIsAvailable { get; set; }
        [JsonIgnore] private bool SoilNIsLow { get; set; }
        [JsonIgnore] public double Top_SoilN { get; set; }
        [JsonIgnore] public double Accumulated_depth { get; set; }
        [JsonIgnore] public double Days_since_fertiliser { get; set; }
        [JsonIgnore] public double Season_Application { get; set; }
        
        //Variables for date logic testing
        [JsonIgnore] public string StartString { get; set; }
        [JsonIgnore] public string EndString { get; set; }
        [JsonIgnore] public DateTime StartDate { get; set; }
        [JsonIgnore] public DateTime EndDate { get; set; }
        [JsonIgnore] public int TodayYear { get; set; }
        [JsonIgnore] public int TodayMonth { get; set; }
        [JsonIgnore] public int StartMonth { get; set; }
        [JsonIgnore] public int EndMonth { get; set; }
        [JsonIgnore] public int TodayDay { get; set; }
        [JsonIgnore] public int StartDay { get; set; }
        [JsonIgnore] public int EndDay { get; set; }
              
        //Determine daily requirement for fertiliser
        [EventSubscribe("StartOfDay")]
        private void OnStartOfDay(object sender, EventArgs e)
        { 
            //Can we irrigate?
            FertiliserIsAvailable = false; 
            if (Fertilise)
                FertiliserIsAvailable = true; 
    
            //Are we Allowed to Irrigate?
            TodayYear = Clock.Today.Year;
            StartString = Season_Start + "-" + TodayYear.ToString();
            EndString = Season_End + "-" + TodayYear.ToString();
            StartDate = DateTime.Parse(StartString);
            EndDate = DateTime.Parse(EndString);
            TodayMonth = Clock.Today.Month;
            TodayDay = Clock.Today.Day;
            StartDay = StartDate.Day;
            StartMonth = StartDate.Month;
            EndDay = EndDate.Day;
            EndMonth = EndDate.Month;
          
            SeasonIsOpen = false;
            //if we are in the spring and after the start date then yes
            if ((Clock.Today.Month > 6) && (Clock.Today >= StartDate))
                SeasonIsOpen = true;
            //if we are in the autumn and before the end date then yes
            if ((Clock.Today.Month <= 6) && (Clock.Today <= EndDate))
                SeasonIsOpen = true;
          
            //Is there a crop in the ground that needs irrigation?
            //CropIsActive = false;
            //if ((phenology.Stage >= 3.0) && (phenology.Stage < 6.0))
            CropIsActive = true;
          
            //Is the irrigator available?
            FertSpreaderIsAvailable = false;
            Days_since_fertiliser += 1;
            if (Days_since_fertiliser >= Return_days)
                FertSpreaderIsAvailable = true;
          
            //Is the soil N low enough to require fertiliser?
            SoilNIsLow = false;
            double CurrentRootDepth = 0;
            double RootDepth = root.Depth;
            CurrentRootDepth = Math.Max(RootDepth, CurrentRootDepth);
          
            Accumulated_depth = 0;
            Top_SoilN = 0;
            for (int layer = 0; Accumulated_depth < Top_Depth; layer++)
            {
                Top_SoilN += NO3.kgha[layer];
                Accumulated_depth += soilPhysical.Thickness[layer];
            }
            if (Top_SoilN <= TriggerN)
                SoilNIsLow = true;
                
            //Lets bloody well fertilise then!!!!
            if ((FertiliserIsAvailable) && (SeasonIsOpen) && (CropIsActive) && (FertSpreaderIsAvailable) && (SoilNIsLow)) //The conditions are rife for fertiliser
            {
                Fertiliser.Apply(NApplicationAmount, "UreaN", 10);
                Days_since_fertiliser = 0;
                Season_Application += NApplicationAmount;
                summary.WriteMessage(this, "Automatic Fertiliser", MessageType.Diagnostic);
            
            }
        }
    }
}
```
    Manager ResetDate
      ResetDate = 01-Jul
```csharp
using Newtonsoft.Json;
using Models.PMF.Organs;
using Models.Soils.Nutrients;
using Models.Interfaces;
using System;
using Models.Core;
using System.Collections.Generic;
using System.Text;
using Models.Soils;
using Models.PMF;
using Models;
using System.Xml.Serialization;
using APSIM.Shared.Utilities;
using Models.Climate;



namespace Models
{
    [Serializable] 
    //[System.Xml.Serialization.XmlInclude(typeof(Model))]
    public class Script : Model
    {
    
     [Link] private Clock Clock;
        
    [Separator("Helper script to summarise variables")]
    [Description(" Date to reset the day counter: ")]
    public string ResetDate { get; set; }
                  
        [JsonIgnore] public double SimulationYear { get; set; }
        [JsonIgnore] public double DAS { get; set; }
        
         [EventSubscribe("StartOfSimulation")]
        private void DoStartOfSimulation(object sender, EventArgs e)
        {
                DAS = 0;
                SimulationYear = Clock.Today.Year;
        }
        
        [EventSubscribe("StartOfDay")]
        private void OnStartOfDay(object sender, EventArgs e)
        {
            DAS += 1;
            if (DateUtilities.DatesAreEqual(ResetDate, Clock.Today.Date))
            //if (DateUtilities.DatesAreEqual("Jul-1", Clock.Today.Date))
            {
                SimulationYear += 1;
                DAS = 1;
                
            }
        }
    
    }
}
```
  DataStore
    ExcelInput: FileNames=[AllObsCopy.xlsx]; SheetNames=[Observed]
    PredictedObserved: PredictedTableName=KiwiReport; ObservedTableName=Observed; FieldNameUsedForMatch=SimulationName; FieldName2UsedForMatch=Zone; FieldName3UsedForMatch=Clock.Today; AllColumns=false
    PredictedObserved DrainagePO (disabled): PredictedTableName=Drainage; ObservedTableName=Observed; FieldNameUsedForMatch=SimulationName; FieldName2UsedForMatch=Zone; FieldName3UsedForMatch=Clock.Today; AllColumns=false
  Folder PatternTests (disabled)
    Simulation AgeNDimensions
      Clock: Start=2000-06-21; End=2011-07-01
      Summary SummaryFile
      Weather: FileName=MetFiles/Whakatu.met
      MicroClimate: a_interception=0; b_interception=1; c_interception=0; d_interception=0; SoilHeatFluxFraction=0.4; MinimumHeightDiffForNewLayer=0; NightInterceptionFraction=0.5; ReferenceHeight=2
      SoilArbitrator Soil Arbitrator
      RectangularZone Row: Length=100; Width=1.3; CanopyType=TreeRow; Slope=0; AspectAngle=0; Altitude=50
        Report RowZoneReport: EventNames=[Clock].DoReport
        Soil: Latitude=0; Longitude=0
          LayerStructure: Thickness=[200, 200, 200, 200, 200, 200, 300, 300, 400, 800]
          Chemical: PHUnits=Water
            Thickness  PH   CEC
            100        6.6  12.44
            200        6.2  11.6525
            300        5.7  11.045
            300        5.5  10.6625
            300        5.5  9.4025
            300        5.5  9.4025
            CEC source: Calculated
          Water: Thickness=[300, 300, 300, 300, 300, 300, 1200]; InitialValues=[0.42, 0.41, 0.5, 0.46, 0.45, 0.43, 0.43]; FilledFromTop=false
          WaterBalance SoilWater: SummerDate=1-Nov; SummerU=9; SummerCona=4.4; WinterDate=1-Apr; WinterU=9; WinterCona=4.4; DiffusConst=88; DiffusSlope=35.4; Salb=0.3; CN2Bare=68; CNRed=20; CNCov=0.8; DischargeWidth=0; CatchmentArea=0; PSIDul=-100
            Thickness  SWCON  KLAT
            300        0.55   0
            300        0.55   0
            300        0.55   0
            300        0.55   0
            300        0.1    0
            300        0.02   0
            400        0.02   0
            800        0      0
          Organic: FOMCNRatio=30; CarbonUnits=Total
            Thickness  Carbon  SoilCNRatio  FBiom  FInert  FOM
            100        1.82    11.5         0.025  0.3     1243.931
            200        1.47    11.5         0.025  0.4     833.832
            300        1.2     11.5         0.015  0.75    457.617
            300        1.03    11.5         0.01   0.9     251.145
            300        0.47    11.5         0.01   0.96    137.831
            300        0.47    11.5         0.01   0.96    75.644
          OutputLayers: Thickness=[300, 300, 300, 300, 300, 300]
          Solute NO3: Thickness=[100, 200, 300, 300, 300, 300]; InitialValues=[217, 15, 1.66667, 1.66667, 0, 0]; InitialValuesUnits=ppm; WaterTableConcentration=0; D0=0; DepthConstant=0; MaxDepthSoluteAccessible=0; RunoffEffectivenessAtMovingSolute=0; MaxEffectiveRunoff=0
          Solute NH4: Thickness=[100, 200, 300, 300, 300, 300]; InitialValues=[0, 0, 0, 0, 0, 0]; InitialValuesUnits=ppm; WaterTableConcentration=0; D0=0; DepthConstant=0; MaxDepthSoluteAccessible=0; RunoffEffectivenessAtMovingSolute=0; MaxEffectiveRunoff=0
          Solute Urea: Thickness=[100, 200, 300, 300, 300, 300]; InitialValues=[0, 0, 0, 0, 0, 0]; InitialValuesUnits=kg/ha; WaterTableConcentration=0; D0=0; DepthConstant=0; MaxDepthSoluteAccessible=0; RunoffEffectivenessAtMovingSolute=0; MaxEffectiveRunoff=0
          Physical
            Thickness  ParticleSizeSand  ParticleSizeSilt  ParticleSizeClay  Rocks     BD  AirDry  LL15  DUL   SAT   KS
            300        5                 65                30                0.136527  1   0.2     0.2   0.4   0.5   100
            300        5                 65                30                0.136527  1   0.2     0.2   0.4   0.5   100
            300        5                 65                30                0.136527  1   0.25    0.25  0.3   0.5   50
            300        5                 65                30                0.136527  1   0.2     0.2   0.3   0.5   40
            300        5                 65                30                0.136527  1   0.2     0.2   0.25  0.5   40
            300        5                 65                30                0         1   0.2     0.2   0.25  0.53  40
            1200       5                 65                30                0         1   0.2     0.2   0.25  0.53  40
            Rocks, ParticleSizeSand, ParticleSizeSilt, ParticleSizeClay source: Calculated
            SoilCrop STRUMSoil: LL=[0.2, 0.2, 0.2, 0.2, 0.2, 0.2, 0.2]; KL=[1, 1, 1, 1, 1, 1, 1]; XF=[1, 1, 1, 1, 1, 1, 1]
            SoilCrop SPRUMSoil: LL=[0.2, 0.2, 0.2, 0.2, 0.2, 0.2, 0.2]; KL=[0.11, 0.11, 0.11, 0.11, 0.11, 0.11, 0.11]; XF=[1, 1, 1, 1, 1, 1, 1]
          Nutrient
          SoilTemperature Temperature: InteractionsPerDay=8
        SurfaceOrganicMatter: InitialResidueName=wheat_stubble; InitialResidueType=wheat; InitialResidueMass=500; InitialStandingFraction=0; InitialCPR=0; InitialCNR=100
        Irrigation
        Fertiliser
        Plant STRUM
        StrumTreeInstance Apple: TreeType=Deciduous; RowSpacing=5; InterRowSpacing=2; AlleyZoneWidthFrac=0; BudBreakDate=30-Aug; StartFullCanopyDate=24-Oct; StartLeafFallDate=22-Apr; EndLeafFallDate=17-May; DBHatMaturity=12; TypicalCanopyArea=2; WoodBulkDensity=650; WoodStorageFraction=0; MaximumLeafBiomass=500; MaximumRootBiomass=300; AgeAtSimulationStart=1; YearsToMaxDimension=4; CrownShape=1; MatureCanopyBaseHeight=1; MaturePrunedCanopyBaseHeight=1.5; MatureHeight=3.5; MaturePrunedHeight=3; MatureWidth=3; MaturePrunedWidth=2; SummerPruneDates=[1-dec]; FRemoveSummerPrune=0.15; RootNConc=0.01; LeafNConc=0.02; WoodNConc=0.005; FruitNConc=0.02; NFixationFrac=0; GRINZ=true; MaxRD=3; ExtinctCoeff=0.6; BaseCover=0; MaxCover=0.95; RUE=1.2; PSBaseT=5; PSLOptT=20; PSUOptT=25; PSMaxT=35; GSMax=0.006; R50=100; SurfaceKL=0.1; WaterStress=false; Number=50; PotentialFWPerFruit=70; DMC=0.14; FruitDensity=0.75; DateMaxBloom=1-oct; DAFStartLinearGrowth=30; DAFEndLinearGrowth=90; DAFMaxSize=150
        Manager AutomaticIrrigation
          allowIrrigation = True
          seasonStart = 1-aug
          seasonEnd = 30-may
          seasonsAllocation = 10000
          triggerDeficit = 70
          targetDeficit = 95
          returndays = 1
          maximumAmount = 30
          depthPAWC = 650
```csharp
using Newtonsoft.Json;
using APSIM.Shared.Utilities;
using System.Xml.Serialization;
using Models.Soils;
using Models.PMF;
using Models.Core;
using System;
using System.Linq;
using Models.Interfaces;



        
namespace Models
{
    [Serializable] 
    [System.Xml.Serialization.XmlInclude(typeof(Model))]
    public class Script : Model
    {
        [Link] private ISummary summary;
        [Link] private Irrigation Irrigation;
        [Link] private Clock Clock;
        [Link] private Soil Soil;
        [Link(IsOptional = true)] private IPlant existingCrop;
        private DateTime StartDate;
        private DateTime EndDate;
        private double TopDUL;
        private double TopLL;
        private int nLayers;
        [Link]
        private IPhysical soilPhysical;
        [Link]
        private ISoilWater waterBalance;
        //Communication to other modules
       
        //User inputs from properties tab
        [Description("Turn irrigation on?")]
        public bool allowIrrigation { get; set; }
        [Description("Start of irrigation season (dd-MMM)")]
        public string seasonStart { get; set; }
        [Description("End of irrigation season (dd-MMM)")]
        public string seasonEnd { get; set; }
        [Description("Season allocation (mm)")]
        public double seasonsAllocation { get; set; }
        [Description("Deficit to trigger irrigation (% PAWC)")]
        public double triggerDeficit { get; set; }
        [Description("Deficit to stop irrigaton (% PAWC)")]
        public double targetDeficit { get; set; }
        [Description("Minimum days for irrigation to return")]
        public double returndays { get; set; }
        [Description("Maximum irrigation application (mm/day)")]
        public double maximumAmount { get; set; }
        [Description("Depth to calculate PAWC (mm)")]
        public double depthPAWC { get; set; }

        //Class members
        [JsonIgnore] public double TopSWdeficit { get; set; }
        [JsonIgnore] public double TopSWC { get; set; }
        [JsonIgnore] public double DaysSinceIrrigation { get; set; }
        [JsonIgnore] public double AmountToApply { get; set; }
        [JsonIgnore] public double SeasonAppliedAmount { get; set; }
        
        private bool IrrigationIsAllowed { get; set; }
        private bool SeasonIsOpen { get; set; }
        private bool CropIsActive { get; set; }
        private bool IrrigatorIsAvailable { get; set; }
        private bool SoilIsDry { get; set; }

    
        //Calculate static soil variables
        [EventSubscribe("StartOfSimulation")]
        private void OnStartOfSimulation(object sender, EventArgs e)
        {   
            //Set the season dates
            StartDate = DateTime.Parse(seasonStart + "-" + Clock.Today.Year.ToString());
            EndDate = DateTime.Parse(seasonEnd + "-" + Clock.Today.Year.ToString());
            
            //Can we irrigate at all?
            IrrigationIsAllowed = false; 
            if (allowIrrigation)
                IrrigationIsAllowed = true; 

            //Calculate soil water variables
            double depthFromSurface = 0.0;
            double fracLayer = 0.0;
            nLayers = soilPhysical.Thickness.Length;
            for (int layer = 0; layer < nLayers; layer++)
            {
                fracLayer = Math.Min(1.0, (depthPAWC - depthFromSurface) / soilPhysical.Thickness[layer]);
                TopLL += soilPhysical.LL15mm[layer] * fracLayer;
                TopDUL += soilPhysical.DULmm[layer] * fracLayer;
                depthFromSurface += soilPhysical.Thickness[layer];
                if (depthFromSurface >= depthPAWC)
                    layer = nLayers;
            }
        }
             
        //Determine daily requirement for irrigation
        [EventSubscribe("StartOfDay")]
        private void OnStartOfDay(object sender, EventArgs e)
        {
            //Can we irrigate today?          
            SeasonIsOpen = isBetween(Clock.Today, StartDate, EndDate);
            if (!SeasonIsOpen)
                SeasonAppliedAmount = 0;

            //Is there a crop in the ground that needs irrigation?
            CropIsActive = false;
            if ((existingCrop != null) && (existingCrop.IsAlive))
                CropIsActive = true;
            //if ((existingCrop.Phenology.Stage >= 3.0) && (existingCrop.Phenology.Stage < 6.0))
          
            //Is the irrigator available?
            IrrigatorIsAvailable = false;
            DaysSinceIrrigation += 1;
            if (DaysSinceIrrigation >= returndays)
                IrrigatorIsAvailable = true;
          
            //Is the soil dry enough to require irrigation?
            SoilIsDry = false;
            double depthFromSurface = 0.0;
            double fracLayer = 0.0;
            TopSWC = 0.0;
            for (int layer = 0; layer < nLayers; layer++)
            //for (int layer = 0; depthFromSurface < depthPAWC + soilPhysical.Thickness[layer]; layer++)
            {
                fracLayer = Math.Min(1.0, (depthPAWC - depthFromSurface) / soilPhysical.Thickness[layer]);
                TopSWC += waterBalance.SWmm[layer] * fracLayer;
                depthFromSurface += soilPhysical.Thickness[layer];
                if (depthFromSurface >= depthPAWC)
                    layer = nLayers;
            }
            
            TopSWdeficit = TopSWC - TopDUL;
            if (Math.Max(0.0, -TopSWdeficit) >= (TopDUL - TopLL) * (100 - triggerDeficit) / 100)
                SoilIsDry = true;
                
            //Are all the conditions ratifying irrigation
            if (IrrigationIsAllowed && SeasonIsOpen && CropIsActive && IrrigatorIsAvailable && SoilIsDry)
            {
                //Lets bloody well irrigate then!!!!
                AmountToApply = TopDUL * targetDeficit / 100 - TopSWC;
                AmountToApply = Math.Max(0.0, Math.Min(AmountToApply, seasonsAllocation - SeasonAppliedAmount));
                AmountToApply = Math.Min(AmountToApply,maximumAmount);
                Irrigation.Apply(AmountToApply);
                DaysSinceIrrigation = 0;
                SeasonAppliedAmount += AmountToApply;
            }
        }
        
        ///Checks whether theDate is between iniDate and endDate (non-year specific)
        private bool isBetween(DateTime theDay, DateTime iniDate, DateTime endDate)
        {
            bool result = false;
            if (iniDate.DayOfYear < endDate.DayOfYear)
            {
                // period is within one year, ex: summer in the northern hemisphere
                if ((theDay.DayOfYear >= iniDate.DayOfYear) && (theDay.DayOfYear <= endDate.DayOfYear))
                    result = true;
            }
            else
            {
                // period goes over the end of the year, ex: summer in the southern hemisphere
                if ((theDay.DayOfYear >= iniDate.DayOfYear) || (theDay.DayOfYear <= endDate.DayOfYear))
                    result = true;
            }
            
            return result;
        }
    }
}
```
        Manager AutomaticFertiliser
          Fertilise = True
          Season_Start = 1-Aug
          Season_End = 30-Apr
          Season_Allocation = 100000
          TriggerN = 50
          NApplicationAmount = 25
          Return_days = 3
          Top_Depth = 600
```csharp
using Newtonsoft.Json;
using Models.PMF.Phen;
using Models.Soils.Nutrients;
using Models.Interfaces;
using APSIM.Shared.Utilities;
using Models.PMF;
using System.Xml.Serialization;
using Models.Soils;
using Models.Core;
using System;
using Models.PMF.Organs;

        
namespace Models
{
    [Serializable] 
    [System.Xml.Serialization.XmlInclude(typeof(Model))]
    public class Script : Model
    {
        [Link] private ISummary summary;
        [Link] private Fertiliser Fertiliser;
        [Link] private Clock Clock;
        [Link] private Plant SCRUM;
        [Link(ByName = true)]
        private ISolute NO3;
        [Link] private Soils.Soil Soil;
        [Link(Type = LinkType.Path, Path = "[STRUM].Root.Network")]
        private RootNetwork root;
        [Link(Type = LinkType.Path, Path = "[STRUM].Phenology")]
        private Phenology phenology;
        [Link]
        private IPhysical soilPhysical;
        //Communication to other modules
       
        //User inputs from properties tab
        [Description("Fertilise (tick for yes)")]
        public bool Fertilise { get; set; }
        [Description("SeasonStart (dd-MMM)")]
        public string Season_Start { get; set; }
        [Description("SeasonEnd (dd-MMM)")]
        public string Season_End { get; set; }
        [Description("Season Allocation (kg/ha)")]
        public double Season_Allocation { get; set; }
        [Description("Mineral N to maintain soil above (kg/ha)")]
        public double TriggerN { get; set; }
        [Description("Amount of N to apply (kg/ha)")]
        public double NApplicationAmount { get; set; }
        [Description("Minimum days for Fertiliser spreader to return")]
        public double Return_days { get; set; }
        [Description("Depth to calculate mineral N (mm)")]
        public double Top_Depth { get; set; }
       
        //Class members
        [JsonIgnore] private bool FertiliserIsAvailable { get; set; }
        [JsonIgnore] public bool SeasonIsOpen { get; set; }
        [JsonIgnore] private bool CropIsActive { get; set; }
        [JsonIgnore] private bool FertSpreaderIsAvailable { get; set; }
        [JsonIgnore] private bool SoilNIsLow { get; set; }
        [JsonIgnore] public double Top_SoilN { get; set; }
        [JsonIgnore] public double Accumulated_depth { get; set; }
        [JsonIgnore] public double Days_since_fertiliser { get; set; }
        [JsonIgnore] public double Season_Application { get; set; }
        
        //Variables for date logic testing
        [JsonIgnore] public string StartString { get; set; }
        [JsonIgnore] public string EndString { get; set; }
        [JsonIgnore] public DateTime StartDate { get; set; }
        [JsonIgnore] public DateTime EndDate { get; set; }
        [JsonIgnore] public int TodayYear { get; set; }
        [JsonIgnore] public int TodayMonth { get; set; }
        [JsonIgnore] public int StartMonth { get; set; }
        [JsonIgnore] public int EndMonth { get; set; }
        [JsonIgnore] public int TodayDay { get; set; }
        [JsonIgnore] public int StartDay { get; set; }
        [JsonIgnore] public int EndDay { get; set; }
              
        //Determine daily requirement for fertiliser
        [EventSubscribe("StartOfDay")]
        private void OnStartOfDay(object sender, EventArgs e)
        { 
            //Can we irrigate?
            FertiliserIsAvailable = false; 
            if (Fertilise)
                FertiliserIsAvailable = true; 
    
            //Are we Allowed to Irrigate?
            TodayYear = Clock.Today.Year;
            StartString = Season_Start + "-" + TodayYear.ToString();
            EndString = Season_End + "-" + TodayYear.ToString();
            StartDate = DateTime.Parse(StartString);
            EndDate = DateTime.Parse(EndString);
            TodayMonth = Clock.Today.Month;
            TodayDay = Clock.Today.Day;
            StartDay = StartDate.Day;
            StartMonth = StartDate.Month;
            EndDay = EndDate.Day;
            EndMonth = EndDate.Month;
          
            SeasonIsOpen = false;
            //if we are in the spring and after the start date then yes
            if ((Clock.Today.Month > 6) && (Clock.Today >= StartDate))
                SeasonIsOpen = true;
            //if we are in the autumn and before the end date then yes
            if ((Clock.Today.Month <= 6) && (Clock.Today <= EndDate))
                SeasonIsOpen = true;
          
            //Is there a crop in the ground that needs irrigation?
            //CropIsActive = false;
            //if ((phenology.Stage >= 3.0) && (phenology.Stage < 6.0))
            CropIsActive = true;
          
            //Is the irrigator available?
            FertSpreaderIsAvailable = false;
            Days_since_fertiliser += 1;
            if (Days_since_fertiliser >= Return_days)
                FertSpreaderIsAvailable = true;
          
            //Is the soil N low enough to require fertiliser?
            SoilNIsLow = false;
            double CurrentRootDepth = 0;
            double RootDepth = root.Depth;
            CurrentRootDepth = Math.Max(RootDepth, CurrentRootDepth);
          
            Accumulated_depth = 0;
            Top_SoilN = 0;
            for (int layer = 0; Accumulated_depth < Top_Depth; layer++)
            {
                Top_SoilN += NO3.kgha[layer];
                Accumulated_depth += soilPhysical.Thickness[layer];
            }
            if (Top_SoilN <= TriggerN)
                SoilNIsLow = true;
                
            //Lets bloody well irrigate then!!!!
            if ((FertiliserIsAvailable) && (SeasonIsOpen) && (CropIsActive) && (FertSpreaderIsAvailable) && (SoilNIsLow)) //The conditions are rife for irrigation
            {
                Fertiliser.Apply(NApplicationAmount, "UreaN", 10);
                Days_since_fertiliser = 0;
                Season_Application += NApplicationAmount;
                summary.WriteMessage(this, "Automatic Fertiliser", MessageType.Diagnostic);
            
            }
        }
    }
}
```
    Experiment SingleZoneCanopySize
      Memo
        I this test canopy size is held constant and the size of the soil zone is changed.
        As Zone gets larger supply of nitrogen and water (kg) to the soil arbitrator should increase in proportion to zone size.  Demand for water and nitrogen should remain constant as they are driven by canopy size rather than zone size.  Uptakes should be the minumu of supply and demand
      Factors
        Factor
          CompositeFactor 1m
            Specifications:
              [Row].Apple.MaturePrunedWidth = 1
              [Row].Apple.MatureWidth = 1
          CompositeFactor 5m
            Specifications:
              [Row].Apple.MaturePrunedWidth = 5
              [Row].Apple.MatureWidth = 5
          CompositeFactor 10m
            Specifications:
              [Row].Apple.MaturePrunedWidth = 10
              [Row].Apple.MatureWidth = 10
          CompositeFactor 13m
            Specifications:
              [Row].Apple.MaturePrunedWidth = 13
              [Row].Apple.MatureWidth = 13
      Simulation SingleZone2
        Clock: Start=2000-06-21; End=2011-07-01
        Summary SummaryFile
        Weather: FileName=MetFiles/Whakatu.met
        MicroClimate: a_interception=0; b_interception=1; c_interception=0; d_interception=0; SoilHeatFluxFraction=0.4; MinimumHeightDiffForNewLayer=0; NightInterceptionFraction=0.5; ReferenceHeight=2
        SoilArbitrator Soil Arbitrator
        RectangularZone Row: Length=100; Width=1.3; CanopyType=TreeRow; Slope=0; AspectAngle=0; Altitude=50
          Report RowZoneReport: EventNames=[Clock].DoReport
          Soil: same as PatternTests.AgeNDimensions.Row.Soil
          SurfaceOrganicMatter: InitialResidueName=wheat_stubble; InitialResidueType=wheat; InitialResidueMass=500; InitialStandingFraction=0; InitialCPR=0; InitialCNR=100
          Irrigation
          Fertiliser
          Plant STRUM
          StrumTreeInstance Apple: TreeType=Deciduous; RowSpacing=10; InterRowSpacing=1; AlleyZoneWidthFrac=0; BudBreakDate=30-Aug; StartFullCanopyDate=24-Oct; StartLeafFallDate=22-Apr; EndLeafFallDate=17-May; DBHatMaturity=12; TypicalCanopyArea=8; WoodBulkDensity=650; WoodStorageFraction=0; MaximumLeafBiomass=500; MaximumRootBiomass=300; AgeAtSimulationStart=12; YearsToMaxDimension=12; CrownShape=0; MatureCanopyBaseHeight=1; MaturePrunedCanopyBaseHeight=1; MatureHeight=3.5; MaturePrunedHeight=3.5; MatureWidth=3; MaturePrunedWidth=2; FRemoveSummerPrune=0; RootNConc=0.01; LeafNConc=0.02; WoodNConc=0.005; FruitNConc=0.02; NFixationFrac=0; GRINZ=true; MaxRD=3; ExtinctCoeff=0.6; BaseCover=0; MaxCover=0.95; RUE=1.2; PSBaseT=5; PSLOptT=20; PSUOptT=25; PSMaxT=35; GSMax=0.006; R50=100; SurfaceKL=0.1; WaterStress=false; Number=50; PotentialFWPerFruit=70; DMC=0.14; FruitDensity=0.75; DateMaxBloom=1-oct; DAFStartLinearGrowth=30; DAFEndLinearGrowth=90; DAFMaxSize=150
          Manager AutomaticIrrigation: same as PatternTests.AgeNDimensions.Row.AutomaticIrrigation
          Manager AutomaticFertiliser: same as PatternTests.AgeNDimensions.Row.AutomaticFertiliser
    Experiment TwoZoneCanopySize
      Memo: same as PatternTests.SingleZoneCanopySize.Memo
      Factors
        Factor
          CompositeFactor 1m
            Specifications:
              [Row].Apple.MaturePrunedWidth = 1
              [Row].Apple.MatureWidth = 1
              [Row].Apple.DBHatMaturity = 5
          CompositeFactor 5m
            Specifications:
              [Row].Apple.MaturePrunedWidth = 5
              [Row].Apple.MatureWidth = 5
              [Row].Apple.DBHatMaturity = 11
          CompositeFactor 10m
            Specifications:
              [Row].Apple.MaturePrunedWidth = 10
              [Row].Apple.MatureWidth = 10
              [Row].Apple.DBHatMaturity = 15
          CompositeFactor 13m
            Specifications:
              [Row].Apple.MaturePrunedWidth = 13
              [Row].Apple.MatureWidth = 13
              [Row].Apple.DBHatMaturity = 18
      Simulation DualZone2
        Clock: Start=2000-06-21; End=2011-07-01
        Summary SummaryFile
        Weather: FileName=MetFiles/Whakatu.met
        MicroClimate: a_interception=0; b_interception=1; c_interception=0; d_interception=0; SoilHeatFluxFraction=0.4; MinimumHeightDiffForNewLayer=0; NightInterceptionFraction=0.5; ReferenceHeight=2
        SoilArbitrator Soil Arbitrator
        ZoneAgregate
        Report ZoneAgregateReport: EventNames=[Clock].DoReport
          VariableNames:
            [Clock].Today
            [ZoneAgregate].SimulationArea
            [ZoneAgregate].EO
            [ZoneAgregate].ES
            [ZoneAgregate].ET
            [ZoneAgregate].IncommingRadiation
            [ZoneAgregate].GreenAreaRadiationInterception
            [ZoneAgregate].DeadMaterialRadiationInterception
            [ZoneAgregate].FRadIntGreen
            [ZoneAgregate].FRadIntDead
            [ZoneAgregate].Irrigation
            [ZoneAgregate].Nitrogen
        RectangularZone Row: Length=100; Width=1.3; CanopyType=TreeRow; Slope=0; AspectAngle=0; Altitude=50
          Report RowZoneReport: EventNames=[Clock].DoReport
          Soil: same as PatternTests.AgeNDimensions.Row.Soil
          SurfaceOrganicMatter: InitialResidueName=wheat_stubble; InitialResidueType=wheat; InitialResidueMass=500; InitialStandingFraction=0; InitialCPR=0; InitialCNR=100
          Fertiliser
          Irrigation
          Plant STRUM
          StrumTreeInstance Apple: TreeType=Deciduous; RowSpacing=10; InterRowSpacing=1; AlleyZoneWidthFrac=0.5; BudBreakDate=30-Aug; StartFullCanopyDate=24-Oct; StartLeafFallDate=22-Apr; EndLeafFallDate=17-May; DBHatMaturity=5; TypicalCanopyArea=10; WoodBulkDensity=650; WoodStorageFraction=0; MaximumLeafBiomass=500; MaximumRootBiomass=300; AgeAtSimulationStart=12; YearsToMaxDimension=12; CrownShape=0; MatureCanopyBaseHeight=1; MaturePrunedCanopyBaseHeight=1; MatureHeight=3.5; MaturePrunedHeight=3.2; MatureWidth=3; MaturePrunedWidth=2.6; FRemoveSummerPrune=0; RootNConc=0.01; LeafNConc=0.02; WoodNConc=0.005; FruitNConc=0.02; NFixationFrac=0; GRINZ=true; MaxRD=3; ExtinctCoeff=0.6; BaseCover=0; MaxCover=0.95; RUE=1.2; PSBaseT=5; PSLOptT=20; PSUOptT=25; PSMaxT=35; GSMax=0.006; R50=100; SurfaceKL=0.1; WaterStress=false; Number=50; PotentialFWPerFruit=70; DMC=0.14; FruitDensity=0.75; DateMaxBloom=1-oct; DAFStartLinearGrowth=30; DAFEndLinearGrowth=90; DAFMaxSize=150
          Manager AutomaticIrrigation: same as PatternTests.AgeNDimensions.Row.AutomaticIrrigation
          Manager AutomaticFertiliser: same as PatternTests.AgeNDimensions.Row.AutomaticFertiliser
        RectangularZone Alley: Length=100; Width=2.2; CanopyType=TreeRow; Slope=0; AspectAngle=0; Altitude=50
          Report BareAlleyZoneReport: EventNames=[Clock].DoReport
            VariableNames:
              [Clock].Today
              sum([Alley].Soil.OutputLayers.SWmm)
              [Alley].Soil.OutputLayers.SW
              [Alley].Irrigation.IrrigationApplied
              [Alley].Fertiliser.NitrogenApplied
              [Alley].Soil.SoilWater.Drainage
              [Alley].Soil.SoilWater.Evaporation
              [Alley].SurfaceOrganicMatter.N
              [Alley].SurfaceOrganicMatter.Wt
          SurfaceOrganicMatter: InitialResidueName=wheat_stubble; InitialResidueType=wheat; InitialResidueMass=500; InitialStandingFraction=0; InitialCPR=0; InitialCNR=100
          Fertiliser
          Irrigation
          Plant SPRUM
          Soil: Latitude=0; Longitude=0
            LayerStructure: Thickness=[200, 200, 200, 200, 200, 200, 300, 300, 400, 800]
            Chemical: same as PatternTests.AgeNDimensions.Row.Soil.Chemical
            Water: Thickness=[300, 300, 300, 300, 300, 300, 1200]; InitialValues=[0.35, 0.35, 0.3, 0.21, 0.21, 0.21, 0.21]; FilledFromTop=false
            WaterBalance SoilWater: same as PatternTests.AgeNDimensions.Row.Soil.SoilWater
            Organic: same as PatternTests.AgeNDimensions.Row.Soil.Organic
            OutputLayers: Thickness=[300, 300, 300, 300, 300, 300]
            Solute NO3: same as PatternTests.AgeNDimensions.Row.Soil.NO3
            Solute NH4: same as PatternTests.AgeNDimensions.Row.Soil.NH4
            Solute Urea: same as PatternTests.AgeNDimensions.Row.Soil.Urea
            Nutrient
            SoilTemperature Temperature: InteractionsPerDay=8
            Physical
              Thickness  ParticleSizeSand  ParticleSizeSilt  ParticleSizeClay  Rocks     BD  AirDry  LL15  DUL   SAT   KS
              300        5                 65                30                0.136527  1   0.2     0.3   0.35  0.5   100
              300        5                 65                30                0.136527  1   0.2     0.3   0.35  0.5   100
              300        5                 65                30                0.136527  1   0.25    0.25  0.3   0.5   50
              300        5                 65                30                0.136527  1   0.2     0.2   0.21  0.5   40
              300        5                 65                30                0.136527  1   0.2     0.2   0.21  0.5   40
              300        5                 65                30                0         1   0.2     0.2   0.21  0.53  40
              1200       5                 65                30                0         1   0.2     0.2   0.21  0.53  40
              Rocks, ParticleSizeSand, ParticleSizeSilt, ParticleSizeClay source: Calculated
              SoilCrop STRUMSoil: LL=[0.3, 0.3, 0.25, 0.2, 0.2, 0.2, 0.2]; KL=[1, 1, 1, 1, 1, 1, 1]; XF=[1, 1, 1, 1, 1, 1, 1]
              SoilCrop SPRUMSoil: LL=[0.3, 0.3, 0.25, 0.2, 0.2, 0.2, 0.2]; KL=[0.11, 0.11, 0.11, 0.11, 0.11, 0.11, 0.11]; XF=[1, 1, 1, 1, 1, 1, 1]
    Experiment TwoZoneSizeRootsConfined
      Factors
        Factor: Specification=[Row].Avocado.AlleyZoneWidthFrac = 0.01,0.33,0.66,0.99
      Simulation BareUnderStory7
        Clock: Start=2000-06-21; End=2001-07-01
        Summary SummaryFile
        Weather: FileName=MetFiles/Whakatu.met
        MicroClimate: a_interception=0; b_interception=1; c_interception=0; d_interception=0; SoilHeatFluxFraction=0.4; MinimumHeightDiffForNewLayer=0; NightInterceptionFraction=0.5; ReferenceHeight=2
        SoilArbitrator Soil Arbitrator
        Manager AutoIrrigationDeficitBased
          AllowIrrigation = True
          depthPAWC = 1000
          triggerDeficit = 80
          irrigateAmount = 15
          returndays = 3
          IrrigateAlley = True
```csharp
using APSIM.Core;
using Models.Interfaces;
using System;
using Models.Core;
using Models.PMF;
using Models.Soils;
using System.Xml.Serialization;
using APSIM.Shared.Utilities;
using Newtonsoft.Json;

        
namespace Models
{
    [Serializable] 
    [System.Xml.Serialization.XmlInclude(typeof(Model))]
    public class Script : Model, IStructureDependency
    {
        [Link] private Clock Clock;
        [Link] private Zone patch;
        [Link] private ISummary summary;
        [Link] private Soil Soil;
        [Link(IsOptional = true)] private IPlant existingCrop;
        [Link] private IPhysical soilPhysical;
        [Link] private ISoilWater waterBalance;
        [Link(Type = LinkType.Scoped, ByName = true)] private Zone Row;
        [Link(Type = LinkType.Scoped, ByName = true)] private Zone Alley;
        private double TopDUL;
        private double TopLL;
        private int nLayers;
        public IStructure Structure { private get; set; }
        //[Link] private Irrigation Irrigation;
       
        // Parameters from user interface
        [Separator("Manager for controlling automatic irrigation")]
        [Description(" Allow this manager to control irrigation?")]
        public bool AllowIrrigation { get; set; }
      
        [Separator(" Parameters for the irrigation system")]
        [Description(" Depth to calculate PAWC and deficit (mm)")]
        public double depthPAWC { get; set; }
        [Description(" Deficit to trigger irrigations (% PAWC)")]
        public double triggerDeficit { get; set; }
        [Description(" Irrigation amount to apply each event (mm)")]
        public double irrigateAmount { get; set; }
        [Description(" Minimum days for irrigation to return")]
        public double returndays { get; set; }
        
        [Description("Is the Alley zone irrigated?")]
        public bool IrrigateAlley {get; set;}

        //Class members
        [JsonIgnore] public double IrrigLayerSWDeficit { get; set; }
        [JsonIgnore] public double TopSWC { get; set; }
        [JsonIgnore] public double DaysSinceIrrigation { get; set; }
        [JsonIgnore] public double AmountToApply { get; set; }
        [JsonIgnore] public double SeasonAppliedAmount { get; set; }
        
        private bool IrrigationIsAllowed { get; set; }
        private bool CropIsActive { get; set; }
        private bool IrrigatorIsAvailable { get; set; }
        private bool SoilIsDry { get; set; }

    
        //Calculate static soil variables

        

        [EventSubscribe("StartOfSimulation")]
        private void OnStartOfSimulation(object sender, EventArgs e)
        {
            
            //Can we irrigate at all?
            IrrigationIsAllowed = false; 
            if (AllowIrrigation)
                IrrigationIsAllowed = true; 

            //Calculate soil water variables
            double depthFromSurface = 0.0;
            double fracLayer = 0.0;
            nLayers = soilPhysical.Thickness.Length;
            for (int layer = 0; layer < nLayers; layer++)
            {
                fracLayer = Math.Min(1.0, (depthPAWC - depthFromSurface) / soilPhysical.Thickness[layer]);
                TopLL += soilPhysical.LL15mm[layer] * fracLayer;
                TopDUL += soilPhysical.DULmm[layer] * fracLayer;
                depthFromSurface += soilPhysical.Thickness[layer];
                if (depthFromSurface >= depthPAWC)
                    layer = nLayers;
            }
        }
             
        //Determine daily requirement for irrigation
        [EventSubscribe("StartOfDay")]
        private void OnStartOfDay(object sender, EventArgs e)
        {
            AmountToApply = 0.0;
            DaysSinceIrrigation += 1;

            //Is the row crop actively growing?
            CropIsActive = false;
            double StageCode = (double)Structure.Get("STRUM.Phenology.Stage", relativeTo: Row);
            if ((StageCode > 3.0) && (StageCode<5.0))
            {
                CropIsActive = true;
            }
          
            //Is the irrigator available?
            IrrigatorIsAvailable = false;
            if (DaysSinceIrrigation >= returndays)
                IrrigatorIsAvailable = true;
          
            //Is the soil dry enough to require irrigation?
            SoilIsDry = false;
            double depthFromSurface = 0.0;
            double fracLayer = 0.0;
            TopSWC = 0.0;
            for (int layer = 0; layer < nLayers; layer++)
            //for (int layer = 0; depthFromSurface < depthPAWC + soilPhysical.Thickness[layer]; layer++)
            {
                fracLayer = Math.Min(1.0, (depthPAWC - depthFromSurface) / soilPhysical.Thickness[layer]);
                TopSWC += waterBalance.SWmm[layer] * fracLayer;
                depthFromSurface += soilPhysical.Thickness[layer];
                if (depthFromSurface >= depthPAWC)
                    layer = nLayers;
            }
            
            IrrigLayerSWDeficit = TopSWC - TopDUL;
            if (Math.Max(0.0, -IrrigLayerSWDeficit) >= (TopDUL - TopLL) * (100 - triggerDeficit) / 100)
                SoilIsDry = true;

            //Are all the conditions ratifying irrigation
            if (IrrigationIsAllowed && CropIsActive && IrrigatorIsAvailable && SoilIsDry)
            {
                //Lets irrigate well !!!!
                Irrigation irrigRow = (Irrigation)Structure.Get("Irrigation", relativeTo: Row);
                irrigRow.Apply(irrigateAmount, depth: 0);
                DaysSinceIrrigation = 0;
                if (IrrigateAlley)
                {
                   Irrigation irrigAlley = (Irrigation)Structure.Get("Irrigation", relativeTo: Alley);
                   irrigAlley.Apply(irrigateAmount , depth: 0);           
                }
            }
        }
    }
}
```
        Manager AutomaticFertiliser
          AllowFertiliser = yes
          Depth2SoilN = 1500
          CriticalSoilN = 30
          FertNAmount = 50
          FertType = UreaN
          FertApplicationDepth = 10
          FertMinimumDays = 15
```csharp
using APSIM.Core;
using System;
using Models.Core;
using Models.PMF;
using Models.Soils;
using APSIM.Shared.Utilities;
using System.Xml.Serialization;
using Models.Interfaces;
using Models.Soils.Nutrients;
using Newtonsoft.Json;

namespace Models
{
    [Serializable]
    public class Script : Model, IStructureDependency
    {
        [Link] private Clock Clock;
        [Link] private Fertiliser fertiliser;
        [Link] private ISummary summary;
        [Link] private Soil Soil;
        [Link(Type = LinkType.Scoped, ByName = true)] private Zone Row;
        private DateTime lastApplicationDate;
        private bool fertiliserIsAllowed;
        private int nLayers;
        [Link(ByName = true)]
        private ISolute NO3;
        [Link(ByName = true)]
        private ISolute NH4;
        [Link(ByName = true)]
        private ISolute Urea;
        [Link]
        private IPhysical soilPhysical;
        public IStructure Structure { private get; set; }

        //User inputs from properties tab
        [Description("Turn fertiliser applications on? ")]
        public yesnoType AllowFertiliser { get; set; }
        
        [Description("Depth to calculate available soil N (mm): ")]
        public double Depth2SoilN { get; set; }

        [Description("Minimum available N, triggers an application (kgN/ha): ")]
        public double CriticalSoilN { get; set; }

        [Description("Amount of N fertiliser for each application (kgN/ha): ")]
        public double FertNAmount { get; set; }

        [Description("Type of N fertiliser to apply: ")]
        [Display(Type = DisplayType.FertiliserType)]public string FertType { get; set; }

        [Description("Depth at which to apply the fertiliser (mm): ")]
        public double FertApplicationDepth { get; set; }
       
        [Description("Minimum period between applications (days): ")]
        public double FertMinimumDays { get; set; }
       
        public enum yesnoType
        {
            /// <summary>a positive answer</summary>
            yes,
            /// <summary>a negative answer</summary>
            no
        }

        [JsonIgnore] public double TopMineralN { get; set; }
        private bool CropIsActive { get; set; }
        


        

        [EventSubscribe("StartOfSimulation")]
        private void OnStartOfSimulation(object sender, EventArgs e)
        {
            fertiliserIsAllowed = (AllowFertiliser == yesnoType.yes);
            nLayers = soilPhysical.Thickness.Length;
        }

        [EventSubscribe("DoManagement")]
        private void OnDoManagement(object sender, EventArgs e)
        {
            double daysSinceLastApplication = (Clock.Today - lastApplicationDate).TotalDays;
            
            //Is the row crop actively growing?
            CropIsActive = false;
            double StageCode = (double)Structure.Get("STRUM.Phenology.Stage", relativeTo: Row);
            if ((StageCode > 3.0) && (StageCode<5.0))
            {
                CropIsActive = true;
            }
            
            // get the N stored in the soil
            double depthFromSurface = 0.0;
            double fracLayer = 0.0;
            TopMineralN = 0.0;
            for (int layer = 0; layer < nLayers; layer++)
            {
                fracLayer = Math.Min(1.0, (Depth2SoilN - depthFromSurface) / soilPhysical.Thickness[layer]);
                TopMineralN += (NO3.kgha[layer]
                + NH4.kgha[layer]
                + Urea.kgha[layer])
                * fracLayer;
                depthFromSurface += soilPhysical.Thickness[layer];
                if (depthFromSurface >= Depth2SoilN)
                    layer = nLayers;
            }

            if (fertiliserIsAllowed && CropIsActive && (daysSinceLastApplication >= FertMinimumDays) && (TopMineralN <= CriticalSoilN))
            {
                fertiliser.Apply(FertNAmount, FertType, FertApplicationDepth);
                lastApplicationDate = Clock.Today;
            }
        }
    }
}
```
        ZoneAgregate
        Report ZoneAgregateReport: same as PatternTests.TwoZoneCanopySize.DualZone2.ZoneAgregateReport
        RectangularZone Row: Length=100; Width=1.3; CanopyType=TreeRow; Slope=0; AspectAngle=0; Altitude=50
          Report RowZoneReport: EventNames=[Clock].DoReport
          SurfaceOrganicMatter: InitialResidueName=wheat_stubble; InitialResidueType=wheat; InitialResidueMass=500; InitialStandingFraction=0; InitialCPR=0; InitialCNR=100
          Fertiliser
          Irrigation
          Plant STRUM
          StrumTreeInstance Avocado: TreeType=Evergreen; RowSpacing=4; InterRowSpacing=1; AlleyZoneWidthFrac=0; BudBreakDate=10-Aug; StartFullCanopyDate=8-Mar; StartLeafFallDate=27-Apr; EndLeafFallDate=16-Jun; DBHatMaturity=20; TypicalCanopyArea=12; WoodBulkDensity=650; WoodStorageFraction=0; MaximumLeafBiomass=500; MaximumRootBiomass=300; AgeAtSimulationStart=10; YearsToMaxDimension=6; CrownShape=0; MatureCanopyBaseHeight=1; MaturePrunedCanopyBaseHeight=1; MatureHeight=3.5; MaturePrunedHeight=3; MatureWidth=3; MaturePrunedWidth=2; FRemoveSummerPrune=0; RootNConc=0.01; LeafNConc=0.02; WoodNConc=0.005; FruitNConc=0.02; NFixationFrac=0; GRINZ=false; MaxRD=3; ExtinctCoeff=0.5; BaseCover=0.85; MaxCover=0.96; RUE=0.9; PSBaseT=5; PSLOptT=20; PSUOptT=25; PSMaxT=35; GSMax=0.005; R50=200; SurfaceKL=0.1; WaterStress=true; Number=500; PotentialFWPerFruit=250; DMC=0.29; FruitDensity=0.43; DateMaxBloom=20-oct; DAFStartLinearGrowth=130; DAFEndLinearGrowth=340; DAFMaxSize=350
          Soil: same as PatternTests.TwoZoneCanopySize.DualZone2.Alley.Soil
        RectangularZone Alley: Length=100; Width=2.2; CanopyType=TreeRow; Slope=0; AspectAngle=0; Altitude=50
          Report BareAlleyZoneReport: EventNames=[Clock].DoReport
            VariableNames:
              [Clock].Today
              sum([Alley].Soil.OutputLayers.SWmm)
              [Alley].Soil.OutputLayers.SW
              [Alley].Irrigation.IrrigationApplied
              [Alley].Fertiliser.NitrogenApplied
              [Alley].Soil.SoilWater.Drainage
              [Alley].Soil.SoilWater.Evaporation
          SurfaceOrganicMatter: InitialResidueName=wheat_stubble; InitialResidueType=wheat; InitialResidueMass=500; InitialStandingFraction=0; InitialCPR=0; InitialCNR=100
          Fertiliser
          Irrigation
          Plant SPRUM
          Soil: same as PatternTests.TwoZoneCanopySize.DualZone2.Alley.Soil
    Experiment TotalWidth
      Factors
        Factor: Specification=[Row].Avocado.RowSpacing = 2,4
      Simulation BareUnderStory4
        Clock: Start=2000-06-21; End=2001-07-01
        Summary SummaryFile
        Weather: FileName=MetFiles/Whakatu.met
        MicroClimate: a_interception=0; b_interception=1; c_interception=0; d_interception=0; SoilHeatFluxFraction=0.4; MinimumHeightDiffForNewLayer=0; NightInterceptionFraction=0.5; ReferenceHeight=2
        SoilArbitrator Soil Arbitrator
        Manager AutoIrrigationDeficitBased: same as PatternTests.TwoZoneSizeRootsConfined.BareUnderStory7.AutoIrrigationDeficitBased
        Manager AutomaticFertiliser: same as PatternTests.TwoZoneSizeRootsConfined.BareUnderStory7.AutomaticFertiliser
        ZoneAgregate
        Report ZoneAgregateReport: same as PatternTests.TwoZoneCanopySize.DualZone2.ZoneAgregateReport
        RectangularZone Row: Length=100; Width=1.3; CanopyType=TreeRow; Slope=0; AspectAngle=0; Altitude=50
          Report RowZoneReport: EventNames=[Clock].DoReport
          Soil: same as PatternTests.TwoZoneCanopySize.DualZone2.Alley.Soil
          SurfaceOrganicMatter: InitialResidueName=wheat_stubble; InitialResidueType=wheat; InitialResidueMass=500; InitialStandingFraction=0; InitialCPR=0; InitialCNR=100
          Fertiliser
          Irrigation
          Plant STRUM
          StrumTreeInstance Avocado: TreeType=Deciduous; RowSpacing=2; InterRowSpacing=1; AlleyZoneWidthFrac=0.5; BudBreakDate=10-Aug; StartFullCanopyDate=8-Mar; StartLeafFallDate=27-Apr; EndLeafFallDate=16-Jun; DBHatMaturity=20; TypicalCanopyArea=5.6; WoodBulkDensity=650; WoodStorageFraction=0; MaximumLeafBiomass=500; MaximumRootBiomass=300; AgeAtSimulationStart=10; YearsToMaxDimension=6; CrownShape=0; MatureCanopyBaseHeight=1; MaturePrunedCanopyBaseHeight=1; MatureHeight=3.5; MaturePrunedHeight=3; MatureWidth=3; MaturePrunedWidth=2; FRemoveSummerPrune=0; RootNConc=0.01; LeafNConc=0.02; WoodNConc=0.005; FruitNConc=0.02; NFixationFrac=0; GRINZ=true; MaxRD=3; ExtinctCoeff=0.5; BaseCover=0.85; MaxCover=0.96; RUE=0.9; PSBaseT=5; PSLOptT=20; PSUOptT=25; PSMaxT=35; GSMax=0.005; R50=200; SurfaceKL=0.1; WaterStress=true; Number=500; PotentialFWPerFruit=250; DMC=0.29; FruitDensity=0.43; DateMaxBloom=20-oct; DAFStartLinearGrowth=130; DAFEndLinearGrowth=340; DAFMaxSize=350
        RectangularZone Alley: Length=100; Width=2.2; CanopyType=TreeRow; Slope=0; AspectAngle=0; Altitude=50
          Report BareAlleyZoneReport: EventNames=[Clock].DoReport
            VariableNames:
              [Clock].Today
              sum([Alley].Soil.OutputLayers.SWmm)
              [Alley].Soil.OutputLayers.SW
              [Alley].Irrigation.IrrigationApplied
              [Alley].Fertiliser.NitrogenApplied
              [Alley].Soil.SoilWater.Drainage
              [Alley].Soil.SoilWater.Evaporation
          Soil: Latitude=0; Longitude=0
            LayerStructure: Thickness=[200, 200, 200, 200, 200, 200, 300, 300, 400, 800]
            Chemical: same as PatternTests.AgeNDimensions.Row.Soil.Chemical
            Water: Thickness=[300, 300, 300, 300, 300, 300, 1200]; InitialValues=[0.35, 0.35, 0.3, 0.21, 0.21, 0.21, 0.21]; FilledFromTop=false
            WaterBalance SoilWater: same as PatternTests.AgeNDimensions.Row.Soil.SoilWater
            Organic: FOMCNRatio=30; CarbonUnits=Total
              Thickness  Carbon  SoilCNRatio  FBiom  FInert  FOM
              100        1.82    11.5         0.025  0.3     1243.93
              200        1.47    11.5         0.025  0.4     833.832
              300        1.2     11.5         0.015  0.75    457.617
              300        1.03    11.5         0.01   0.9     251.145
              300        0.47    11.5         0.01   0.96    137.831
              300        0.47    11.5         0.01   0.96    75.6435
            OutputLayers: Thickness=[300, 300, 300, 300, 300, 300]
            Solute NO3: same as PatternTests.AgeNDimensions.Row.Soil.NO3
            Solute NH4: same as PatternTests.AgeNDimensions.Row.Soil.NH4
            Solute Urea: same as PatternTests.AgeNDimensions.Row.Soil.Urea
            Physical: same as PatternTests.TwoZoneCanopySize.DualZone2.Alley.Soil.Physical
            Nutrient
            SoilTemperature Temperature: InteractionsPerDay=8
          SurfaceOrganicMatter: InitialResidueName=wheat_stubble; InitialResidueType=wheat; InitialResidueMass=500; InitialStandingFraction=0; InitialCPR=0; InitialCNR=100
          Fertiliser
          Irrigation
          Plant SPRUM
    Experiment RootInNeighoursZone
      Factors
        Factor: Specification=[Row].Avocado.GRINZ = true,false
      Simulation BareUnderStory3
        Clock: Start=2000-06-21; End=2001-07-01
        Summary SummaryFile
        Weather: FileName=MetFiles/Whakatu.met
        MicroClimate: a_interception=0; b_interception=1; c_interception=0; d_interception=0; SoilHeatFluxFraction=0.4; MinimumHeightDiffForNewLayer=0; NightInterceptionFraction=0.5; ReferenceHeight=2
        SoilArbitrator Soil Arbitrator
        Manager AutoIrrigationDeficitBased
          AllowIrrigation = False
          depthPAWC = 1000
          triggerDeficit = 80
          irrigateAmount = 15
          returndays = 3
          IrrigateAlley = True
          script: same as in PatternTests.TwoZoneSizeRootsConfined.BareUnderStory7.AutoIrrigationDeficitBased
        Manager AutomaticFertiliser: same as PatternTests.TwoZoneSizeRootsConfined.BareUnderStory7.AutomaticFertiliser
        ZoneAgregate
        Report ZoneAgregateReport: same as PatternTests.TwoZoneCanopySize.DualZone2.ZoneAgregateReport
        RectangularZone Row: Length=100; Width=1.3; CanopyType=TreeRow; Slope=0; AspectAngle=0; Altitude=50
          Report RowZoneReport: EventNames=[Clock].DoReport
          Soil: same as PatternTests.TwoZoneCanopySize.DualZone2.Alley.Soil
          SurfaceOrganicMatter: InitialResidueName=wheat_stubble; InitialResidueType=wheat; InitialResidueMass=500; InitialStandingFraction=0; InitialCPR=0; InitialCNR=100
          Fertiliser
          Irrigation
          Plant STRUM
          StrumTreeInstance Avocado: TreeType=Evergreen; RowSpacing=4; InterRowSpacing=1; AlleyZoneWidthFrac=0.5; BudBreakDate=10-Aug; StartFullCanopyDate=8-Mar; StartLeafFallDate=27-Apr; EndLeafFallDate=16-Jun; DBHatMaturity=20; TypicalCanopyArea=5.6; WoodBulkDensity=650; WoodStorageFraction=0; MaximumLeafBiomass=500; MaximumRootBiomass=300; AgeAtSimulationStart=10; YearsToMaxDimension=6; CrownShape=0; MatureCanopyBaseHeight=1; MaturePrunedCanopyBaseHeight=1; MatureHeight=3.5; MaturePrunedHeight=3; MatureWidth=3; MaturePrunedWidth=2; FRemoveSummerPrune=0; RootNConc=0.01; LeafNConc=0.02; WoodNConc=0.005; FruitNConc=0.02; NFixationFrac=0; GRINZ=true; MaxRD=3; ExtinctCoeff=0.5; BaseCover=0.85; MaxCover=0.96; RUE=0.9; PSBaseT=5; PSLOptT=20; PSUOptT=25; PSMaxT=35; GSMax=0.005; R50=200; SurfaceKL=0.1; WaterStress=false; Number=500; PotentialFWPerFruit=250; DMC=0.29; FruitDensity=0.43; DateMaxBloom=20-oct; DAFStartLinearGrowth=130; DAFEndLinearGrowth=340; DAFMaxSize=350
          BiomassRemovalEvents Pick: NameOfPlantToRemoveFrom=STRUM; RemovalType=0; RemovalDates=[1-may]
            BiomassRemovalFractions:
              PlantName  OrganName  TypeString  LiveToRemove  DeadToRemove  LiveToResidue  DeadToResidue
              STRUM      Root       Cutting     0             0             0              0
              STRUM      Leaf       Cutting     0             0             0.1            0
              STRUM      Wood       Cutting     0             0             0.05           0
              STRUM      Fruit      Cutting     0.75          0             0.1            0
          BiomassRemovalEvents Prune: NameOfPlantToRemoveFrom=STRUM; RemovalType=3
            BiomassRemovalFractions:
              PlantName  OrganName  TypeString  LiveToRemove  DeadToRemove  LiveToResidue  DeadToResidue
              STRUM      Root       Pruning     0             0             0              0
              STRUM      Leaf       Pruning     0             0             1              1
              STRUM      Wood       Pruning     0             0             0.15           1
              STRUM      Fruit      Pruning     0             0             1              1
        RectangularZone Alley: same as PatternTests.TotalWidth.BareUnderStory4.Alley
    Experiment SingleZoneRootSize
      Memo: same as PatternTests.SingleZoneCanopySize.Memo
      Factors
        Factor
          CompositeFactor 1m
            Specifications:
              [Row].Apple.MaturePrunedWidth = 1
              [Row].Apple.MatureWidth = 1
              [Row].Apple.RowSpacing = 1
          CompositeFactor 5m
            Specifications:
              [Row].Apple.MaturePrunedWidth = 5
              [Row].Apple.MatureWidth = 5
              [Row].Apple.RowSpacing = 5
          CompositeFactor 10m
            Specifications:
              [Row].Apple.MaturePrunedWidth = 10
              [Row].Apple.MatureWidth = 10
              [Row].Apple.RowSpacing = 10
      Simulation SingleZone1
        Clock: Start=2000-06-21; End=2011-07-01
        Summary SummaryFile
        Weather: FileName=MetFiles/Whakatu.met
        MicroClimate: a_interception=0; b_interception=1; c_interception=0; d_interception=0; SoilHeatFluxFraction=0.4; MinimumHeightDiffForNewLayer=0; NightInterceptionFraction=0.5; ReferenceHeight=2
        SoilArbitrator Soil Arbitrator
        RectangularZone Row: Length=100; Width=1.3; CanopyType=TreeRow; Slope=0; AspectAngle=0; Altitude=50
          Report RowZoneReport: EventNames=[Clock].DoReport
          Soil: same as PatternTests.AgeNDimensions.Row.Soil
          SurfaceOrganicMatter: InitialResidueName=wheat_stubble; InitialResidueType=wheat; InitialResidueMass=500; InitialStandingFraction=0; InitialCPR=0; InitialCNR=100
          Fertiliser
          Irrigation
          Plant STRUM
          StrumTreeInstance Apple: TreeType=Deciduous; RowSpacing=10; InterRowSpacing=1; AlleyZoneWidthFrac=0; BudBreakDate=30-Aug; StartFullCanopyDate=24-Oct; StartLeafFallDate=22-Apr; EndLeafFallDate=17-May; DBHatMaturity=20; TypicalCanopyArea=5.6; WoodBulkDensity=650; WoodStorageFraction=0; MaximumLeafBiomass=500; MaximumRootBiomass=300; AgeAtSimulationStart=12; YearsToMaxDimension=12; CrownShape=0; MatureCanopyBaseHeight=1; MaturePrunedCanopyBaseHeight=1; MatureHeight=3.5; MaturePrunedHeight=3; MatureWidth=3; MaturePrunedWidth=2; FRemoveSummerPrune=0; RootNConc=0.01; LeafNConc=0.02; WoodNConc=0.005; FruitNConc=0.02; NFixationFrac=0; GRINZ=true; MaxRD=3; ExtinctCoeff=0.6; BaseCover=0; MaxCover=0.95; RUE=1.2; PSBaseT=5; PSLOptT=20; PSUOptT=25; PSMaxT=35; GSMax=0.006; R50=100; SurfaceKL=0.1; WaterStress=false; Number=50; PotentialFWPerFruit=70; DMC=0.14; FruitDensity=0.75; DateMaxBloom=1-oct; DAFStartLinearGrowth=30; DAFEndLinearGrowth=90; DAFMaxSize=150
          Manager AutomaticIrrigation: same as PatternTests.AgeNDimensions.Row.AutomaticIrrigation
    Experiment TwoZoneInRowTreeSpacing
      Factors
        Factor: Specification=[Row].Peach.InterRowSpacing = 0.5, 1, 3, 5
      Simulation PeachII
        Clock: Start=2007-06-21; End=2011-07-01
        Summary SummaryFile
        Weather: FileName=MetFiles/Whakatu.met
        MicroClimate: a_interception=0; b_interception=1; c_interception=0; d_interception=0; SoilHeatFluxFraction=0.4; MinimumHeightDiffForNewLayer=0; NightInterceptionFraction=0.5; ReferenceHeight=2
        SoilArbitrator Soil Arbitrator
        ZoneAgregate
        Report ZoneAgregateReport: same as PatternTests.TwoZoneCanopySize.DualZone2.ZoneAgregateReport
        RectangularZone Row: Length=100; Width=1; CanopyType=TreeRow; Slope=0; AspectAngle=0; Altitude=50
          Report RowZoneReport: EventNames=[Clock].DoReport
          Report Drainage: EventNames=[Clock].DoReport
            VariableNames:
              [Clock].Today
              sum of [Soil].SoilWater.Flux[6] from 2009-01-21 to 2011-04-14 as drainage
          Soil: Latitude=0; Longitude=0
            LayerStructure: Thickness=[200, 200, 200, 200, 200, 200, 400, 400, 400, 600]
            Chemical: same as PatternTests.AgeNDimensions.Row.Soil.Chemical
            Water: Thickness=[400, 400, 400, 1800]; InitialValues=[0.38, 0.36, 0.42, 0.42]; FilledFromTop=false
            Physical
              Thickness  ParticleSizeSand  ParticleSizeSilt  ParticleSizeClay  Rocks     BD  AirDry  LL15  DUL   SAT
              400        5                 65                30                0.136527  1   0.009   0.18  0.38  0.5
              400        5                 65                30                0.171065  1   0.18    0.18  0.36  0.48
              400        5                 65                30                0         1   0.18    0.2   0.42  0.54
              1800       5                 65                30                0         1   0.2     0.2   0.42  0.54
              Rocks, ParticleSizeSand, ParticleSizeSilt, ParticleSizeClay source: Calculated
              SoilCrop STRUMSoil: LL=[0.18, 0.18, 0.2, 0.2]; KL=[1, 1, 1, 1]; XF=[1, 1, 1, 1]
              SoilCrop SPRUMSoil: LL=[0.18, 0.18, 0.2, 0.2]; KL=[0.11, 0.11, 0.11, 0.11]; XF=[1, 1, 1, 1]
            WaterBalance SoilWater: SummerDate=1-Nov; SummerU=9; SummerCona=4.4; WinterDate=1-Apr; WinterU=9; WinterCona=4.4; DiffusConst=88; DiffusSlope=35.4; Salb=0.3; CN2Bare=68; CNRed=20; CNCov=0.8; DischargeWidth=0; CatchmentArea=0; PSIDul=-100
              Thickness  SWCON  KLAT
              150        0.55   0
              150        0.55   0
              100        0.55   0
              200        0.55   0
              200        0.55   0
              200        0.55   0
              200        0.55   0
              200        0.55   0
              200        0.55   0
              200        0.55   0
              200        0.55   0
              200        0.55   0
              400        0.55   0
            Nutrient
            Organic: same as PatternTests.TotalWidth.BareUnderStory4.Alley.Soil.Organic
            OutputLayers: Thickness=[400, 400, 400]
            Solute NO3: same as PatternTests.AgeNDimensions.Row.Soil.NO3
            Solute NH4: same as PatternTests.AgeNDimensions.Row.Soil.NH4
            Solute Urea: same as PatternTests.AgeNDimensions.Row.Soil.Urea
            SoilTemperature Temperature: InteractionsPerDay=8
          SurfaceOrganicMatter: InitialResidueName=wheat_stubble; InitialResidueType=wheat; InitialResidueMass=500; InitialStandingFraction=0; InitialCPR=0; InitialCNR=100
          Irrigation
          Fertiliser
          Plant STRUM
          StrumTreeInstance Peach: TreeType=Evergreen; RowSpacing=5; InterRowSpacing=1; AlleyZoneWidthFrac=0.8; BudBreakDate=19-Sep; StartFullCanopyDate=8-Nov; StartLeafFallDate=12-Apr; EndLeafFallDate=17-May; DBHatMaturity=20; TypicalCanopyArea=5.6; WoodBulkDensity=650; WoodStorageFraction=0; MaximumLeafBiomass=500; MaximumRootBiomass=300; AgeAtSimulationStart=6; YearsToMaxDimension=6; CrownShape=0; MatureCanopyBaseHeight=1; MaturePrunedCanopyBaseHeight=1; MatureHeight=3.5; MaturePrunedHeight=3; MatureWidth=3; MaturePrunedWidth=2; FRemoveSummerPrune=0; RootNConc=0.01; LeafNConc=0.03; WoodNConc=0.005; FruitNConc=0.01; NFixationFrac=0; GRINZ=true; MaxRD=3; ExtinctCoeff=0.6; BaseCover=0; MaxCover=0.98; RUE=1; PSBaseT=5; PSLOptT=20; PSUOptT=25; PSMaxT=35; GSMax=0.005; R50=130; SurfaceKL=0.11; WaterStress=true; Number=10; PotentialFWPerFruit=200; DMC=0.16; FruitDensity=0.6; DateMaxBloom=1-Oct; DAFStartLinearGrowth=40; DAFEndLinearGrowth=150; DAFMaxSize=180
          Manager Automatic irrigation based on water deficit
            StartDate = 1-nov
            EndDate = 1-mar
            FASWThreshold = 0.6
            FASWDepth = 600
            Amount = 20
```csharp
using APSIM.Numerics;
using APSIM.Shared.Utilities;
using System.Xml.Serialization;
using Models;
using Models.PMF;
using Models.Soils;
using System.Text;
using System.Collections.Generic;
using Models.Core;
using System;
using Models.Interfaces;

namespace Models
{
    [Serializable] 
    public class Script : Model
    {
        [Link] private Zone zone;
        [Link] private Irrigation irrigation;
        [Link] private Soil soil;
        [Link] private Clock clock;
        [Link]
        private IPhysical soilPhysical;
        [Link]
        private ISoilWater waterBalance;
        public double FASW { get; set; }
        public double WaterDeficit  { get; set; }
    
        
        [Description("Start of sowing window (d-mmm)")]
        public string StartDate { get; set; }
        [Description("End of sowing window (d-mmm)")]
        public string EndDate { get; set; }

        [Description("Threshold fraction available water (0-1)")]
        public double FASWThreshold { get; set; }

        [Description("Soil depth (mm) to which fraction available water is calculated")]
        public double FASWDepth { get; set; }

        [Description("Amount of water (mm) applied each irrigation")]
        public double Amount { get; set; }

        [EventSubscribe("DoManagement")]
        private void OnDoManagement(object sender, EventArgs e)
        {
            CalculateFASW();
            if (DateUtilities.WithinDates(StartDate, clock.Today, EndDate))
            {
                if (FASW < FASWThreshold)
                {
                    irrigation.Apply(Amount, depth: 0);
                }
            }
        }
        
        private void CalculateFASW()
        {
            double[] LL15 = MathUtilities.Multiply(soilPhysical.LL15, soilPhysical.Thickness);
            double[] DUL = MathUtilities.Multiply(soilPhysical.DUL, soilPhysical.Thickness);
        
            int nlayr = GetLayerIndex();
            double cumdep = MathUtilities.Sum(soilPhysical.Thickness, 0, nlayr, 0.0);

            double excess_fr = MathUtilities.Divide((cumdep - FASWDepth), soilPhysical.Thickness[nlayr], 0.0);

            // note that results may be strange if swdep < ll15
            double avail_sw = (MathUtilities.Sum(waterBalance.SWmm, 0, nlayr, 0.0)
                              - excess_fr * waterBalance.SWmm[nlayr])
                              - (MathUtilities.Sum(LL15, 0, nlayr, 0.0)
                              - excess_fr * LL15[nlayr]);


            double pot_avail_sw = (MathUtilities.Sum(DUL, 0, nlayr, 0.0)
                                  - excess_fr * DUL[nlayr])
                                  - (MathUtilities.Sum(LL15, 0, nlayr, 0.0)
                                  - excess_fr * LL15[nlayr]);

            FASW = MathUtilities.Divide(avail_sw, pot_avail_sw, 0.0);
            WaterDeficit = MathUtilities.Constrain(pot_avail_sw - avail_sw, 0.0, 100000);
        }

        private int GetLayerIndex()
        {
            double[] cumThickness = soilPhysical.ThicknessCumulative;
            for (int i = 1; i < cumThickness.Length; i++)
            {
                if (FASWDepth < cumThickness[i])
                    return i - 1;
            }
            
            return cumThickness.Length - 1;
        }

    }
}
```
        RectangularZone Alley: Length=100; Width=4; CanopyType=TreeRow; Slope=0; AspectAngle=0; Altitude=50
          Report AlleyZoneReport: EventNames=[Clock].DoReport
          Report Drainage: EventNames=[Clock].DoReport
            VariableNames:
              [Clock].Today
              sum of [Soil].SoilWater.Flux[6] from 2009-01-21 to 2011-04-14 as drainage
          Soil: same as PatternTests.TwoZoneInRowTreeSpacing.PeachII.Row.Soil
          SurfaceOrganicMatter: InitialResidueName=wheat_stubble; InitialResidueType=wheat; InitialResidueMass=500; InitialStandingFraction=0; InitialCPR=0; InitialCNR=100
          Fertiliser
          Irrigation
          Plant SPRUM
          SprumPastureInstance BasePasture: AgeAtSimulationStart=1; YearsToMaxDimension=1; RUE=0.8; Presidue=0; RsenRate=0; Proot=0.1; PSBaseT=5; PSLOptT=20; PSUOptT=25; PSMaxT=35; GRINZ=true; MaxRD=700; MaxHeight=300; MaxPrunedHeight=100; MaxCover=0.98; MinCover=0.5; ExtinctCoeff=0.5; RegrowthDuration=400; FullCanopyDuration=0; BaseT=3; OptT=25; MaxT=35; RootNConc=0.01; LeafNConc=0.05; ResidueNConc=0.01; LegumePropn=0; GSMax=0.004; R50=150; SurfaceKL=0.1; WaterStress=true
          BiomassRemovalEvents Mow: NameOfPlantToRemoveFrom=SPRUM; RemovalType=0
            BiomassRemovalFractions:
              PlantName  OrganName  TypeString  LiveToRemove  DeadToRemove  LiveToResidue  DeadToResidue
              SPRUM      Residue    Cutting     0             0             0.5            0.5
              SPRUM      Leaf       Cutting     0             0             1              1
              SPRUM      Nodule     Cutting     0             0             0              0
              SPRUM      Root       Cutting     0             0             0              0
  Folder NZ AppleExperiments (disabled)
    Experiment Manawatu_1994
      Factors
        Permutation
          Factor
            CompositeFactor Control: Specifications=[IrrigationOperations]
              Operations IrrigationOperations
                1994-10-20  [Irrigation].Apply(5.12)
                1994-10-21  [Irrigation].Apply(5.12)
                1994-10-22  [Irrigation].Apply(5.12)
                1994-10-23  [Irrigation].Apply(5.12)
                1994-10-24  [Irrigation].Apply(5.12)
                1994-10-25  [Irrigation].Apply(5.12)
                1994-10-26  [Irrigation].Apply(5.12)
                1994-10-27  [Irrigation].Apply(5.12)
                1994-10-28  [Irrigation].Apply(5.12)
                1994-10-29  [Irrigation].Apply(5.12)
                1994-10-30  [Irrigation].Apply(5.12)
                1994-10-31  [Irrigation].Apply(5.12)
                1994-11-01  [Irrigation].Apply(5.12)
                1994-11-02  [Irrigation].Apply(5.12)
                1994-11-03  [Irrigation].Apply(5.12)
                1994-11-04  [Irrigation].Apply(5.12)
                1994-11-05  [Irrigation].Apply(5.12)
                1994-11-06  [Irrigation].Apply(5.12)
                1994-11-07  [Irrigation].Apply(5.12)
                1994-11-08  [Irrigation].Apply(5.12)
                1994-11-09  [Irrigation].Apply(5.12)
                1994-11-10  [Irrigation].Apply(5.12)
                1994-11-11  [Irrigation].Apply(5.12)
                1994-11-12  [Irrigation].Apply(5.12)
                1994-11-13  [Irrigation].Apply(5.12)
                1994-11-14  [Irrigation].Apply(5.12)
                1994-11-15  [Irrigation].Apply(5.12)
                1994-11-16  [Irrigation].Apply(5.12)
                1994-11-17  [Irrigation].Apply(5.12)
                1994-11-18  [Irrigation].Apply(5.12)
                1994-11-19  [Irrigation].Apply(5.12)
                1994-11-20  [Irrigation].Apply(5.12)
                1994-11-21  [Irrigation].Apply(5.12)
                1994-11-22  [Irrigation].Apply(5.12)
                1994-11-23  [Irrigation].Apply(5.12)
                1994-11-24  [Irrigation].Apply(5.12)
                1994-11-25  [Irrigation].Apply(5.12)
                1994-11-26  [Irrigation].Apply(5.12)
                1994-11-27  [Irrigation].Apply(5.12)
                1994-11-28  [Irrigation].Apply(5.12)
                1994-11-29  [Irrigation].Apply(5.12)
                1994-11-30  [Irrigation].Apply(5.12)
                1994-12-01  [Irrigation].Apply(5.12)
                1994-12-02  [Irrigation].Apply(5.12)
                1994-12-03  [Irrigation].Apply(5.12)
                1994-12-04  [Irrigation].Apply(5.12)
                1994-12-05  [Irrigation].Apply(5.12)
                1994-12-06  [Irrigation].Apply(5.12)
                1994-12-07  [Irrigation].Apply(5.12)
                1994-12-08  [Irrigation].Apply(5.12)
                1994-12-09  [Irrigation].Apply(5.12)
                1994-12-10  [Irrigation].Apply(5.12)
                1994-12-11  [Irrigation].Apply(5.12)
                1994-12-12  [Irrigation].Apply(5.12)
                1994-12-13  [Irrigation].Apply(5.12)
                1994-12-14  [Irrigation].Apply(5.12)
                1994-12-15  [Irrigation].Apply(5.12)
                1994-12-16  [Irrigation].Apply(5.12)
                1994-12-17  [Irrigation].Apply(5.12)
                1994-12-18  [Irrigation].Apply(5.12)
                1994-12-19  [Irrigation].Apply(5.12)
                1994-12-20  [Irrigation].Apply(5.12)
                1994-12-21  [Irrigation].Apply(5.12)
                1994-12-22  [Irrigation].Apply(5.12)
                1994-12-23  [Irrigation].Apply(5.12)
                1994-12-24  [Irrigation].Apply(5.12)
                1994-12-25  [Irrigation].Apply(5.12)
                1994-12-26  [Irrigation].Apply(5.12)
                1994-12-27  [Irrigation].Apply(5.12)
                1994-12-28  [Irrigation].Apply(5.12)
                1994-12-29  [Irrigation].Apply(5.12)
                1994-12-30  [Irrigation].Apply(5.12)
                1994-12-31  [Irrigation].Apply(5.12)
                1995-01-01  [Irrigation].Apply(5.12)
                1995-01-02  [Irrigation].Apply(5.12)
                1995-01-03  [Irrigation].Apply(5.12)
                1995-01-04  [Irrigation].Apply(5.12)
                1995-01-05  [Irrigation].Apply(5.12)
                1995-01-06  [Irrigation].Apply(5.12)
                1995-01-07  [Irrigation].Apply(5.12)
                1995-01-08  [Irrigation].Apply(5.12)
                1995-01-09  [Irrigation].Apply(5.12)
                1995-01-10  [Irrigation].Apply(5.12)
                1995-01-11  [Irrigation].Apply(5.12)
                1995-01-12  [Irrigation].Apply(5.12)
                1995-01-13  [Irrigation].Apply(5.12)
                1995-01-14  [Irrigation].Apply(5.12)
                1995-01-15  [Irrigation].Apply(5.12)
                1995-01-16  [Irrigation].Apply(5.12)
                1995-01-17  [Irrigation].Apply(5.12)
                1995-01-18  [Irrigation].Apply(5.12)
                1995-01-19  [Irrigation].Apply(5.12)
                1995-01-20  [Irrigation].Apply(5.12)
                1995-01-21  [Irrigation].Apply(5.12)
                1995-01-22  [Irrigation].Apply(5.12)
                1995-01-23  [Irrigation].Apply(5.12)
                1995-01-24  [Irrigation].Apply(5.12)
                1995-01-25  [Irrigation].Apply(5.12)
                1995-01-26  [Irrigation].Apply(5.12)
                1995-01-27  [Irrigation].Apply(5.12)
                1995-01-28  [Irrigation].Apply(5.12)
                1995-01-29  [Irrigation].Apply(5.12)
                1995-01-30  [Irrigation].Apply(5.12)
                1995-01-31  [Irrigation].Apply(5.12)
                1995-02-01  [Irrigation].Apply(5.12)
                1995-02-02  [Irrigation].Apply(5.12)
                1995-02-03  [Irrigation].Apply(5.12)
                1995-02-04  [Irrigation].Apply(5.12)
                1995-02-05  [Irrigation].Apply(5.12)
                1995-02-06  [Irrigation].Apply(5.12)
                1995-02-07  [Irrigation].Apply(5.12)
                1995-02-08  [Irrigation].Apply(5.12)
                1995-02-09  [Irrigation].Apply(5.12)
                1995-02-10  [Irrigation].Apply(5.12)
                1995-02-11  [Irrigation].Apply(5.12)
                1995-02-12  [Irrigation].Apply(5.12)
                1995-02-13  [Irrigation].Apply(5.12)
                1995-02-14  [Irrigation].Apply(5.12)
                1995-02-15  [Irrigation].Apply(5.12)
                1995-02-16  [Irrigation].Apply(5.12)
                1995-02-17  [Irrigation].Apply(5.12)
                1995-02-18  [Irrigation].Apply(5.12)
                1995-02-19  [Irrigation].Apply(5.12)
                1995-02-20  [Irrigation].Apply(5.12)
                1995-02-21  [Irrigation].Apply(5.12)
                1995-02-22  [Irrigation].Apply(5.12)
                1995-02-23  [Irrigation].Apply(5.12)
                1995-02-24  [Irrigation].Apply(5.12)
                1995-02-25  [Irrigation].Apply(5.12)
                1995-02-26  [Irrigation].Apply(5.12)
                1995-02-27  [Irrigation].Apply(5.12)
                1995-02-28  [Irrigation].Apply(5.12)
                1995-03-01  [Irrigation].Apply(5.12)
                1995-03-02  [Irrigation].Apply(5.12)
                1995-03-03  [Irrigation].Apply(5.12)
                1995-03-04  [Irrigation].Apply(5.12)
                1995-03-05  [Irrigation].Apply(5.12)
                1995-03-06  [Irrigation].Apply(5.12)
                1995-03-07  [Irrigation].Apply(5.12)
                1995-03-08  [Irrigation].Apply(5.12)
                1995-03-09  [Irrigation].Apply(5.12)
                1995-03-10  [Irrigation].Apply(5.12)
                1995-03-11  [Irrigation].Apply(5.12)
                1995-03-12  [Irrigation].Apply(5.12)
                1995-03-13  [Irrigation].Apply(5.12)
                1995-03-14  [Irrigation].Apply(5.12)
                1995-03-15  [Irrigation].Apply(5.12)
                1995-03-16  [Irrigation].Apply(5.12)
                1995-03-17  [Irrigation].Apply(5.12)
                1995-03-18  [Irrigation].Apply(5.12)
                1995-03-19  [Irrigation].Apply(5.12)
                1995-03-20  [Irrigation].Apply(5.12)
                1995-03-21  [Irrigation].Apply(5.12)
                1995-03-22  [Irrigation].Apply(5.12)
                1995-03-23  [Irrigation].Apply(5.12)
                1995-03-24  [Irrigation].Apply(5.12)
                1995-03-25  [Irrigation].Apply(5.12)
                1995-03-26  [Irrigation].Apply(5.12)
                1995-03-27  [Irrigation].Apply(5.12)
                1995-03-28  [Irrigation].Apply(5.12)
                1995-03-29  [Irrigation].Apply(5.12)
                1995-03-30  [Irrigation].Apply(5.12)
                1995-03-31  [Irrigation].Apply(5.12)
                1995-04-01  [Irrigation].Apply(5.12)
                1995-04-02  [Irrigation].Apply(5.12)
                1995-04-03  [Irrigation].Apply(5.12)
                1995-04-04  [Irrigation].Apply(5.12)
                1995-04-05  [Irrigation].Apply(5.12)
                1995-04-06  [Irrigation].Apply(5.12)
                1995-04-07  [Irrigation].Apply(5.12)
                1995-04-08  [Irrigation].Apply(5.12)
                1995-04-09  [Irrigation].Apply(5.12)
                1995-04-10  [Irrigation].Apply(5.12)
                1995-04-11  [Irrigation].Apply(5.12)
                1995-04-12  [Irrigation].Apply(5.12)
                1995-04-13  [Irrigation].Apply(5.12)
                1995-04-14  [Irrigation].Apply(5.12)
                1995-04-15  [Irrigation].Apply(5.12)
            CompositeFactor EarlyDeficit: Specifications=[IrrigationOperations]
              Operations IrrigationOperations
                1994-10-20  [Irrigation].Apply(5.12)
                1994-10-21  [Irrigation].Apply(5.12)
                1994-10-22  [Irrigation].Apply(5.12)
                1994-10-23  [Irrigation].Apply(5.12)
                1994-10-24  [Irrigation].Apply(5.12)
                1994-10-25  [Irrigation].Apply(5.12)
                1994-10-26  [Irrigation].Apply(5.12)
                1994-10-27  [Irrigation].Apply(5.12)
                1994-10-28  [Irrigation].Apply(5.12)
                1994-10-29  [Irrigation].Apply(5.12)
                1994-10-30  [Irrigation].Apply(5.12)
                1994-10-31  [Irrigation].Apply(5.12)
                1994-11-01  [Irrigation].Apply(5.12)
                1994-11-02  [Irrigation].Apply(5.12)
                1994-11-03  [Irrigation].Apply(5.12)
                1994-11-04  [Irrigation].Apply(5.12)
                1994-11-05  [Irrigation].Apply(5.12)
                1994-11-06  [Irrigation].Apply(5.12)
                1994-11-07  [Irrigation].Apply(5.12)
                1994-11-08  [Irrigation].Apply(5.12)
                1994-11-09  [Irrigation].Apply(5.12)
                1994-11-10  [Irrigation].Apply(5.12)
                1994-11-11  [Irrigation].Apply(5.12)
                1994-11-12  [Irrigation].Apply(5.12)
                1994-11-13  [Irrigation].Apply(5.12)
                1994-11-14  [Irrigation].Apply(5.12)
                1994-11-15  [Irrigation].Apply(5.12)
                1994-11-16  [Irrigation].Apply(5.12)
                1994-11-17  [Irrigation].Apply(5.12)
                1994-11-18  [Irrigation].Apply(5.12)
                1994-11-19  [Irrigation].Apply(5.12)
                1994-11-20  [Irrigation].Apply(5.12)
                1994-11-21  [Irrigation].Apply(5.12)
                1994-11-22  [Irrigation].Apply(5.12)
                1994-11-23  [Irrigation].Apply(5.12)
                1994-11-24  [Irrigation].Apply(5.12)
                1994-11-25  [Irrigation].Apply(5.12)
                1994-11-26  [Irrigation].Apply(5.12)
                1994-11-27  [Irrigation].Apply(5.12)
                1994-11-28  [Irrigation].Apply(5.12)
                1994-11-29  [Irrigation].Apply(5.12)
                1994-11-30  [Irrigation].Apply(5.12)
                1994-12-01  [Irrigation].Apply(5.12)
                1994-12-02  [Irrigation].Apply(5.12)
                1994-12-03  [Irrigation].Apply(5.12)
                1994-12-04  [Irrigation].Apply(5.12)
                1994-12-05  [Irrigation].Apply(5.12)
                1994-12-06  [Irrigation].Apply(5.12)
                1994-12-07  [Irrigation].Apply(5.12)
                1994-12-08  [Irrigation].Apply(5.12)
                1994-12-09  [Irrigation].Apply(5.12)
                1994-12-10  [Irrigation].Apply(5.12)
                1994-12-11  [Irrigation].Apply(5.12)
                1994-12-12  [Irrigation].Apply(5.12)
                1994-12-13  [Irrigation].Apply(5.12)
                1994-12-14  [Irrigation].Apply(2.56)
                1994-12-15  [Irrigation].Apply(2.56)
                1994-12-16  [Irrigation].Apply(2.56)
                1994-12-17  [Irrigation].Apply(2.56)
                1994-12-18  [Irrigation].Apply(2.56)
                1994-12-19  [Irrigation].Apply(2.56)
                1994-12-20  [Irrigation].Apply(2.56)
                1994-12-21  [Irrigation].Apply(2.56)
                1994-12-22  [Irrigation].Apply(2.56)
                1994-12-23  [Irrigation].Apply(2.56)
                1994-12-24  [Irrigation].Apply(2.56)
                1994-12-25  [Irrigation].Apply(2.56)
                1994-12-26  [Irrigation].Apply(2.56)
                1994-12-27  [Irrigation].Apply(2.56)
                1994-12-28  [Irrigation].Apply(2.56)
                1994-12-29  [Irrigation].Apply(2.56)
                1994-12-30  [Irrigation].Apply(2.56)
                1994-12-31  [Irrigation].Apply(2.56)
                1995-01-01  [Irrigation].Apply(2.56)
                1995-01-02  [Irrigation].Apply(2.56)
                1995-01-03  [Irrigation].Apply(2.56)
                1995-01-04  [Irrigation].Apply(2.56)
                1995-01-05  [Irrigation].Apply(2.56)
                1995-01-06  [Irrigation].Apply(2.56)
                1995-01-07  [Irrigation].Apply(2.56)
                1995-01-08  [Irrigation].Apply(2.56)
                1995-01-09  [Irrigation].Apply(2.56)
                1995-01-10  [Irrigation].Apply(2.56)
                1995-01-11  [Irrigation].Apply(2.56)
                1995-01-12  [Irrigation].Apply(2.56)
                1995-01-13  [Irrigation].Apply(2.56)
                1995-01-14  [Irrigation].Apply(2.56)
                1995-01-15  [Irrigation].Apply(2.56)
                1995-01-16  [Irrigation].Apply(2.56)
                1995-01-17  [Irrigation].Apply(2.56)
                1995-01-18  [Irrigation].Apply(2.56)
                1995-01-19  [Irrigation].Apply(2.56)
                1995-01-20  [Irrigation].Apply(2.56)
                1995-01-21  [Irrigation].Apply(2.56)
                1995-01-22  [Irrigation].Apply(2.56)
                1995-01-23  [Irrigation].Apply(2.56)
                1995-01-24  [Irrigation].Apply(2.56)
                1995-01-25  [Irrigation].Apply(2.56)
                1995-01-26  [Irrigation].Apply(2.56)
                1995-01-27  [Irrigation].Apply(2.56)
                1995-01-28  [Irrigation].Apply(2.56)
                1995-01-29  [Irrigation].Apply(5.12)
                1995-01-30  [Irrigation].Apply(5.12)
                1995-01-31  [Irrigation].Apply(5.12)
                1995-02-01  [Irrigation].Apply(5.12)
                1995-02-02  [Irrigation].Apply(5.12)
                1995-02-03  [Irrigation].Apply(5.12)
                1995-02-04  [Irrigation].Apply(5.12)
                1995-02-05  [Irrigation].Apply(5.12)
                1995-02-06  [Irrigation].Apply(5.12)
                1995-02-07  [Irrigation].Apply(5.12)
                1995-02-08  [Irrigation].Apply(5.12)
                1995-02-09  [Irrigation].Apply(5.12)
                1995-02-10  [Irrigation].Apply(5.12)
                1995-02-11  [Irrigation].Apply(5.12)
                1995-02-12  [Irrigation].Apply(5.12)
                1995-02-13  [Irrigation].Apply(5.12)
                1995-02-14  [Irrigation].Apply(5.12)
                1995-02-15  [Irrigation].Apply(5.12)
                1995-02-16  [Irrigation].Apply(5.12)
                1995-02-17  [Irrigation].Apply(5.12)
                1995-02-18  [Irrigation].Apply(5.12)
                1995-02-19  [Irrigation].Apply(5.12)
                1995-02-20  [Irrigation].Apply(5.12)
                1995-02-21  [Irrigation].Apply(5.12)
                1995-02-22  [Irrigation].Apply(5.12)
                1995-02-23  [Irrigation].Apply(5.12)
                1995-02-24  [Irrigation].Apply(5.12)
                1995-02-25  [Irrigation].Apply(5.12)
                1995-02-26  [Irrigation].Apply(5.12)
                1995-02-27  [Irrigation].Apply(5.12)
                1995-02-28  [Irrigation].Apply(5.12)
                1995-03-01  [Irrigation].Apply(5.12)
                1995-03-02  [Irrigation].Apply(5.12)
                1995-03-03  [Irrigation].Apply(5.12)
                1995-03-04  [Irrigation].Apply(5.12)
                1995-03-05  [Irrigation].Apply(5.12)
                1995-03-06  [Irrigation].Apply(5.12)
                1995-03-07  [Irrigation].Apply(5.12)
                1995-03-08  [Irrigation].Apply(5.12)
                1995-03-09  [Irrigation].Apply(5.12)
                1995-03-10  [Irrigation].Apply(5.12)
                1995-03-11  [Irrigation].Apply(5.12)
                1995-03-12  [Irrigation].Apply(5.12)
                1995-03-13  [Irrigation].Apply(5.12)
                1995-03-14  [Irrigation].Apply(5.12)
                1995-03-15  [Irrigation].Apply(5.12)
                1995-03-16  [Irrigation].Apply(5.12)
                1995-03-17  [Irrigation].Apply(5.12)
                1995-03-18  [Irrigation].Apply(5.12)
                1995-03-19  [Irrigation].Apply(5.12)
                1995-03-20  [Irrigation].Apply(5.12)
                1995-03-21  [Irrigation].Apply(5.12)
                1995-03-22  [Irrigation].Apply(5.12)
                1995-03-23  [Irrigation].Apply(5.12)
                1995-03-24  [Irrigation].Apply(5.12)
                1995-03-25  [Irrigation].Apply(5.12)
                1995-03-26  [Irrigation].Apply(5.12)
                1995-03-27  [Irrigation].Apply(5.12)
                1995-03-28  [Irrigation].Apply(5.12)
                1995-03-29  [Irrigation].Apply(5.12)
                1995-03-30  [Irrigation].Apply(5.12)
                1995-03-31  [Irrigation].Apply(5.12)
                1995-04-01  [Irrigation].Apply(5.12)
                1995-04-02  [Irrigation].Apply(5.12)
                1995-04-03  [Irrigation].Apply(5.12)
                1995-04-04  [Irrigation].Apply(5.12)
                1995-04-05  [Irrigation].Apply(5.12)
                1995-04-06  [Irrigation].Apply(5.12)
                1995-04-07  [Irrigation].Apply(5.12)
                1995-04-08  [Irrigation].Apply(5.12)
                1995-04-09  [Irrigation].Apply(5.12)
                1995-04-10  [Irrigation].Apply(5.12)
                1995-04-11  [Irrigation].Apply(5.12)
                1995-04-12  [Irrigation].Apply(5.12)
                1995-04-13  [Irrigation].Apply(5.12)
                1995-04-14  [Irrigation].Apply(5.12)
                1995-04-15  [Irrigation].Apply(5.12)
            CompositeFactor LateDeficit: Specifications=[IrrigationOperations]
              Operations IrrigationOperations
                1994-10-20  [Irrigation].Apply(5.12)
                1994-10-21  [Irrigation].Apply(5.12)
                1994-10-22  [Irrigation].Apply(5.12)
                1994-10-23  [Irrigation].Apply(5.12)
                1994-10-24  [Irrigation].Apply(5.12)
                1994-10-25  [Irrigation].Apply(5.12)
                1994-10-26  [Irrigation].Apply(5.12)
                1994-10-27  [Irrigation].Apply(5.12)
                1994-10-28  [Irrigation].Apply(5.12)
                1994-10-29  [Irrigation].Apply(5.12)
                1994-10-30  [Irrigation].Apply(5.12)
                1994-10-31  [Irrigation].Apply(5.12)
                1994-11-01  [Irrigation].Apply(5.12)
                1994-11-02  [Irrigation].Apply(5.12)
                1994-11-03  [Irrigation].Apply(5.12)
                1994-11-04  [Irrigation].Apply(5.12)
                1994-11-05  [Irrigation].Apply(5.12)
                1994-11-06  [Irrigation].Apply(5.12)
                1994-11-07  [Irrigation].Apply(5.12)
                1994-11-08  [Irrigation].Apply(5.12)
                1994-11-09  [Irrigation].Apply(5.12)
                1994-11-10  [Irrigation].Apply(5.12)
                1994-11-11  [Irrigation].Apply(5.12)
                1994-11-12  [Irrigation].Apply(5.12)
                1994-11-13  [Irrigation].Apply(5.12)
                1994-11-14  [Irrigation].Apply(5.12)
                1994-11-15  [Irrigation].Apply(5.12)
                1994-11-16  [Irrigation].Apply(5.12)
                1994-11-17  [Irrigation].Apply(5.12)
                1994-11-18  [Irrigation].Apply(5.12)
                1994-11-19  [Irrigation].Apply(5.12)
                1994-11-20  [Irrigation].Apply(5.12)
                1994-11-21  [Irrigation].Apply(5.12)
                1994-11-22  [Irrigation].Apply(5.12)
                1994-11-23  [Irrigation].Apply(5.12)
                1994-11-24  [Irrigation].Apply(5.12)
                1994-11-25  [Irrigation].Apply(5.12)
                1994-11-26  [Irrigation].Apply(5.12)
                1994-11-27  [Irrigation].Apply(5.12)
                1994-11-28  [Irrigation].Apply(5.12)
                1994-11-29  [Irrigation].Apply(5.12)
                1994-11-30  [Irrigation].Apply(5.12)
                1994-12-01  [Irrigation].Apply(5.12)
                1994-12-02  [Irrigation].Apply(5.12)
                1994-12-03  [Irrigation].Apply(5.12)
                1994-12-04  [Irrigation].Apply(5.12)
                1994-12-05  [Irrigation].Apply(5.12)
                1994-12-06  [Irrigation].Apply(5.12)
                1994-12-07  [Irrigation].Apply(5.12)
                1994-12-08  [Irrigation].Apply(5.12)
                1994-12-09  [Irrigation].Apply(5.12)
                1994-12-10  [Irrigation].Apply(5.12)
                1994-12-11  [Irrigation].Apply(5.12)
                1994-12-12  [Irrigation].Apply(5.12)
                1994-12-13  [Irrigation].Apply(5.12)
                1994-12-14  [Irrigation].Apply(5.12)
                1994-12-15  [Irrigation].Apply(5.12)
                1994-12-16  [Irrigation].Apply(5.12)
                1994-12-17  [Irrigation].Apply(5.12)
                1994-12-18  [Irrigation].Apply(5.12)
                1994-12-19  [Irrigation].Apply(5.12)
                1994-12-20  [Irrigation].Apply(5.12)
                1994-12-21  [Irrigation].Apply(5.12)
                1994-12-22  [Irrigation].Apply(5.12)
                1994-12-23  [Irrigation].Apply(5.12)
                1994-12-24  [Irrigation].Apply(5.12)
                1994-12-25  [Irrigation].Apply(5.12)
                1994-12-26  [Irrigation].Apply(5.12)
                1994-12-27  [Irrigation].Apply(5.12)
                1994-12-28  [Irrigation].Apply(5.12)
                1994-12-29  [Irrigation].Apply(5.12)
                1994-12-30  [Irrigation].Apply(5.12)
                1994-12-31  [Irrigation].Apply(5.12)
                1995-01-01  [Irrigation].Apply(5.12)
                1995-01-02  [Irrigation].Apply(5.12)
                1995-01-03  [Irrigation].Apply(5.12)
                1995-01-04  [Irrigation].Apply(5.12)
                1995-01-05  [Irrigation].Apply(5.12)
                1995-01-06  [Irrigation].Apply(5.12)
                1995-01-07  [Irrigation].Apply(5.12)
                1995-01-08  [Irrigation].Apply(5.12)
                1995-01-09  [Irrigation].Apply(5.12)
                1995-01-10  [Irrigation].Apply(5.12)
                1995-01-11  [Irrigation].Apply(5.12)
                1995-01-12  [Irrigation].Apply(5.12)
                1995-01-13  [Irrigation].Apply(5.12)
                1995-01-14  [Irrigation].Apply(5.12)
                1995-01-15  [Irrigation].Apply(5.12)
                1995-01-16  [Irrigation].Apply(5.12)
                1995-01-17  [Irrigation].Apply(5.12)
                1995-01-18  [Irrigation].Apply(5.12)
                1995-01-19  [Irrigation].Apply(5.12)
                1995-01-20  [Irrigation].Apply(5.12)
                1995-01-21  [Irrigation].Apply(5.12)
                1995-01-22  [Irrigation].Apply(5.12)
                1995-01-23  [Irrigation].Apply(5.12)
                1995-01-24  [Irrigation].Apply(5.12)
                1995-01-25  [Irrigation].Apply(5.12)
                1995-01-26  [Irrigation].Apply(5.12)
                1995-01-27  [Irrigation].Apply(5.12)
                1995-01-28  [Irrigation].Apply(5.12)
                1995-01-29  [Irrigation].Apply(5.12)
                1995-01-30  [Irrigation].Apply(5.12)
                1995-01-31  [Irrigation].Apply(5.12)
                1995-02-01  [Irrigation].Apply(5.12)
                1995-02-02  [Irrigation].Apply(5.12)
                1995-02-03  [Irrigation].Apply(2.56)
                1995-02-04  [Irrigation].Apply(2.56)
                1995-02-05  [Irrigation].Apply(2.56)
                1995-02-06  [Irrigation].Apply(2.56)
                1995-02-07  [Irrigation].Apply(2.56)
                1995-02-08  [Irrigation].Apply(2.56)
                1995-02-09  [Irrigation].Apply(2.56)
                1995-02-10  [Irrigation].Apply(2.56)
                1995-02-11  [Irrigation].Apply(2.56)
                1995-02-12  [Irrigation].Apply(2.56)
                1995-02-13  [Irrigation].Apply(2.56)
                1995-02-14  [Irrigation].Apply(2.56)
                1995-02-15  [Irrigation].Apply(2.56)
                1995-02-16  [Irrigation].Apply(2.56)
                1995-02-17  [Irrigation].Apply(2.56)
                1995-02-18  [Irrigation].Apply(2.56)
                1995-02-19  [Irrigation].Apply(2.56)
                1995-02-20  [Irrigation].Apply(2.56)
                1995-02-21  [Irrigation].Apply(2.56)
                1995-02-22  [Irrigation].Apply(2.56)
                1995-02-23  [Irrigation].Apply(2.56)
                1995-02-24  [Irrigation].Apply(2.56)
                1995-02-25  [Irrigation].Apply(2.56)
                1995-02-26  [Irrigation].Apply(2.56)
                1995-02-27  [Irrigation].Apply(2.56)
                1995-02-28  [Irrigation].Apply(2.56)
                1995-03-01  [Irrigation].Apply(2.56)
                1995-03-02  [Irrigation].Apply(2.56)
                1995-03-03  [Irrigation].Apply(2.56)
                1995-03-04  [Irrigation].Apply(2.56)
                1995-03-05  [Irrigation].Apply(2.56)
                1995-03-06  [Irrigation].Apply(2.56)
                1995-03-07  [Irrigation].Apply(2.56)
                1995-03-08  [Irrigation].Apply(2.56)
                1995-03-09  [Irrigation].Apply(2.56)
                1995-03-10  [Irrigation].Apply(2.56)
                1995-03-11  [Irrigation].Apply(2.56)
                1995-03-12  [Irrigation].Apply(2.56)
                1995-03-13  [Irrigation].Apply(2.56)
                1995-03-14  [Irrigation].Apply(2.56)
                1995-03-15  [Irrigation].Apply(2.56)
                1995-03-16  [Irrigation].Apply(2.56)
                1995-03-17  [Irrigation].Apply(2.56)
                1995-03-18  [Irrigation].Apply(2.56)
                1995-03-19  [Irrigation].Apply(2.56)
                1995-03-20  [Irrigation].Apply(2.56)
                1995-03-21  [Irrigation].Apply(2.56)
                1995-03-22  [Irrigation].Apply(2.56)
                1995-03-23  [Irrigation].Apply(2.56)
                1995-03-24  [Irrigation].Apply(2.56)
                1995-03-25  [Irrigation].Apply(2.56)
                1995-03-26  [Irrigation].Apply(2.56)
                1995-03-27  [Irrigation].Apply(2.56)
                1995-03-28  [Irrigation].Apply(2.56)
                1995-03-29  [Irrigation].Apply(2.56)
                1995-03-30  [Irrigation].Apply(2.56)
                1995-03-31  [Irrigation].Apply(2.56)
                1995-04-01  [Irrigation].Apply(2.56)
                1995-04-02  [Irrigation].Apply(2.56)
                1995-04-03  [Irrigation].Apply(2.56)
                1995-04-04  [Irrigation].Apply(2.56)
                1995-04-05  [Irrigation].Apply(2.56)
                1995-04-06  [Irrigation].Apply(2.56)
                1995-04-07  [Irrigation].Apply(2.56)
                1995-04-08  [Irrigation].Apply(2.56)
                1995-04-09  [Irrigation].Apply(2.56)
                1995-04-10  [Irrigation].Apply(2.56)
                1995-04-11  [Irrigation].Apply(2.56)
                1995-04-12  [Irrigation].Apply(2.56)
                1995-04-13  [Irrigation].Apply(2.56)
                1995-04-14  [Irrigation].Apply(2.56)
                1995-04-15  [Irrigation].Apply(2.56)
      Simulation Manawatu_94
        Memo Experiment description
          *	Based on Mills et al (1997).

          *	Lysimeter (1.2 m deep by 1 m wide) trial conducted during the 1994/95 season.

          *	Location: Massey University, Palmerston North (40°2'S, 175°4'E.

          *	Soil: Manawatu fine sandy loam.

          *	Plant material: 4-year-old 'Braeburn' on MM106 rootstock

          *	Date of full bloom (DAF): 20/10/1994

          *	Three irrigation regimes: Control, Early Deficit, Late Deficit
        Clock: Start=1994-06-21; End=1995-04-09
        Summary SummaryFile
        Weather: FileName=MetFiles/PalmerstonNorth-Turitea.met
        MicroClimate: a_interception=0; b_interception=1; c_interception=0; d_interception=0; SoilHeatFluxFraction=0.4; MinimumHeightDiffForNewLayer=0; NightInterceptionFraction=0.5; ReferenceHeight=2
        SoilArbitrator Soil Arbitrator
        RectangularZone Row: Length=1; Width=1; CanopyType=TreeRow; Slope=0; AspectAngle=0; Altitude=50
          Report RowZoneReport
          SurfaceOrganicMatter: InitialResidueName=wheat_stubble; InitialResidueType=wheat; InitialResidueMass=500; InitialStandingFraction=0; InitialCPR=0; InitialCNR=100
          Fertiliser
          Irrigation
          Manager ClimateControl
            StartDate = 1-jan
            EndDate = 31-dec
```csharp
using Models.Soils;
using System.Xml.Serialization;
using Models;
using Models.PMF;
using System.Text;
using System.Collections.Generic;
using APSIM.Shared.Utilities;
using Models.Core;
using System;
using Models.Climate;

namespace Models
{
    [Serializable] 
    [System.Xml.Serialization.XmlInclude(typeof(Model))]
    public class Script : Model
    {
        [Link] Weather Met;
        [Link] Clock Clock;
    
        [Description("Start Date (d-mmm)")]
        public string StartDate { get; set; }
        
        [Description("End Date (d-mmm)")]
        public string EndDate { get; set; }
 
    
        [EventSubscribe("PreparingNewWeatherData")]
        private void OnPreparingNewWeatherData(object sender, EventArgs e)
        {
            if (DateUtilities.WithinDates(StartDate, Clock.Today, EndDate))
                Met.Rain = 0;        
        }
    }
}
```
          Operations IrrigationOperations
            1986-06-01  [Irrigation].Apply(70);
            1986-06-15  [Irrigation].Apply(70);
            1986-06-29  [Irrigation].Apply(70);
            1986-07-13  [Irrigation].Apply(70);
            1986-07-27  [Irrigation].Apply(70);
            1986-08-10  [Irrigation].Apply(70);
            1986-08-24  [Irrigation].Apply(70);
            1986-09-07  [Irrigation].Apply(70);
          Operations NitrogenOperations
            1993-09-15  [Fertiliser].Apply(25, "UreaN", 10);
            1993-11-15  [Fertiliser].Apply(25, "UreaN", 10);
            1994-02-15  [Fertiliser].Apply(50, "UreaN", 10);
          Soil: SoilType=Silt loam; LocalName=Tokomaru; Site=Massey University 1; NearestTown=Palmerston North, Massey University 1; Region=Manawatu; Country=New Zealand; ApsoilNumber=1365; Latitude=-40.395; Longitude=175.609; LocationAccuracy=+/-50 m; YearOfSampling=2010
            DataSource=The database of New Zealand soils was compiled by AgResearch (www.agresearch.co.nz) and based on soil properties gathered, mainly from publications, in the course of conducting several simulation-based research projects but particularly from the Pastoral 21 Environment program which was funded by the New Zealand Ministry for Business, Innovation and Employment,  Dairy NZ, Fonterra and Meat & Wool NZ.
            Comments=Lowered BD value in layer 5 to make run in APSIM. Original values in rb column.The data is a combination of published or supplied measurements, pedotransfer functions, and expert opinion. See Cichota et al. (2013; Soil Research 51: 92-111, http://dx.doi.org/10.1071/SR12338) for a description of the pedotransfer functions. The soil carbon and fresh organic matter settings have been set as those broadly appropriate for permanent productive pastoral systems, see Cichota el al. (2012; Soil Research 50: 694-707, http://dx.doi.org/10.1071/SR12208). Users should take care to adapt these to local conditions before using the data in simulations. FOM values estimated to be 900 kg/ha of FOM in top 600mm of soil and another 100 kg/ha below. Soil C:N ratios taken from soil Silt loam (Marton NoXXXX).
            Physical
              Thickness  ParticleSizeSand  ParticleSizeSilt  ParticleSizeClay  Rocks  BD   AirDry  LL15  DUL   SAT  KS
              200        50                30                20                0      1.4  0.02    0.05  0.16  0.2  198.563
              200        50                30                20                0      1.4  0.05    0.05  0.16  0.2  231.474
              200        50                30                20                0      1.4  0.05    0.05  0.16  0.2  109.84
              400        70                20                10                0      1.4  0.05    0.05  0.16  0.2  1000
              200        95                5                 0                 0      1.4  0.05    0.05  0.16  0.2  500
              SAT source: Calculated from measured, estimated or calculated BD
              SoilCrop STRUMSoil: LL=[0.05, 0.05, 0.05, 0.05, 0.05]; KL=[1, 1, 1, 1, 1]; XF=[1, 1, 1, 1, 1]
            WaterBalance SoilWater: SummerDate=1-nov; SummerU=0; SummerCona=0; WinterDate=1-apr; WinterU=0; WinterCona=0; DiffusConst=88; DiffusSlope=35; Salb=1; CN2Bare=0; CNRed=20; CNCov=0.8; DischargeWidth=0; CatchmentArea=0; PSIDul=-100; Thickness=[100, 150, 200, 350, 700]; SWCON=[0.57, 0.9, 0.9, 0.9, 0.9]
            Organic: FOMCNRatio=40; CarbonUnits=Total
              Thickness  Carbon  SoilCNRatio  FBiom  FInert  FOM
              100        4.5     11.026       0.08   0.47    58.943
              150        2       11.026       0.05   0.457   43.666
              200        0.75    11.026       0.008  0.77    29.27
              350        0.35    11.026       0.008  0.928   14.535
              700        0.1     11.026       0.008  0.982   3.584
            Chemical: PHUnits=Water
              Thickness  PH   CEC
              100        6.5  18.815
              150        6.5  13.19
              200        6.5  10.3775
              350        6.5  8.7175
              700        6.5  6.87429
              CEC source: Calculated
              PH source: Estimated based on local knowledge
            Water: Thickness=[200, 200, 200, 400, 200]; InitialValues=[0.14, 0.14, 0.14, 0.14, 0.14]; FilledFromTop=false
            Solute NO3: Thickness=[100, 150, 200, 350, 700]; InitialValues=[217, 15, 1.667, 1.667, 0]; InitialValuesUnits=ppm; WaterTableConcentration=0; D0=0; DepthConstant=0; MaxDepthSoluteAccessible=0; RunoffEffectivenessAtMovingSolute=0; MaxEffectiveRunoff=0
            Solute NH4: Thickness=[100, 150, 200, 350, 700]; InitialValues=[0, 0, 0, 0, 0]; InitialValuesUnits=ppm; WaterTableConcentration=0; D0=0; DepthConstant=0; MaxDepthSoluteAccessible=0; RunoffEffectivenessAtMovingSolute=0; MaxEffectiveRunoff=0
            Solute Urea: Thickness=[100, 150, 200, 350, 700]; InitialValues=[0, 0, 0, 0, 0]; InitialValuesUnits=kg/ha; WaterTableConcentration=0; D0=0; DepthConstant=0; MaxDepthSoluteAccessible=0; RunoffEffectivenessAtMovingSolute=0; MaxEffectiveRunoff=0
            OutputLayers: Thickness=[200, 200, 200, 200, 200, 200]
            LayerStructure: Thickness=[200, 200, 200, 200, 200, 200]
            Nutrient
            SoilTemperature CERESSoilTemperature: InteractionsPerDay=8
          Plant STRUM
          StrumTreeInstance Apple: TreeType=Deciduous; RowSpacing=0.78; InterRowSpacing=0.78; AlleyZoneWidthFrac=0; BudBreakDate=29-Sep; StartFullCanopyDate=18-Nov; StartLeafFallDate=22-Apr; EndLeafFallDate=17-May; DBHatMaturity=5; TypicalCanopyArea=3; WoodBulkDensity=650; WoodStorageFraction=0; MaximumLeafBiomass=500; MaximumRootBiomass=300; AgeAtSimulationStart=6; YearsToMaxDimension=6; CrownShape=0; MatureCanopyBaseHeight=1; MaturePrunedCanopyBaseHeight=1; MatureHeight=3.5; MaturePrunedHeight=3; MatureWidth=3; MaturePrunedWidth=2; FRemoveSummerPrune=0; RootNConc=0.01; LeafNConc=0.02; WoodNConc=0.005; FruitNConc=0.02; NFixationFrac=0; GRINZ=true; MaxRD=3; ExtinctCoeff=0.8; BaseCover=0; MaxCover=0.98; RUE=1.2; PSBaseT=5; PSLOptT=20; PSUOptT=25; PSMaxT=35; GSMax=0.006; R50=50; SurfaceKL=0.1; WaterStress=true; Number=30; PotentialFWPerFruit=220; DMC=0.16; FruitDensity=0.75; DateMaxBloom=1-Oct; DAFStartLinearGrowth=70; DAFEndLinearGrowth=180; DAFMaxSize=220
          Manager AutomaticFertiliser
            Fertilise = True
            Season_Start = 1-Aug
            Season_End = 30-Apr
            Season_Allocation = 100000
            TriggerN = 50
            NApplicationAmount = 25
            Return_days = 3
            Top_Depth = 300
            script: same as in PatternTests.AgeNDimensions.Row.AutomaticFertiliser
          Manager DAS
            DAS = 0
```csharp
using Models.Soils;
using System;
using Models.Core;
using System.Collections.Generic;
using System.Text;
using Models.PMF;
using Models;
using System.Xml.Serialization;
using APSIM.Shared.Utilities;
using System.Data;

namespace Models
{
    [Serializable] 
    //[System.Xml.Serialization.XmlInclude(typeof(Model))]
    public class Script : Model
    {
        
    
        
        
        [Description("Days after start")]
        public double DAS { get; set; }
        
         [EventSubscribe("StartOfSimulation")]
        private void DoStartOfSimulation(object sender, EventArgs e)
        {
            DAS = 0;
        }
        
        [EventSubscribe("DoReportCalculations")]
        private void OnDoReportCalculations(object sender, EventArgs e)
        {
            DAS += 1;
        }
    
    }
}
```
    Experiment Manawatu_1997
      Factors
        Permutation
          Factor
            CompositeFactor Control
              Specifications:
                [IrrigationOperations]
                [AutomaticIrrigation].Script.seasonEnd = 12-Feb
              Operations IrrigationOperations
                1998-02-15  [Irrigation].Apply(10)
                1998-02-17  [Irrigation].Apply(15)
                1998-02-19  [Irrigation].Apply(15)
                1998-02-21  [Irrigation].Apply(15)
                1998-02-24  [Irrigation].Apply(15)
                1998-02-26  [Irrigation].Apply(15)
                1998-03-01  [Irrigation].Apply(15)
                1998-03-05  [Irrigation].Apply(15)
                1998-03-08  [Irrigation].Apply(15)
                1998-03-11  [Irrigation].Apply(15)
                1998-03-13  [Irrigation].Apply(15)
                1998-03-15  [Irrigation].Apply(15)
                1998-03-19  [Irrigation].Apply(15)
                1998-03-21  [Irrigation].Apply(10)
                1998-03-23  [Irrigation].Apply(10)
                1998-03-26  [Irrigation].Apply(10)
                1998-03-28  [Irrigation].Apply(10)
                1998-03-30  [Irrigation].Apply(10)
                1998-04-02  [Irrigation].Apply(10)
                1998-04-05  [Irrigation].Apply(10)
                1998-04-08  [Irrigation].Apply(10)
                1998-04-10  [Irrigation].Apply(10)
                1998-04-15  [Irrigation].Apply(10)
                1998-04-17  [Irrigation].Apply(10)
            CompositeFactor Deficit
              Specifications:
                [IrrigationOperations]
                [AutomaticIrrigation].Script.seasonEnd = 12-Feb
              Operations IrrigationOperations
                1998-02-23  [Irrigation].Apply(15)
                1998-02-24  [Irrigation].Apply(15)
                1998-02-26  [Irrigation].Apply(5)
                1998-03-01  [Irrigation].Apply(5)
                1998-03-03  [Irrigation].Apply(15)
                1998-03-04  [Irrigation].Apply(5)
                1998-03-05  [Irrigation].Apply(5)
                1998-03-07  [Irrigation].Apply(15)
                1998-03-08  [Irrigation].Apply(5)
                1998-03-10  [Irrigation].Apply(15)
                1998-03-11  [Irrigation].Apply(5)
                1998-03-13  [Irrigation].Apply(5)
                1998-03-15  [Irrigation].Apply(5)
                1998-03-17  [Irrigation].Apply(15)
                1998-03-19  [Irrigation].Apply(5)
                1998-03-20  [Irrigation].Apply(15)
                1998-03-21  [Irrigation].Apply(3)
                1998-03-23  [Irrigation].Apply(3)
                1998-03-25  [Irrigation].Apply(15)
                1998-03-28  [Irrigation].Apply(3)
                1998-03-30  [Irrigation].Apply(3)
                1998-04-02  [Irrigation].Apply(10)
                1998-04-05  [Irrigation].Apply(10)
                1998-04-08  [Irrigation].Apply(10)
                1998-04-15  [Irrigation].Apply(10)
                1998-04-17  [Irrigation].Apply(10)
      Simulation Manawatu_97
        Memo Experiment description
          *	Based on Mpelasako et 2001.

          *	Lysimeter (1.2 m deep by 1 m wide) trial conducted during the 1997/98 season.

          *	Location: Massey University, Palmerston North (40°2'S, 175°4'E.

          *	Soil: Manawatu fine sandy loam.

          *	Plant material: 4-year-old 'Braeburn' on MM106 rootstock

          *	Full bloom assumed to be 20/10/1997 - date estimated to be similar to Mills et al (1997)
        Clock: Start=1997-06-21; End=1998-04-20
        Summary SummaryFile
        Weather: FileName=MetFiles/PalmerstonNorth-Turitea.met
        MicroClimate: a_interception=0; b_interception=1; c_interception=0; d_interception=0; SoilHeatFluxFraction=0.4; MinimumHeightDiffForNewLayer=0; NightInterceptionFraction=0.5; ReferenceHeight=2
        SoilArbitrator Soil Arbitrator
        RectangularZone Row: Length=1; Width=1; CanopyType=TreeRow; Slope=0; AspectAngle=0; Altitude=50
          Report RowZoneReport: EventNames=[Clock].DoReport
          SurfaceOrganicMatter: InitialResidueName=wheat_stubble; InitialResidueType=wheat; InitialResidueMass=500; InitialStandingFraction=0; InitialCPR=0; InitialCNR=100
          Fertiliser
          Irrigation
          Operations IrrigationOperations
          Manager AutomaticIrrigation
            allowIrrigation = True
            seasonStart = 10-Nov
            changeDate = 13-feb
            seasonEnd = 30-may
            seasonsAllocation = 10000
            triggerDeficit = 70
            targetDeficit = 80
            targetDeficit2 = 150
            returndays = 2
            maximumAmount = 15
            depthPAWC = 1200
```csharp
using Newtonsoft.Json;
using APSIM.Shared.Utilities;
using System.Xml.Serialization;
using Models.Soils;
using Models.PMF;
using Models.Core;
using System;
using System.Linq;
using Models.Interfaces;



        
namespace Models
{
    [Serializable] 
    [System.Xml.Serialization.XmlInclude(typeof(Model))]
    public class Script : Model
    {
        [Link] private ISummary summary;
        [Link] private Irrigation Irrigation;
        [Link] private Clock Clock;
        [Link] private Soil Soil;
        [Link(IsOptional = true)] private IPlant existingCrop;
        private DateTime StartDate;
        private DateTime EndDate;
        private DateTime ChangeDate;
        private double TopDUL;
        private double TopLL;
        private int nLayers;
        [Link]
        private IPhysical soilPhysical;
        [Link]
        private ISoilWater waterBalance;
        //Communication to other modules
       
        //User inputs from properties tab
        [Description("Turn irrigation on?")]
        public bool allowIrrigation { get; set; }
        [Description("Start of irrigation season (dd-MMM)")]
        public string seasonStart { get; set; }
        [Description("Change trigger date (dd-MMM)")]
        public string changeDate { get; set; }
        [Description("End of irrigation season (dd-MMM)")]
        public string seasonEnd { get; set; }
        [Description("Season allocation (mm)")]
        public double seasonsAllocation { get; set; }
        [Description("Deficit to trigger irrigation (% PAWC)")]
        public double triggerDeficit { get; set; }
        [Description("Deficit to stop irrigaton (% PAWC)")]
        public double targetDeficit { get; set; }
        [Description("Deficit to stop irrigaton after change date(% PAWC)")]
        public double targetDeficit2 { get; set; }
        [Description("Minimum days for irrigation to return")]
        public double returndays { get; set; }
        [Description("Maximum irrigation application (mm/day)")]
        public double maximumAmount { get; set; }
        [Description("Depth to calculate PAWC (mm)")]
        public double depthPAWC { get; set; }

        //Class members
        [JsonIgnore] public double TopSWdeficit { get; set; }
        [JsonIgnore] public double TopSWC { get; set; }
        [JsonIgnore] public double DaysSinceIrrigation { get; set; }
        [JsonIgnore] public double AmountToApply { get; set; }
        [JsonIgnore] public double SeasonAppliedAmount { get; set; }
        
        private bool IrrigationIsAllowed { get; set; }
        private bool SeasonIsOpen { get; set; }
        private bool CropIsActive { get; set; }
        private bool IrrigatorIsAvailable { get; set; }
        private bool SoilIsDry { get; set; }
        private double TargetDef {get;set;}

    
        //Calculate static soil variables
        [EventSubscribe("StartOfSimulation")]
        private void OnStartOfSimulation(object sender, EventArgs e)
        {   
            //Set the season dates
            StartDate = DateTime.Parse(seasonStart + "-" + Clock.Today.Year.ToString());
            EndDate = DateTime.Parse(seasonEnd + "-" + Clock.Today.Year.ToString());
            ChangeDate = DateTime.Parse(changeDate + "-" + Clock.Today.Year.ToString());
            
            //Can we irrigate at all?
            IrrigationIsAllowed = false; 
            if (allowIrrigation)
                IrrigationIsAllowed = true; 

            //Calculate soil water variables
            double depthFromSurface = 0.0;
            double fracLayer = 0.0;
            nLayers = soilPhysical.Thickness.Length;
            for (int layer = 0; layer < nLayers; layer++)
            {
                fracLayer = Math.Min(1.0, (depthPAWC - depthFromSurface) / soilPhysical.Thickness[layer]);
                TopLL += soilPhysical.LL15mm[layer] * fracLayer;
                TopDUL += soilPhysical.DULmm[layer] * fracLayer;
                depthFromSurface += soilPhysical.Thickness[layer];
                if (depthFromSurface >= depthPAWC)
                    layer = nLayers;
            }
        }
             
        //Determine daily requirement for irrigation
        [EventSubscribe("StartOfDay")]
        private void OnStartOfDay(object sender, EventArgs e)
        {
            //Can we irrigate today?          
            SeasonIsOpen = isBetween(Clock.Today, StartDate, EndDate);
            if (!SeasonIsOpen)
                SeasonAppliedAmount = 0;

            //Is there a crop in the ground that needs irrigation?
            CropIsActive = false;
            if ((existingCrop != null) && (existingCrop.IsAlive))
                CropIsActive = true;
            //if ((existingCrop.Phenology.Stage >= 3.0) && (existingCrop.Phenology.Stage < 6.0))
          
            //Is the irrigator available?
            IrrigatorIsAvailable = false;
            DaysSinceIrrigation += 1;
            if (DaysSinceIrrigation >= returndays)
                IrrigatorIsAvailable = true;
          
            //Is the soil dry enough to require irrigation?
            SoilIsDry = false;
            double depthFromSurface = 0.0;
            double fracLayer = 0.0;
            TopSWC = 0.0;
            for (int layer = 0; layer < nLayers; layer++)
            //for (int layer = 0; depthFromSurface < depthPAWC + soilPhysical.Thickness[layer]; layer++)
            {
                fracLayer = Math.Min(1.0, (depthPAWC - depthFromSurface) / soilPhysical.Thickness[layer]);
                TopSWC += waterBalance.SWmm[layer] * fracLayer;
                depthFromSurface += soilPhysical.Thickness[layer];
                if (depthFromSurface >= depthPAWC)
                    layer = nLayers;
            }
            
            TopSWdeficit = TopSWC - TopDUL;
            if (Math.Max(0.0, -TopSWdeficit) >= (TopDUL - TopLL) * (100 - triggerDeficit) / 100)
                SoilIsDry = true;
                
            if (isBetween(Clock.Today, StartDate, ChangeDate))
                TargetDef = targetDeficit;
            if (isBetween(Clock.Today, ChangeDate, EndDate))
                TargetDef = targetDeficit2;
            
            //Are all the conditions ratifying irrigation
            if (IrrigationIsAllowed && SeasonIsOpen && CropIsActive && IrrigatorIsAvailable && SoilIsDry)
            {
                //Lets bloody well irrigate then!!!!
                AmountToApply = TopDUL * TargetDef / 100 - TopSWC;
                AmountToApply = Math.Max(0.0, Math.Min(AmountToApply, seasonsAllocation - SeasonAppliedAmount));
                AmountToApply = Math.Min(AmountToApply,maximumAmount);
                Irrigation.Apply(AmountToApply);
                DaysSinceIrrigation = 0;
                SeasonAppliedAmount += AmountToApply;
            }
        }
        
        ///Checks whether theDate is between iniDate and endDate (non-year specific)
        private bool isBetween(DateTime theDay, DateTime iniDate, DateTime endDate)
        {
            bool result = false;
            if (iniDate.DayOfYear < endDate.DayOfYear)
            {
                // period is within one year, ex: summer in the northern hemisphere
                if ((theDay.DayOfYear >= iniDate.DayOfYear) && (theDay.DayOfYear <= endDate.DayOfYear))
                    result = true;
            }
            else
            {
                // period goes over the end of the year, ex: summer in the southern hemisphere
                if ((theDay.DayOfYear >= iniDate.DayOfYear) || (theDay.DayOfYear <= endDate.DayOfYear))
                    result = true;
            }
            
            return result;
        }
    }
}
```
          Soil: SoilType=Silt loam; LocalName=Tokomaru; Site=Massey University 1; NearestTown=Palmerston North, Massey University 1; Region=Manawatu; Country=New Zealand; ApsoilNumber=1365; Latitude=-40.395; Longitude=175.609; LocationAccuracy=+/-50 m; YearOfSampling=2010
            DataSource=The database of New Zealand soils was compiled by AgResearch (www.agresearch.co.nz) and based on soil properties gathered, mainly from publications, in the course of conducting several simulation-based research projects but particularly from the Pastoral 21 Environment program which was funded by the New Zealand Ministry for Business, Innovation and Employment,  Dairy NZ, Fonterra and Meat & Wool NZ.
            Comments=Lowered BD value in layer 5 to make run in APSIM. Original values in rb column.The data is a combination of published or supplied measurements, pedotransfer functions, and expert opinion. See Cichota et al. (2013; Soil Research 51: 92-111, http://dx.doi.org/10.1071/SR12338) for a description of the pedotransfer functions. The soil carbon and fresh organic matter settings have been set as those broadly appropriate for permanent productive pastoral systems, see Cichota el al. (2012; Soil Research 50: 694-707, http://dx.doi.org/10.1071/SR12208). Users should take care to adapt these to local conditions before using the data in simulations. FOM values estimated to be 900 kg/ha of FOM in top 600mm of soil and another 100 kg/ha below. Soil C:N ratios taken from soil Silt loam (Marton NoXXXX).
            Physical
              Thickness  ParticleSizeSand  ParticleSizeSilt  ParticleSizeClay  Rocks  BD   AirDry  LL15  DUL   SAT   KS
              200        50                30                20                0      1.4  0.02    0.05  0.18  0.25  198.563
              200        50                30                20                0      1.4  0.05    0.05  0.18  0.25  231.474
              200        50                30                20                0      1.4  0.05    0.05  0.18  0.25  109.84
              400        70                20                10                0      1.4  0.05    0.05  0.18  0.25  1000
              200        95                5                 0                 0      1.4  0.05    0.05  0.18  0.25  500
              SoilCrop STRUMSoil: LL=[0.05, 0.05, 0.05, 0.05, 0.05]; KL=[1, 1, 1, 1, 1]; XF=[1, 1, 1, 1, 1]
            WaterBalance SoilWater: SummerDate=1-nov; SummerU=0; SummerCona=0; WinterDate=1-apr; WinterU=0; WinterCona=0; DiffusConst=88; DiffusSlope=35; Salb=1; CN2Bare=0; CNRed=20; CNCov=0.8; PSIDul=-100; Thickness=[100, 150, 200, 350, 700]; SWCON=[0.57, 0.9, 0.9, 0.9, 0.9]
            Organic: same as NZ AppleExperiments.Manawatu_1994.Manawatu_94.Row.Soil.Organic
            Chemical: same as NZ AppleExperiments.Manawatu_1994.Manawatu_94.Row.Soil.Chemical
            Water: Thickness=[200, 200, 200, 400, 200]; InitialValues=[0.15, 0.15, 0.15, 0.15, 0.15]; FilledFromTop=false
            Solute NO3: same as NZ AppleExperiments.Manawatu_1994.Manawatu_94.Row.Soil.NO3
            Solute NH4: same as NZ AppleExperiments.Manawatu_1994.Manawatu_94.Row.Soil.NH4
            Solute Urea: same as NZ AppleExperiments.Manawatu_1994.Manawatu_94.Row.Soil.Urea
            OutputLayers: Thickness=[200, 200, 200, 200, 200, 200, 200]
            LayerStructure: Thickness=[200, 200, 200, 200, 200, 200]
            Nutrient
            SoilTemperature CERESSoilTemperature: InteractionsPerDay=8
          Manager ClimateControl
            StartDate = 20-oct
            EndDate = 15-apr
            script: same as in NZ AppleExperiments.Manawatu_1994.Manawatu_94.Row.ClimateControl
          Manager AutomaticFertiliser: same as NZ AppleExperiments.Manawatu_1994.Manawatu_94.Row.AutomaticFertiliser
          Manager DAS: same as NZ AppleExperiments.Manawatu_1994.Manawatu_94.Row.DAS
          StrumTreeInstance Apple: TreeType=Deciduous; RowSpacing=0.8; InterRowSpacing=0.8; AlleyZoneWidthFrac=0; BudBreakDate=30-Aug; StartFullCanopyDate=18-Nov; StartLeafFallDate=22-Apr; EndLeafFallDate=17-May; DBHatMaturity=5; TypicalCanopyArea=3; WoodBulkDensity=650; WoodStorageFraction=0; MaximumLeafBiomass=500; MaximumRootBiomass=300; AgeAtSimulationStart=6; YearsToMaxDimension=6; CrownShape=0; MatureCanopyBaseHeight=1; MaturePrunedCanopyBaseHeight=1; MatureHeight=3.5; MaturePrunedHeight=3; MatureWidth=3; MaturePrunedWidth=2; FRemoveSummerPrune=0; RootNConc=0.01; LeafNConc=0.02; WoodNConc=0.005; FruitNConc=0.02; NFixationFrac=0; GRINZ=true; MaxRD=3; ExtinctCoeff=0.8; BaseCover=0; MaxCover=0.98; RUE=1.2; PSBaseT=5; PSLOptT=20; PSUOptT=25; PSMaxT=35; GSMax=0.006; R50=50; SurfaceKL=0.1; WaterStress=true; Number=50; PotentialFWPerFruit=70; DMC=0.16; FruitDensity=0.75; DateMaxBloom=1-Oct; DAFStartLinearGrowth=30; DAFEndLinearGrowth=90; DAFMaxSize=150
          Plant STRUM
    Simulation Apple_Dwarf
      Memo ExperimentDescription
        *	Based on Green et al 2013 - PFR report for the Hawkes Bay Regional Council

        * 	Location: Hastings, NZ

        *	Cultivar: Pink Lady

        *	Transpiration measured using sap flow sensors.
      Clock: Start=2008-06-21; End=2011-07-01
      Summary SummaryFile
      Weather: FileName=MetFiles/Whakatu.met
      MicroClimate: a_interception=0; b_interception=1; c_interception=0; d_interception=0; SoilHeatFluxFraction=0.4; MinimumHeightDiffForNewLayer=0; NightInterceptionFraction=0.5; ReferenceHeight=2
      SoilArbitrator Soil Arbitrator
      ZoneAgregate
      Report ZoneAgregateReport: same as PatternTests.TwoZoneCanopySize.DualZone2.ZoneAgregateReport
      RectangularZone Row: Length=100; Width=1.3; Slope=0; AspectAngle=0; Altitude=50
        Report RowZoneReport: EventNames=[Clock].DoReport
        Report Drainage: EventNames=[Clock].DoReport
          VariableNames:
            [Clock].Today
            sum of [Soil].SoilWater.Flux[6] from 2008-10-01 to 2011-03-08 as drainage
            [Soil].Water.MM[9] + [Soil].Water.MM[10] as SW_belowRoots
        Soil: Latitude=0; Longitude=0
          LayerStructure: Thickness=[200, 200, 200, 200, 200, 200, 300, 300, 400, 800]
          Chemical: same as PatternTests.AgeNDimensions.Row.Soil.Chemical
          Water: Thickness=[300, 300, 300, 300, 300, 300, 1200]; InitialValues=[0.37, 0.37, 0.378, 0.421, 0.412, 0.395, 0.395]; FilledFromTop=false
          WaterBalance SoilWater: same as PatternTests.AgeNDimensions.Row.Soil.SoilWater
          Organic: same as PatternTests.TotalWidth.BareUnderStory4.Alley.Soil.Organic
          OutputLayers: Thickness=[300, 300, 300, 300, 300, 300]
          Solute NO3: same as PatternTests.AgeNDimensions.Row.Soil.NO3
          Solute NH4: same as PatternTests.AgeNDimensions.Row.Soil.NH4
          Solute Urea: same as PatternTests.AgeNDimensions.Row.Soil.Urea
          Physical
            Thickness  ParticleSizeSand  ParticleSizeSilt  ParticleSizeClay  Rocks     BD  AirDry  LL15  DUL   SAT   KS
            300        5                 65                30                0.136527  1   0.2     0.2   0.4   0.5   100
            300        5                 65                30                0.136527  1   0.2     0.2   0.4   0.5   100
            300        5                 65                30                0.136527  1   0.25    0.25  0.4   0.5   50
            300        5                 65                30                0.136527  1   0.2     0.2   0.46  0.5   40
            300        5                 65                30                0.136527  1   0.2     0.2   0.45  0.5   40
            300        5                 65                30                0         1   0.2     0.2   0.43  0.53  40
            1200       5                 65                30                0         1   0.2     0.2   0.43  0.53  40
            Rocks, ParticleSizeSand, ParticleSizeSilt, ParticleSizeClay source: Calculated
            SoilCrop STRUMSoil: LL=[0.2, 0.2, 0.2, 0.2, 0.2, 0.2, 0.2]; KL=[0.1, 0.1, 0.1, 0.1, 0.1, 0.1, 0.1]; XF=[1, 1, 1, 1, 1, 1, 1]
            SoilCrop SPRUMSoil: LL=[0.2, 0.2, 0.2, 0.2, 0.2, 0.2, 0.2]; KL=[0.11, 0.11, 0.11, 0.11, 0.11, 0.11, 0.11]; XF=[1, 1, 1, 1, 1, 1, 1]
          Nutrient
          SoilTemperature Temperature: InteractionsPerDay=8
        SurfaceOrganicMatter: InitialResidueName=wheat_stubble; InitialResidueType=wheat; InitialResidueMass=500; InitialStandingFraction=0; InitialCPR=0; InitialCNR=100
        StrumTreeInstance Apple: TreeType=Deciduous; RowSpacing=3.5; InterRowSpacing=1.5; AlleyZoneWidthFrac=0.2; BudBreakDate=30-Aug; StartFullCanopyDate=24-Oct; StartLeafFallDate=7-May; EndLeafFallDate=27-May; DBHatMaturity=20; TypicalCanopyArea=5.6; WoodBulkDensity=650; WoodStorageFraction=0; MaximumLeafBiomass=500; MaximumRootBiomass=300; AgeAtSimulationStart=6; YearsToMaxDimension=5; CrownShape=1; MatureCanopyBaseHeight=1; MaturePrunedCanopyBaseHeight=1; MatureHeight=3.5; MaturePrunedHeight=3; MatureWidth=3; MaturePrunedWidth=2; FRemoveSummerPrune=0; RootNConc=0.01; LeafNConc=0.02; WoodNConc=0.005; FruitNConc=0.02; NFixationFrac=0; GRINZ=true; MaxRD=3; ExtinctCoeff=0.8; BaseCover=0; MaxCover=0.98; RUE=1.1; PSBaseT=5; PSLOptT=20; PSUOptT=25; PSMaxT=35; GSMax=0.006; R50=10; SurfaceKL=0.1; WaterStress=true; Number=200; PotentialFWPerFruit=500; DMC=0.14; FruitDensity=0.75; DateMaxBloom=15-Sep; DAFStartLinearGrowth=70; DAFEndLinearGrowth=200; DAFMaxSize=230
        Fertiliser
        Irrigation
        Operations
          2008-09-16  [Irrigation].apply(15)
          2008-10-05  [Irrigation].apply(5)
          2008-10-06  [Irrigation].apply(6)
          2008-10-11  [Irrigation].apply(15)
          2008-10-18  [Irrigation].apply(16)
          2008-10-22  [Irrigation].apply(2)
          2008-10-25  [Irrigation].apply(12)
          2008-11-01  [Irrigation].apply(6)
          2008-11-04  [Irrigation].apply(20)
          2008-11-14  [Irrigation].apply(15)
          2008-11-19  [Irrigation].apply(15)
          2008-11-23  [Irrigation].apply(15)
          2008-11-27  [Irrigation].apply(15)
          2008-12-01  [Irrigation].apply(2)
          2008-12-03  [Irrigation].apply(15)
          2008-12-06  [Irrigation].apply(15)
          2008-12-13  [Irrigation].apply(9)
          2008-12-16  [Irrigation].apply(15)
          2008-12-24  [Irrigation].apply(16)
          2008-12-31  [Irrigation].apply(8)
          2009-01-04  [Irrigation].apply(15)
          2009-01-11  [Irrigation].apply(15)
          2009-01-18  [Irrigation].apply(15)
          2009-01-24  [Irrigation].apply(15)
          2009-01-30  [Irrigation].apply(15)
          2009-02-04  [Irrigation].apply(15)
          2009-02-12  [Irrigation].apply(18)
          2009-02-16  [Irrigation].apply(12)
          2009-02-20  [Irrigation].apply(7)
          2009-03-01  [Irrigation].apply(50)
          2009-03-22  [Irrigation].apply(25)
          2009-12-16  [Irrigation].apply(20)
          2009-12-21  [Irrigation].apply(20)
          2009-12-26  [Irrigation].apply(20)
          2010-01-03  [Irrigation].apply(20)
          2010-01-08  [Irrigation].apply(15)
          2010-03-17  [Irrigation].apply(20)
          2010-03-18  [Irrigation].apply(20)
          2010-03-19  [Irrigation].apply(20)
          2010-03-12  [Irrigation].apply(20)
          2010-10-28  [Irrigation].apply(15)
          2010-10-29  [Irrigation].apply(15)
          2010-11-30  [Irrigation].apply(15)
          2010-12-06  [Irrigation].apply(15)
          2010-12-07  [Irrigation].apply(15)
          2010-12-27  [Irrigation].apply(15)
          2011-01-02  [Irrigation].apply(15)
          2011-01-04  [Irrigation].apply(15)
          2011-01-29  [Irrigation].apply(15)
          2011-02-16  [Irrigation].apply(15)
        Manager WaterTable
          StartDate = 1-dec
          EndDate = 1-mar
```csharp
using Models.Zones;
using APSIM.Shared.Utilities;
using Models.Soils;
using System.Collections.Generic;
using Models.PMF;
using Models.Core;
using System;

namespace Models
{
    [Serializable]
    public class Script : Model
    {
        [Link] Clock Clock;
        [Link] Soil soil;
        [Link] Irrigation irrigation;
        [Description("Start of sowing window (d-mmm)")]
        public string StartDate { get; set; }
        [Description("End of sowing window (d-mmm)")]
        public string EndDate { get; set; }

        [EventSubscribe("StartOfDay")]
        private void OnStartOfDay(object sender, EventArgs e)
        {
        if (DateUtilities.WithinDates(StartDate, Clock.Today, EndDate))
            irrigation.Apply(2, 700);
        }
    }
}
```
        Manager DAS: same as NZ AppleExperiments.Manawatu_1994.Manawatu_94.Row.DAS
        Manager AutomaticFertiliser: same as PatternTests.AgeNDimensions.Row.AutomaticFertiliser
        Plant STRUM
      RectangularZone Alley: Length=100; Width=2.2; Slope=0; AspectAngle=0; Altitude=50
        Report AlleyZoneReport: EventNames=[Clock].DoReport
        Report Drainage: EventNames=[Clock].DoReport
          VariableNames:
            [Clock].Today
            sum of [Soil].SoilWater.Flux[6] from 2008-10-01 to 2011-03-08 as drainage
            [Soil].Water.MM[9] + [Soil].Water.MM[10] as SW_belowRoots
        Soil: Latitude=0; Longitude=0
          LayerStructure: Thickness=[200, 200, 200, 200, 200, 200, 300, 300, 400, 800]
          Chemical: Thickness=[100, 200, 300, 300, 300, 300]; PH=[6.6, 6.2, 5.7, 5.5, 5.5, 5.5]; PHUnits=Water
          Water: Thickness=[300, 300, 300, 300, 300, 300, 1200]; InitialValues=[0.4, 0.4, 0.4, 0.46, 0.45, 0.43, 0.43]; FilledFromTop=false
          WaterBalance SoilWater: same as PatternTests.AgeNDimensions.Row.Soil.SoilWater
          Organic: same as PatternTests.TotalWidth.BareUnderStory4.Alley.Soil.Organic
          OutputLayers: Thickness=[300, 300, 300, 300, 300, 300]
          Solute NO3: same as PatternTests.AgeNDimensions.Row.Soil.NO3
          Solute NH4: same as PatternTests.AgeNDimensions.Row.Soil.NH4
          Solute Urea: same as PatternTests.AgeNDimensions.Row.Soil.Urea
          Physical
            Thickness  BD  AirDry  LL15  DUL   SAT   KS
            300        1   0.2     0.2   0.4   0.5   100
            300        1   0.2     0.2   0.4   0.5   100
            300        1   0.25    0.25  0.4   0.5   50
            300        1   0.2     0.2   0.46  0.5   40
            300        1   0.2     0.2   0.45  0.5   40
            300        1   0.2     0.2   0.43  0.53  40
            1200       1   0.2     0.2   0.43  0.53  40
            SoilCrop STRUMSoil: LL=[0.2, 0.2, 0.2, 0.2, 0.2, 0.2, 0.2]; KL=[0.1, 0.1, 0.1, 0.1, 0.1, 0.1, 0.1]; XF=[1, 1, 1, 1, 1, 1, 1]
            SoilCrop SPRUMSoil: LL=[0.2, 0.2, 0.2, 0.2, 0.2, 0.2, 0.2]; KL=[0.11, 0.11, 0.11, 0.11, 0.11, 0.11, 0.11]; XF=[1, 1, 1, 1, 1, 1, 1]
          Nutrient
          SoilTemperature Temperature: InteractionsPerDay=8
        SurfaceOrganicMatter: InitialResidueName=wheat_stubble; InitialResidueType=wheat; InitialResidueMass=500; InitialStandingFraction=0; InitialCPR=0; InitialCNR=100
        Fertiliser
        Irrigation
        Operations: same as NZ AppleExperiments.Apple_Dwarf.Row.Operations
        Manager WaterTable: same as NZ AppleExperiments.Apple_Dwarf.Row.WaterTable
        Manager DAS: same as NZ AppleExperiments.Manawatu_1994.Manawatu_94.Row.DAS
        Plant SPRUM
        SprumPastureInstance BasePasture: same as PatternTests.TwoZoneInRowTreeSpacing.PeachII.Alley.BasePasture
        BiomassRemovalEvents Mow: same as PatternTests.TwoZoneInRowTreeSpacing.PeachII.Alley.Mow
      Memo Reason why drainage looks bad
        The flux meters were flooded by a rising water table so the drainage observations are not representative of actual drainage
    Simulation Apple_Tall
      Memo ExperimentDescription
        *	Based on Green et al 2013 - PFR report for the Hawkes Bay Regional Council

        * 	Location: Hastings, NZ

        *	Cultivar: Pink Lady

        *	Transpiration measured using sap flow sensors.
      Clock: Start=2008-06-21; End=2011-07-01
      Summary SummaryFile
      Weather: FileName=MetFiles/Whakatu.met
      MicroClimate: a_interception=0; b_interception=1; c_interception=0; d_interception=0; SoilHeatFluxFraction=0.4; MinimumHeightDiffForNewLayer=0; NightInterceptionFraction=0.5; ReferenceHeight=2
      SoilArbitrator Soil Arbitrator
      ZoneAgregate
      Report ZoneAgregateReport: same as PatternTests.TwoZoneCanopySize.DualZone2.ZoneAgregateReport
      RectangularZone Row: Length=100; Width=1.3; Slope=0; AspectAngle=0; Altitude=50
        Report RowZoneReport: EventNames=[Clock].DoReport
        Report Drainage: EventNames=[Clock].DoReport
          VariableNames:
            [Clock].Today
            sum of [Soil].SoilWater.Flux[6] from 2008-10-01 to 2011-03-08 as drainage
            [Soil].Water.MM[9] + [Soil].Water.MM[10] as SW_belowRoots
        Soil: same as NZ AppleExperiments.Apple_Dwarf.Row.Soil
        SurfaceOrganicMatter: InitialResidueName=wheat_stubble; InitialResidueType=wheat; InitialResidueMass=500; InitialStandingFraction=0; InitialCPR=0; InitialCNR=100
        StrumTreeInstance Apple: TreeType=Deciduous; RowSpacing=3.5; InterRowSpacing=1.5; AlleyZoneWidthFrac=0.2; BudBreakDate=30-Aug; StartFullCanopyDate=24-Oct; StartLeafFallDate=7-Apr; EndLeafFallDate=22-Apr; DBHatMaturity=20; TypicalCanopyArea=5.6; WoodBulkDensity=650; WoodStorageFraction=0; MaximumLeafBiomass=500; MaximumRootBiomass=300; AgeAtSimulationStart=6; YearsToMaxDimension=6; CrownShape=0; MatureCanopyBaseHeight=1; MaturePrunedCanopyBaseHeight=1; MatureHeight=3.5; MaturePrunedHeight=3; MatureWidth=3; MaturePrunedWidth=2; FRemoveSummerPrune=0; RootNConc=0.01; LeafNConc=0.02; WoodNConc=0.005; FruitNConc=0.02; NFixationFrac=0; GRINZ=true; MaxRD=3; ExtinctCoeff=0.8; BaseCover=0; MaxCover=0.98; RUE=1.1; PSBaseT=5; PSLOptT=20; PSUOptT=25; PSMaxT=35; GSMax=0.006; R50=100; SurfaceKL=0.1; WaterStress=true; Number=200; PotentialFWPerFruit=500; DMC=0.14; FruitDensity=0.75; DateMaxBloom=15-Sep; DAFStartLinearGrowth=70; DAFEndLinearGrowth=200; DAFMaxSize=230
        Fertiliser
        Irrigation
        Operations: same as NZ AppleExperiments.Apple_Dwarf.Row.Operations
        Manager WaterTable
          StartDate = 1-dec
          EndDate = 1-mar
```csharp
using Models.Zones;
using APSIM.Shared.Utilities;
using Models.Soils;
using System.Collections.Generic;
using Models.PMF;
using Models.Core;
using System;

namespace Models
{
    [Serializable]
    public class Script : Model
    {
        [Link] Clock Clock;
        [Link] Soil soil;
        [Link] Irrigation irrigation;
        [Description("Start of sowing window (d-mmm)")]
        public string StartDate { get; set; }
        [Description("End of sowing window (d-mmm)")]
        public string EndDate { get; set; }

        [EventSubscribe("StartOfDay")]
        private void OnStartOfDay(object sender, EventArgs e)
        {
        if (DateUtilities.WithinDates(StartDate, Clock.Today, EndDate))
            irrigation.Apply(2, 2300);
        }
    }
}
```
        Manager DAS: same as NZ AppleExperiments.Manawatu_1994.Manawatu_94.Row.DAS
        Plant STRUM
      RectangularZone Alley: Length=100; Width=2.2; Slope=0; AspectAngle=0; Altitude=50
        Report AlleyZoneReport: EventNames=[Clock].DoReport
        Report Drainage: EventNames=[Clock].DoReport
          VariableNames:
            [Clock].Today
            sum of [Soil].SoilWater.Flux[6] from 2008-10-01 to 2011-03-08 as drainage
            [Soil].Water.MM[9] + [Soil].Water.MM[10] as SW_belowRoots
        Soil: same as NZ AppleExperiments.Apple_Dwarf.Alley.Soil
        SurfaceOrganicMatter: InitialResidueName=wheat_stubble; InitialResidueType=wheat; InitialResidueMass=500; InitialStandingFraction=0; InitialCPR=0; InitialCNR=100
        Fertiliser
        Irrigation
        Operations: same as NZ AppleExperiments.Apple_Dwarf.Row.Operations
        Manager WaterTable
          StartDate = 1-dec
          EndDate = 1-mar
```csharp
using Models.Zones;
using APSIM.Shared.Utilities;
using Models.Soils;
using System.Collections.Generic;
using Models.PMF;
using Models.Core;
using System;

namespace Models
{
    [Serializable]
    public class Script : Model
    {
        [Link] Clock Clock;
        [Link] Soil soil;
        [Link] Irrigation irrigation;
        [Description("Start of sowing window (d-mmm)")]
        public string StartDate { get; set; }
        [Description("End of sowing window (d-mmm)")]
        public string EndDate { get; set; }

        [EventSubscribe("StartOfDay")]
        private void OnStartOfDay(object sender, EventArgs e)
        {
        if (DateUtilities.WithinDates(StartDate, Clock.Today, EndDate))
            irrigation.Apply(2, 2500);
        }
    }
}
```
        Manager DAS: same as NZ AppleExperiments.Manawatu_1994.Manawatu_94.Row.DAS
        Plant SPRUM
        SprumPastureInstance BasePasture: same as PatternTests.TwoZoneInRowTreeSpacing.PeachII.Alley.BasePasture
        BiomassRemovalEvents Mow: same as PatternTests.TwoZoneInRowTreeSpacing.PeachII.Alley.Mow
      Memo Reason why drainage looks bad
        The flux meters were flooded by a rising water table so the drainage observations are not representative of actual drainage
  Folder USA AppleExperiments (disabled)
    Experiment Prosser_Apple
      Memo ExperimentDescription
        *	Based on Ebel e al (2001) - HORTSCIENCE, VOL. 36(7)

        *	Trial site: Roza irrigation district in the lower Yakima valley near Prosser, Wash. (lat. 45°N; long. 119°W and 380 m above sea level)

        *	Soil: Warden fine sandy loam (coarse, silty, mixed, mesic, Xerollic Camborthids) that was uniform down the profile and overlaid fractured basalt bedrock

        *	The permanent wilting and field capacity were 8% (80 mm·m–1) and 28% (280 mm·m–1) by volume, respectively - total available soil water was 200 mm·m–1 for the two orchards.

        *	The shallow soil (mean depth = 0.8 m) and deeper soil (average depth = 1.2 m) had 160 and 240 mm of total water available at field capacity (FC), respectively.

        *	Irrigation treatments: withholding irrigation all season or from 3, 5, 7, 9, 11, 13, 15 or 17 weeks before harvest.

        *	Total pan evaporation was 1005 mm and precipitation was negligible from May through September.
      Memo Apples in this region
        *	Apples grown in Washington, e.g. Red/Golden Delicious, Gala, and Granny Smith, are in season from August to early November.

        *	Apple trees in Washington should be sown in early spring.
      Factors
        Permutation
          Factor _Soil
            CompositeFactor _Shallow
              Specifications:
                [Physical]
                [Water]
              Physical
                Thickness  ParticleSizeSand  ParticleSizeSilt  ParticleSizeClay  Rocks  BD  AirDry  LL15  DUL   SAT   KS
                300        5                 65                30                0      1   0.04    0.08  0.28  0.35  100
                300        5                 65                30                0      1   0.08    0.08  0.28  0.35  100
                200        5                 65                30                0      1   0.08    0.08  0.28  0.35  50
                400        5                 65                30                0      1   0.01    0.01  0.04  0.35  40
                300        5                 65                30                0      1   0.01    0.01  0.04  0.1   10
                300        5                 65                30                0      1   0.01    0.01  0.04  0.1   1
                1200       5                 65                30                0      1   0.01    0.01  0.04  0.1   0
                ParticleSizeSand, ParticleSizeSilt, ParticleSizeClay source: Calculated
                SoilCrop STRUMSoil: LL=[0.1, 0.1, 0.1, 0.01, 0.01, 0.01, 0.01]; KL=[1, 1, 1, 1, 1, 1, 1]; XF=[1, 1, 1, 1, 1, 1, 1]
                SoilCrop SPRUMSoil: LL=[0.04, 0.08, 0.08, 0.01, 0.01, 0.01, 0.01]; KL=[0.05, 0.05, 0.05, 0.05, 0.05, 0.05, 0.05]; XF=[1, 1, 1, 1, 1, 1, 1]
              Water: Thickness=[300, 300, 200, 400, 300, 300, 1200]; InitialValues=[0.28, 0.28, 0.28, 0.01, 0.01, 0.01, 0.01]; FilledFromTop=true
            CompositeFactor _Deep
              Specifications:
                [Physical]
                [Water]
              Physical
                Thickness  ParticleSizeSand  ParticleSizeSilt  ParticleSizeClay  Rocks  BD  AirDry  LL15  DUL   SAT   KS
                300        5                 65                30                0      1   0.04    0.08  0.28  0.35  100
                300        5                 65                30                0      1   0.08    0.08  0.28  0.35  100
                200        5                 65                30                0      1   0.08    0.08  0.28  0.35  50
                400        5                 65                30                0      1   0.08    0.08  0.28  0.35  40
                300        5                 65                30                0      1   0.01    0.01  0.04  0.1   10
                300        5                 65                30                0      1   0.01    0.01  0.04  0.1   1
                1200       5                 65                30                0      1   0.01    0.01  0.04  0.1   0
                ParticleSizeSand, ParticleSizeSilt, ParticleSizeClay source: Calculated
                SoilCrop STRUMSoil: LL=[0.1, 0.1, 0.1, 0.1, 0.01, 0.01, 0.01]; KL=[1, 1, 1, 1, 1, 1, 1]; XF=[1, 1, 1, 1, 1, 1, 1]
                SoilCrop SPRUMSoil: LL=[0.04, 0.08, 0.08, 0.08, 0.01, 0.01, 0.01]; KL=[0.05, 0.05, 0.05, 0.05, 0.05, 0.05, 0.05]; XF=[1, 1, 1, 1, 1, 1, 1]
              Water: Thickness=[300, 300, 200, 400, 300, 300, 1200]; InitialValues=[0.28, 0.28, 0.28, 0.28, 0.01, 0.01, 0.01]; FilledFromTop=true
          Factor _Irr: Specification=[IrrigationOperations]
            Operations 0
            Operations 1
              1986-06-01  [Irrigation].Apply(70);
            Operations 2
              1986-06-01  [Irrigation].Apply(70);
              1986-06-15  [Irrigation].Apply(70);
            Operations 3
              1986-06-01  [Irrigation].Apply(70);
              1986-06-15  [Irrigation].Apply(70);
              1986-06-29  [Irrigation].Apply(70);
            Operations 4
              1986-06-01  [Irrigation].Apply(70);
              1986-06-15  [Irrigation].Apply(70);
              1986-06-29  [Irrigation].Apply(70);
              1986-07-13  [Irrigation].Apply(70);
            Operations 5
              1986-06-01  [Irrigation].Apply(70);
              1986-06-15  [Irrigation].Apply(70);
              1986-06-29  [Irrigation].Apply(70);
              1986-07-13  [Irrigation].Apply(70);
              1986-07-27  [Irrigation].Apply(70);
            Operations 6
              1986-06-01  [Irrigation].Apply(70);
              1986-06-15  [Irrigation].Apply(70);
              1986-06-29  [Irrigation].Apply(70);
              1986-07-13  [Irrigation].Apply(70);
              1986-07-27  [Irrigation].Apply(70);
              1986-08-10  [Irrigation].Apply(70);
            Operations 7
              1986-06-01  [Irrigation].Apply(70);
              1986-06-15  [Irrigation].Apply(70);
              1986-06-29  [Irrigation].Apply(70);
              1986-07-13  [Irrigation].Apply(70);
              1986-07-27  [Irrigation].Apply(70);
              1986-08-10  [Irrigation].Apply(70);
              1986-08-24  [Irrigation].Apply(70);
            Operations 8: same as NZ AppleExperiments.Manawatu_1994.Manawatu_94.Row.IrrigationOperations
      Simulation Prossor
        Clock: Start=1985-12-21; End=1986-11-28
        Summary SummaryFile
        Weather: FileName=MetFiles/Pendleton.met
        MicroClimate: a_interception=0; b_interception=1; c_interception=0; d_interception=0; SoilHeatFluxFraction=0.4; MinimumHeightDiffForNewLayer=0; NightInterceptionFraction=0.5; ReferenceHeight=2
        SoilArbitrator Soil Arbitrator
        ZoneAgregate
        Report ZoneAgregateReport: same as PatternTests.TwoZoneCanopySize.DualZone2.ZoneAgregateReport
        RectangularZone Row: Length=100; Width=1.5; CanopyType=TreeRow; Slope=0; AspectAngle=0; Altitude=50
          Report RowZoneReport: EventNames=[Clock].DoReport
          Soil: Latitude=0; Longitude=0
            Physical: same as USA AppleExperiments.Prosser_Apple.Factors.Permutation._Soil._Deep.Physical
            WaterBalance SoilWater: same as PatternTests.AgeNDimensions.Row.Soil.SoilWater
            Chemical: same as PatternTests.AgeNDimensions.Row.Soil.Chemical
            Solute NO3: Thickness=[100, 200, 300, 300, 300, 300]; InitialValues=[217, 15, 1.667, 1.667, 0, 0]; InitialValuesUnits=ppm; WaterTableConcentration=0; D0=0; DepthConstant=0; MaxDepthSoluteAccessible=0; RunoffEffectivenessAtMovingSolute=0; MaxEffectiveRunoff=0
            Solute NH4: same as PatternTests.AgeNDimensions.Row.Soil.NH4
            Solute Urea: same as PatternTests.AgeNDimensions.Row.Soil.Urea
            Nutrient
            Organic: same as PatternTests.TotalWidth.BareUnderStory4.Alley.Soil.Organic
            SoilTemperature Temperature: InteractionsPerDay=8
            OutputLayers: Thickness=[300, 300, 200, 400]
            Water: Thickness=[300, 300, 200, 400, 300, 300, 1200]; InitialValues=[0.28, 0.213333, 0.08, 0.08, 0.01, 0.01, 0.01]; FilledFromTop=true
          SurfaceOrganicMatter: InitialResidueName=wheat_stubble; InitialResidueType=wheat; InitialResidueMass=500; InitialStandingFraction=0; InitialCPR=0; InitialCNR=100
          Fertiliser
          Irrigation
          Operations IrrigationOperations: same as NZ AppleExperiments.Manawatu_1994.Manawatu_94.Row.IrrigationOperations
          Operations NitrogenOperations
            1986-05-31  [Fertiliser].Apply(10, "UreaN", 10);
            1986-06-14  [Fertiliser].Apply(10, "UreaN", 10);
            1986-06-28  [Fertiliser].Apply(10, "UreaN", 10);
            1986-07-12  [Fertiliser].Apply(10, "UreaN", 10);
            1986-07-26  [Fertiliser].Apply(10, "UreaN", 10);
            1986-08-09  [Fertiliser].Apply(10, "UreaN", 10);
            1986-08-23  [Fertiliser].Apply(10, "UreaN", 10);
            1986-09-06  [Fertiliser].Apply(10, "UreaN", 10);
          StrumTreeInstance WashStateApple: TreeType=Deciduous; RowSpacing=5.5; InterRowSpacing=3.7; AlleyZoneWidthFrac=0.73; BudBreakDate=1-May; StartFullCanopyDate=9-Jul; StartLeafFallDate=28-Aug; EndLeafFallDate=7-Oct; DBHatMaturity=12; TypicalCanopyArea=5.6; WoodBulkDensity=650; WoodStorageFraction=0; MaximumLeafBiomass=500; MaximumRootBiomass=300; AgeAtSimulationStart=5; YearsToMaxDimension=6; CrownShape=0; MatureCanopyBaseHeight=1; MaturePrunedCanopyBaseHeight=1; MatureHeight=3.5; MaturePrunedHeight=3; MatureWidth=3; MaturePrunedWidth=2; FRemoveSummerPrune=0; RootNConc=0.01; LeafNConc=0.02; WoodNConc=0.005; FruitNConc=0.02; NFixationFrac=0; GRINZ=true; MaxRD=3; ExtinctCoeff=0.6; BaseCover=0; MaxCover=0.96; RUE=1.2; PSBaseT=5; PSLOptT=20; PSUOptT=25; PSMaxT=35; GSMax=0.004; R50=100; SurfaceKL=0.06; WaterStress=true; Number=10; PotentialFWPerFruit=210; DMC=0.16; FruitDensity=0.75; DateMaxBloom=15-Apr; DAFStartLinearGrowth=50; DAFEndLinearGrowth=145; DAFMaxSize=170
          Plant STRUM
          Manager AutomaticFertiliser
            Fertilise = True
            Season_Start = 1-Jan
            Season_End = 30-Dec
            Season_Allocation = 100000
            TriggerN = 50
            NApplicationAmount = 25
            Return_days = 3
            Top_Depth = 600
            script: same as in PatternTests.AgeNDimensions.Row.AutomaticFertiliser
        RectangularZone Alley: Length=100; Width=3; CanopyType=TreeRow; Slope=0; AspectAngle=0; Altitude=50
          Report AlleyZoneReport: EventNames=[Clock].DoReport
          Soil: same as USA AppleExperiments.Prosser_Apple.Prossor.Row.Soil
          Operations NitrogenOperations: same as NZ AppleExperiments.Manawatu_1994.Manawatu_94.Row.NitrogenOperations
          SurfaceOrganicMatter: InitialResidueName=wheat_stubble; InitialResidueType=wheat; InitialResidueMass=500; InitialStandingFraction=0; InitialCPR=0; InitialCNR=100
          Fertiliser
          Irrigation
          Operations IrrigationOperations: same as NZ AppleExperiments.Manawatu_1994.Manawatu_94.Row.IrrigationOperations
          Plant SPRUM
          BiomassRemovalEvents OnCut: same as PatternTests.TwoZoneInRowTreeSpacing.PeachII.Alley.Mow
          SprumPastureInstance BasePasture: AgeAtSimulationStart=1; YearsToMaxDimension=1; RUE=1; Presidue=0.1; RsenRate=0.01; Proot=0.1; PSBaseT=5; PSLOptT=20; PSUOptT=25; PSMaxT=35; GRINZ=false; MaxRD=700; MaxHeight=300; MaxPrunedHeight=100; MaxCover=0.97; MinCover=0.5; ExtinctCoeff=0.5; RegrowthDuration=300; FullCanopyDuration=0; BaseT=3; OptT=25; MaxT=35; RootNConc=0.01; LeafNConc=0.05; ResidueNConc=0.01; LegumePropn=0; GSMax=0.004; R50=150; SurfaceKL=0.1; WaterStress=true
  Folder Sensitivity
    Memo ReadMe
      **Sites and soils to simulate**

      | Site         		|   Soil_SG                               | SMAP Name_SG 	| Coordinates_SG	        		 | Nearest station_RC                   |VCSN#	|Soil_RC|Changes to runoff
      |------------------|-------------------------|--------------------|------------------------------------------------|----------------------|----------|-----------------|------------------------------|
      | Kerikeri   |   Kerikeri silt loam   	| Kerikeri_2a1 or 4a1| -35.182704°, 173.919934°| Kapiro	 | 27019	 | Kaawa_13a.1|86 to 80|
      | Pukekohe***Ψ***   |   Karaka silt loam      	| Karaka_1a1              | -37.210337°, 174.694626° | Waipipi	 | 21728	 |  Otorohanga_24b.1     |  83 to 80|
      | Katikati     |   Katikati sandy loam   	| Ngak_1a.3	   | -37.596273°, 175.950706°| Matahui| 29379	 | Ngakura_1a.3| 77 to 75|
      | Pukehina***Ψ***    |   Ohanipanea sandy loam   | Turan_8a.1                | -37.815361°, 176.537074°| Pukehina| 30005	 | Turangi_8a.1 |77 to 72|
      | Te Puke***α***    |   Te Puke sandy loam    	| Ngak_2a.1                | -37.833892°, 176.283924°| Bayly rd	| 29966	 | Ngakura_2a.1 |77 to 74|
      | Whakatane  |   Rangitikei silt loam  	| Rangitikei_3a1       | -38.012183°, 177.322731°| Opotiki    | 31120	 | Opotiki_1a.1 |77 to 72|
      | Gisborne    |   Kaiti silt loam       	| Flax_77f.1                  | -38.605677°, 177.939866° | Whaerengaahika|30639	| Flaxton_76a.1	 |NA|
      | Whakatu***Ψ***    |   Ngatarawa sandy loam  	| xxxx                             | -39.60714, 176.73027	| Roys Hill| 28991	 | Ashburton_41a.1 |77 to 70|

      ***SG=SteveG; RC=Rogerio***

      ***Ψ=netted***

      ***α=not usually irrigated, cv = 'Hayward'***
    Experiment Kerikeri
      Factors
        Factor IrrigationRegime
          CompositeFactor Rainfed: Specifications=[AutoIrrigationDeficitBased].Script.AllowIrrigation = FALSE
          CompositeFactor Deficit
            Specifications:
              [AutoIrrigationDeficitBased].Script.AllowIrrigation = TRUE
              [AutoIrrigationDeficitBased].Script.triggerDeficit = 30
          CompositeFactor Full
            Specifications:
              [AutoIrrigationDeficitBased].Script.AllowIrrigation = TRUE
              [AutoIrrigationDeficitBased].Script.triggerDeficit = 50
          CompositeFactor Excess
            Specifications:
              [AutoIrrigationDeficitBased].Script.AllowIrrigation = TRUE
              [AutoIrrigationDeficitBased].Script.triggerDeficit = 70
      Simulation Site1
        Clock: Start=1994-06-21; End=2020-12-01
        Summary SummaryFile
        Weather: FileName=VCSN/Kerikeri27019_Kapiro.met
        MicroClimate: a_interception=0; b_interception=1; c_interception=0; d_interception=0; SoilHeatFluxFraction=0.4; MinimumHeightDiffForNewLayer=0; NightInterceptionFraction=0.5; ReferenceHeight=2
        SoilArbitrator Soil Arbitrator
        Manager AutomaticFertiliser
          Fertilise = True
          Season_Start = 1-Aug
          Season_End = 30-Apr
          Season_Allocation = 100000
          TriggerN = 50
          NApplicationAmount = 25
          Return_days = 3
          Top_Depth = 600
          script: same as in Replacements.AutomaticFertiliser
        Manager ResetDate: same as Replacements.ResetDate
        Manager RadiationWindFactor
```csharp
using System;
using Models.Core;
using Models.Interfaces;

namespace Models
{
    [Serializable]
    public class Script : Model
    {
        [Link] private IWeather weather;

        public double RadiationFactor { get; set; } = 1.0;
        public double WindFactor { get; set; } = 1.0;

        [EventSubscribe("DoWeather")]
        private void OnDoWeather(object sender, EventArgs e)
        {
            weather.Radn *= RadiationFactor;
            weather.Wind *= WindFactor;
        }
    }
}
```
        RectangularZone Row: Length=100; Width=1; CanopyType=TreeRow; Slope=0; AspectAngle=0; Altitude=50
          Report RowZoneReport: EventNames=[Clock].DoReport
          Report KiwiReport: EventNames=[Clock].DoReport
            VariableNames:
              [Clock].Today
              [ResetDate].Script.SimulationYear as SimYear
              [Row].STRUM.AccumulatedWaterStress
              //[Row].STRUM.Arbitrator.DemandRatio
              [Row].Area
              [Row].STRUM.BaseHeight
              [Row].STRUM.Fruit.FreshYield_kgPerHa
              [Row].STRUM.CanopyArea
              [Row].STRUM.RootUptakesArbitrator.WaterDemand.Amount
              [Row].STRUM.RootUptakesArbitrator.WaterDemand.mm
              [Row].STRUM.RootUptakesArbitrator.NitrogenDemand.Amount
              [Row].STRUM.Root.Network.WtByLayerZone1
              [Row].STRUM.Root.Network.WtByLayerZone2
              [Row].STRUM.Arbitrator.Carbon.TotalPlantDemand
              [Row].STRUM.Arbitrator.Carbon.TotalPlantSupply
              [Row].STRUM.Arbitrator.Carbon.TotalPlantDemandsAllocated
              [Row].STRUM.Arbitrator.Fn
              [Row].STRUM.Arbitrator.Nitrogen.TotalPlantDemand
              [Row].STRUM.Arbitrator.Nitrogen.TotalPlantSupply
              [Row].STRUM.Arbitrator.Nitrogen.TotalPlantDemandsAllocated
              [Row].STRUM.Fruit.TotalCarbonDemand.RelativeFruitMass.Delta.Integral
              [Row].STRUM.Fruit.Allocated.Carbon.Total
              [Row].STRUM.Fruit.Allocated.Nitrogen.Total
              [Row].STRUM.Fruit.Carbon.Demands.Structural
              [Row].STRUM.Fruit.Carbon.Demands.Total
              [Row].STRUM.Fruit.DMC
              [Row].STRUM.Fruit.FreshWtPerFruit
              [Row].STRUM.Fruit.NextYearsFruitingBudSurvival
              [Row].STRUM.Fruit.Number.BudsSurvivalFromLastYear
              [Row].STRUM.Fruit.N
              [Row].STRUM.Fruit.Nitrogen.Demands.Total
              [Row].STRUM.Fruit.Number
              [Row].STRUM.Fruit.Diameter
              [Row].STRUM.Fruit.VolumePerFruit
              [Row].STRUM.Fruit.Wt
              [Row].STRUM.Fruit.PotentialDWPerFruit
              [Row].STRUM.Fruit.TotalCarbonDemand.RelativeFruitMass
              [Row].STRUM.Fruit.TotalCarbonDemand.CarbonConc
              [Row].STRUM.Height
              [Row].STRUM.Height.PrunedCanopyBaseHeight
              [Row].STRUM.Height.PrunedCanopyBaseHeight  + [Row].STRUM.Height.PrunedCanopyDepth
              [Row].STRUM.Height.PrunedCanopyBaseHeight  + [Row].STRUM.Height.PrunedCanopyDepth + [Row].STRUM.Height.SeasonalDepthGrowth
              [Row].STRUM.Leaf.Allocated.Carbon.Total
              [Row].STRUM.Leaf.Allocated.Nitrogen.Total
              [Row].STRUM.Leaf.Canopy.CoverGreen
              [Row].STRUM.Leaf.Canopy.Deepness
              [Row].STRUM.Leaf.Dead.Wt
              [Row].STRUM.Leaf.Carbon.Demands.Structural
              [Row].STRUM.Leaf.Carbon.Demands.Total
              [Row].STRUM.Leaf.Fn
              [Row].STRUM.Leaf.Canopy.Fw
              [Row].STRUM.Leaf.Canopy.LAI
              [Row].STRUM.Leaf.Live.Wt
              [Row].STRUM.Leaf.N
              [Row].STRUM.Leaf.Nitrogen.Demands.Total
              [Row].STRUM.Leaf.Canopy.PotentialEP
              [Row].STRUM.Leaf.Canopy.RadiationIntercepted
              [Row].STRUM.Leaf.Senesced.Weight.Structural
              [Row].STRUM.Leaf.SenescenceRate
              [Row].STRUM.Leaf.Canopy.Transpiration
              [Row].STRUM.Leaf.Canopy.WaterDemand
              [Row].STRUM.Leaf.Canopy.WaterAllocation
              [Row].STRUM.Leaf.Canopy.Width
              [Row].STRUM.Leaf.Canopy.GreenExtinctionCoefficient
              [Row].STRUM.Leaf.Wt
              [Row].STRUM.Phenology.Age.YearDecimal
              [Row].STRUM.Phenology.Age.Years
              [Row].STRUM.Phenology.CurrentStageName
              [Row].STRUM.Phenology.DaysSinceFlowering
              [Row].STRUM.Phenology.Stage
              [Row].STRUM.RelativeSeasonalDimension
              [Row].STRUM.RelativeAnnualDimension
              [Row].STRUM.Root.Allocated.Carbon.Total
              [Row].STRUM.Root.Allocated.Nitrogen.Total
              [Row].STRUM.Root.Network.Depth
              [Row].STRUM.Root.Carbon.Demands.Structural
              [Row].STRUM.Root.Carbon.Demands.Total
              [Row].STRUM.Root.N
              [Row].STRUM.Root.Nitrogen.Demands.Total
              [Row].STRUM.RootUptakesArbitrator.WaterUptake.AmountByZone
              [Row].STRUM.RootUptakesArbitrator.WaterUptake.Mm
              [Row].STRUM.RootUptakesArbitrator.WaterUptake.Amount
              [Row].STRUM.RootUptakesArbitrator.NitrogenUptake.AmountByZone
              [Row].STRUM.RootUptakesArbitrator.NitrogenUptake.Gpm2
              [Row].STRUM.RootUptakesArbitrator.NitrogenUptake.Amount
              [Row].STRUM.RootUptakesArbitrator.WaterSupply.AmountByZone
              [Row].STRUM.RootUptakesArbitrator.WaterSupply.Mm
              [Row].STRUM.RootUptakesArbitrator.WaterSupply.Amount
              [Row].STRUM.RootUptakesArbitrator.NitrogenSupply.AmountByZone
              [Row].STRUM.RootUptakesArbitrator.NitrogenSupply.Gpm2
              [Row].STRUM.RootUptakesArbitrator.NitrogenSupply.Amount
              [Row].STRUM.Root.Wt
              [Row].STRUM.TranspirationPerTree
              [Row].STRUM.Wood.Allocated.Carbon.Total
              [Row].STRUM.Wood.Allocated.Nitrogen.Total
              [Row].STRUM.Wood.Carbon.Demands.Structural
              [Row].STRUM.Wood.Carbon.Demands.Total
              [Row].STRUM.Wood.Carbon.Supplies.ReTranslocation
              [Row].STRUM.Wood.Live.Carbon.Structural * 1/0.4
              [Row].STRUM.Wood.Live.Carbon.Storage * 1/0.4
              [Row].STRUM.Wood.EnergyBalance.CoverTotal
              [Row].STRUM.Wood.EnergyBalance.DeadAreaIndex
              [Row].STRUM.Wood.EnergyBalance.LAIDead
              [Row].STRUM.Wood.EnergyBalance.RadiationInterceptedByDead
              [Row].STRUM.Wood.EnergyBalance.Transpiration
              [Row].STRUM.Wood.N
              [Row].STRUM.Wood.Nitrogen.Demands.Total
              [Row].STRUM.Wood.Wt
              [Row].STRUM.Width
              [Row].STRUM.Width.PrunedWidth
              [Row].STRUM.Width.PrunedWidth + [Row].STRUM.Width.SeasonalGrowth
              [Row].STRUM.TranspirationPerLeafArea
              [Row].SurfaceOrganicMatter.N
              [Row].SurfaceOrganicMatter.Wt
              [Row].Irrigation.IrrigationApplied
              [Row].Fertiliser.NitrogenApplied
              sum([Row].Soil.OutputLayers.SWmm)
              [Row].Soil.OutputLayers.SWmm
              ([Row].Soil.OutputLayers.SWmm[1] + [Row].Soil.OutputLayers.SWmm[2]+ [Row].Soil.OutputLayers.SWmm[3]) as SWmm0_120
              ([Row].Soil.OutputLayers.SWmm[1] + [Row].Soil.OutputLayers.SWmm[2]+ [Row].Soil.OutputLayers.SWmm[3] + [Row].Soil.OutputLayers.SWmm[4]) as SWmm0_160
              [Row].Soil.OutputLayers.SW
              [Row].Soil.OutputLayers.SAT
              [Row].Soil.OutputLayers.DUL
              [Row].Soil.OutputLayers.LL15
              [Row].Soil.SoilWater.Evaporation
              [Row].Soil.SoilWater.Eo
              [Weather].PanEvap
              [Weather].Radn
              [Weather].Rain
              [STRUM].Leaf.TotalCarbonDemand.TotalDMDemand.SizeDemand.SizeDemand.SizeDemand.TargetSize
          SurfaceOrganicMatter: InitialResidueName=wheat_stubble; InitialResidueType=wheat; InitialResidueMass=500; InitialStandingFraction=0; InitialCPR=0; InitialCNR=100
          Fertiliser
          Irrigation
          Manager MulchResidues
```csharp
using Models.Surface;
using Models.Core;
using Newtonsoft.Json;
using Models.Interfaces;
using APSIM.Shared.Utilities;
using System.Xml.Serialization;
using System;
        
namespace Models
{
    [Serializable] 
    [System.Xml.Serialization.XmlInclude(typeof(Model))]
    public class Script : Model
    {
        [Link] private SurfaceOrganicMatter SurfOM;
        
        //Determine daily requirement for fertiliser
        [EventSubscribe("Pruning")]
        private void OnPrun(object sender, EventArgs e)
        { 
            SurfOM.Incorporate(80,50);
        }
    }
}
```
          Plant STRUM
          Soil Kaawa_13a1: SoilType=Typic Yellow Ultic Soils; LocalName=Kaawa_13a1; Latitude=-41; Longitude=174
            DataSource=Profile descriptions provided by Smap based on the work done by Trevor Webb.
            Chemical: Thickness=[75, 275, 1650]; PH=[7, 7, 7]; PHUnits=Water
            Physical
              Thickness  ParticleSizeSand  ParticleSizeSilt  ParticleSizeClay  BD     AirDry  LL15   DUL    SAT    KS
              75         6                 49                45                1.092  0.109   0.219  0.447  0.54   1200
              275        6                 44                50                1.257  0.127   0.215  0.372  0.411  360
              330        6                 34                60                1.072  0.288   0.288  0.393  0.408  360
              330        6                 34                60                1.072  0.288   0.288  0.393  0.408  360
              330        6                 34                60                1.072  0.288   0.288  0.393  0.408  360
              330        6                 34                60                1.072  0.288   0.288  0.393  0.408  360
              330        6                 34                60                1.072  0.288   0.288  0.393  0.408  360
              SoilCrop STRUMSoil
                LL=[0.219, 0.215, 0.288, 0.288, 0.288, 0.288, 0.288]
                KL=[0.127488, 0.0876213, 0.0381867, 0.018828, 0.00928316, 0.00457707, 0]
                XF=[1, 1, 1, 1, 1, 1, 1]
            WaterBalance SoilWater: SummerDate=1-oct; SummerU=9; SummerCona=4.4; WinterDate=1-apr; WinterU=4; WinterCona=2; DiffusConst=88; DiffusSlope=35; Salb=0.13; CN2Bare=80; CNRed=26; CNCov=0.8; DischargeWidth=0; CatchmentArea=0; PSIDul=-100
              Thickness  SWCON  KLAT
              75         0.35   0
              275        0.3    0
              1650       0.25   0
            Organic: FOMCNRatio=40; CarbonUnits=Total
              Thickness  Carbon    SoilCNRatio  FBiom      FInert    FOM
              50         5.5       11           0.0788566  0.415799  124.07
              50         5.5       11           0.0610103  0.475828  115.105
              50         5.5       11           0.0477893  0.526641  106.788
              50         4.53927   11           0.037995   0.580518  99.0722
              50         3.1087    11           0.0307392  0.637713  91.9135
              50         2.14976   11           0.025364   0.688296  85.2722
              50         1.50696   11           0.0213819  0.733357  79.1107
              50         1.07608   11           0.0184319  0.773751  73.3945
              50         0.787257  11           0.0162465  0.810056  68.0912
              50         0.59365   11           0.0146275  0.842545  63.1712
              250        0.318565  11           0.0118814  0.91667   43.4169
              250        0.216046  11           0.0104198  0.976779  29.84
              500        0.200799  11           0.0100442  0.990832  14.0954
              500        0.200015  11           0.0100022  0.996255  6.6582
            Water: Thickness=[75, 275, 330, 330, 330, 330, 330]; InitialValues=[0.4242, 0.3563, 0.3825, 0.3825, 0.3825, 0.3825, 0.3825]; FilledFromTop=false
            LayerStructure: Thickness=[75, 275, 330, 330, 330, 330, 330]
            Solute NO3: Thickness=[75, 275, 1650]; InitialValues=[5.79976, 4.13088, 0.0548727]; InitialValuesUnits=ppm; WaterTableConcentration=0; D0=0; DepthConstant=0; MaxDepthSoluteAccessible=0; RunoffEffectivenessAtMovingSolute=0; MaxEffectiveRunoff=0
            Solute NH4: Thickness=[75, 275, 1650]; InitialValues=[0.869963, 0.619632, 0.0082309]; InitialValuesUnits=ppm; WaterTableConcentration=0; D0=0; DepthConstant=0; MaxDepthSoluteAccessible=0; RunoffEffectivenessAtMovingSolute=0; MaxEffectiveRunoff=0
            Solute Urea: Thickness=[75, 275, 1650]; InitialValues=[0, 0, 0]; InitialValuesUnits=kg/ha; WaterTableConcentration=0; D0=0; DepthConstant=0; MaxDepthSoluteAccessible=0; RunoffEffectivenessAtMovingSolute=0; MaxEffectiveRunoff=0
            Nutrient
            SoilTemperature Temperature: InteractionsPerDay=8
            OutputLayers: Thickness=[400, 400, 200, 200, 400, 400]
          StrumTreeInstance KiwiFruit: TreeType=Deciduous; RowSpacing=3.6; InterRowSpacing=3; AlleyZoneWidthFrac=0.1; BudBreakDate=19-Sep; StartFullCanopyDate=15-Dec; StartLeafFallDate=18-May; EndLeafFallDate=21-Jun; DBHatMaturity=5; TypicalCanopyArea=22; WoodBulkDensity=450; WoodStorageFraction=0.2; MaximumLeafBiomass=150; MaximumRootBiomass=200; AgeAtSimulationStart=6; YearsToMaxDimension=6; CrownShape=1; MatureCanopyBaseHeight=1.8; MaturePrunedCanopyBaseHeight=1.8; MatureHeight=2.4; MaturePrunedHeight=2.4; MatureWidth=3.4; MaturePrunedWidth=3.4; SummerPruneDates=[15-Jul]; FRemoveSummerPrune=0.25; RootNConc=0.01; LeafNConc=0.02; WoodNConc=0.005; FruitNConc=0.02; NFixationFrac=0; GRINZ=true; MaxRD=1; ExtinctCoeff=0.8; BaseCover=0; MaxCover=0.95; RUE=2; PSBaseT=10; PSLOptT=20; PSUOptT=25; PSMaxT=35; GSMax=0.011; R50=125; SurfaceKL=0.1; WaterStress=true; Number=45; PotentialFWPerFruit=140; DMC=0.17; FruitDensity=1.02; DateMaxBloom=7-Nov; DAFStartLinearGrowth=90; DAFEndLinearGrowth=180; DAFMaxSize=200
        Manager AutoIrrigationDeficitBased
          AllowIrrigation = True
          depthPAWC = 1000
          triggerDeficit = 50
          irrigateAmount = 15
          returndays = 2
          IrrigateAlley = False
```csharp
using APSIM.Core;
using Models.Interfaces;
using System;
using Models.Core;
using Models.PMF;
using Models.Soils;
using System.Xml.Serialization;
using APSIM.Shared.Utilities;
using Newtonsoft.Json;

        
namespace Models
{
    [Serializable] 
    [System.Xml.Serialization.XmlInclude(typeof(Model))]
    public class Script : Model, IStructureDependency
    {
        [Link] private Clock Clock;
        [Link] private Zone patch;
        [Link] private ISummary summary;
        [Link] private Soil Soil;
        [Link(IsOptional = true)] private IPlant existingCrop;
        [Link] private IPhysical soilPhysical;
        [Link] private ISoilWater waterBalance;
        [Link(Type = LinkType.Scoped, ByName = true)] private Zone Row;
        [Link(Type = LinkType.Scoped, ByName = true, IsOptional = true)] private Zone Alley;
        private double TopDUL;
        private double TopLL;
        private int nLayers;
        public IStructure Structure { private get; set; }
        //[Link] private Irrigation Irrigation;
        
       
        // Parameters from user interface
        [Separator("Manager for controlling automatic irrigation")]
        [Description(" Allow this manager to control irrigation?")]
        public bool AllowIrrigation { get; set; }
      
        [Separator(" Parameters for the irrigation system")]
        [Description(" Depth to calculate PAWC and deficit (mm)")]
        public double depthPAWC { get; set; }
        [Description(" Deficit to trigger irrigations (% PAWC)")]
        public double triggerDeficit { get; set; }
        [Description(" Irrigation amount to apply each event (mm)")]
        public double irrigateAmount { get; set; }
        [Description(" Minimum days for irrigation to return")]
        public double returndays { get; set; }
        
        [Description("Is the Alley zone irrigated?")]
        public bool IrrigateAlley {get; set;}

        //Class members
        [JsonIgnore] public double IrrigLayerSWDeficit { get; set; }
        [JsonIgnore] public double TopSWC { get; set; }
        [JsonIgnore] public double DaysSinceIrrigation { get; set; }
        [JsonIgnore] public double AmountToApply { get; set; }
        [JsonIgnore] public double SeasonAppliedAmount { get; set; }
        
        private bool IrrigationIsAllowed { get; set; }
        private bool CropIsActive { get; set; }
        private bool IrrigatorIsAvailable { get; set; }
        private bool SoilIsDry { get; set; }

    
        //Calculate static soil variables

        

        [EventSubscribe("StartOfSimulation")]
        private void OnStartOfSimulation(object sender, EventArgs e)
        {
            
            //Can we irrigate at all?
            IrrigationIsAllowed = false; 
            if (AllowIrrigation)
                IrrigationIsAllowed = true; 

            //Calculate soil water variables
            double depthFromSurface = 0.0;
            double fracLayer = 0.0;
            nLayers = soilPhysical.Thickness.Length;
            for (int layer = 0; layer < nLayers; layer++)
            {
                fracLayer = Math.Min(1.0, (depthPAWC - depthFromSurface) / soilPhysical.Thickness[layer]);
                TopLL += soilPhysical.LL15mm[layer] * fracLayer;
                TopDUL += soilPhysical.DULmm[layer] * fracLayer;
                depthFromSurface += soilPhysical.Thickness[layer];
                if (depthFromSurface >= depthPAWC)
                    layer = nLayers;
            }
        }
             
        //Determine daily requirement for irrigation
        [EventSubscribe("StartOfDay")]
        private void OnStartOfDay(object sender, EventArgs e)
        {
            AmountToApply = 0.0;
            DaysSinceIrrigation += 1;

            //Is the row crop actively growing?
            CropIsActive = false;
            double StageCode = (double)Structure.Get("STRUM.Phenology.Stage", relativeTo: Row);
            if ((StageCode > 3.0) && (StageCode<5.0))
            {
                CropIsActive = true;
            }
          
            //Is the irrigator available?
            IrrigatorIsAvailable = false;
            if (DaysSinceIrrigation >= returndays)
                IrrigatorIsAvailable = true;
          
            //Is the soil dry enough to require irrigation?
            SoilIsDry = false;
            double depthFromSurface = 0.0;
            double fracLayer = 0.0;
            TopSWC = 0.0;
            for (int layer = 0; layer < nLayers; layer++)
            //for (int layer = 0; depthFromSurface < depthPAWC + soilPhysical.Thickness[layer]; layer++)
            {
                fracLayer = Math.Min(1.0, (depthPAWC - depthFromSurface) / soilPhysical.Thickness[layer]);
                TopSWC += waterBalance.SWmm[layer] * fracLayer;
                depthFromSurface += soilPhysical.Thickness[layer];
                if (depthFromSurface >= depthPAWC)
                    layer = nLayers;
            }
            
            IrrigLayerSWDeficit = TopSWC - TopDUL;
            if (Math.Max(0.0, -IrrigLayerSWDeficit) >= (TopDUL - TopLL) * (100 - triggerDeficit) / 100)
                SoilIsDry = true;

            //Are all the conditions ratifying irrigation
            if (IrrigationIsAllowed && CropIsActive && IrrigatorIsAvailable && SoilIsDry)
            {
                //Lets irrigate well !!!!
                Irrigation irrigRow = (Irrigation)Structure.Get("Irrigation", relativeTo: Row);
                irrigRow.Apply(irrigateAmount, depth: 0);
                DaysSinceIrrigation = 0;
                if (IrrigateAlley)
                {
                   Irrigation irrigAlley = (Irrigation)Structure.Get("Irrigation", relativeTo: Alley);
                   irrigAlley.Apply(irrigateAmount , depth: 0);           
                }
            }
        }
    }
}
```
    Experiment Pukekohe
      Factors
        Factor IrrigationRegime
          CompositeFactor Rainfed
            Specifications:
              [RadiationWindFactor].Script.RadiationFactor = 0.75
              [RadiationWindFactor].Script.WindFactor = 0.5
              [AutoIrrigationDeficitBased].Script.AllowIrrigation = FALSE
          CompositeFactor Deficit
            Specifications:
              [RadiationWindFactor].Script.RadiationFactor = 0.75
              [RadiationWindFactor].Script.WindFactor = 0.5
              [AutoIrrigationDeficitBased].Script.AllowIrrigation = TRUE
              [AutoIrrigationDeficitBased].Script.triggerDeficit = 30
          CompositeFactor Full
            Specifications:
              [RadiationWindFactor].Script.RadiationFactor = 0.75
              [RadiationWindFactor].Script.WindFactor = 0.5
              [AutoIrrigationDeficitBased].Script.AllowIrrigation = TRUE
              [AutoIrrigationDeficitBased].Script.triggerDeficit = 50
          CompositeFactor Excess
            Specifications:
              [RadiationWindFactor].Script.RadiationFactor = 0.75
              [RadiationWindFactor].Script.WindFactor = 0.5
              [AutoIrrigationDeficitBased].Script.AllowIrrigation = TRUE
              [AutoIrrigationDeficitBased].Script.triggerDeficit = 70
      Simulation Site2
        Clock: Start=1994-06-21; End=2020-12-01
        Summary SummaryFile
        Weather: FileName=VCSN/Pukekohe21728_Waipipi.met
        MicroClimate: a_interception=0; b_interception=1; c_interception=0; d_interception=0; SoilHeatFluxFraction=0.4; MinimumHeightDiffForNewLayer=0; NightInterceptionFraction=0.5; ReferenceHeight=2
        SoilArbitrator Soil Arbitrator
        Manager AutomaticFertiliser: same as Sensitivity.Kerikeri.Site1.AutomaticFertiliser
        Manager ResetDate
```csharp
using Newtonsoft.Json;
using Models.PMF.Organs;
using Models.Soils.Nutrients;
using Models.Interfaces;
using System;
using Models.Core;
using System.Collections.Generic;
using System.Text;
using Models.Soils;
using Models.PMF;
using Models;
using System.Xml.Serialization;
using APSIM.Shared.Utilities;
using Models.Climate;



namespace Models
{
    [Serializable] 
    //[System.Xml.Serialization.XmlInclude(typeof(Model))]
    public class Script : Model
    {
    
     [Link] private Clock Clock;
        
    //[Separator("Manager to summarise variables")]
        //[Description(" Date to end the simulation year and reset: ")]
        //public string ResetDate { get; set; }
                  
        [JsonIgnore] public double SimulationYear { get; set; }
        [JsonIgnore] public double DAS { get; set; }
        
         [EventSubscribe("StartOfSimulation")]
        private void DoStartOfSimulation(object sender, EventArgs e)
        {
                DAS = 0;
                SimulationYear = 1995;
        }
        
        [EventSubscribe("StartOfDay")]
        private void OnStartOfDay(object sender, EventArgs e)
        {
            DAS += 1;
            //if (DateUtilities.DatesAreEqual(ResetDate, Clock.Today.Date))
            if (DateUtilities.DatesAreEqual("Jul-1", Clock.Today.Date))
            {
                SimulationYear += 1;
                DAS = 1;
                
            }
        }
    
    }
}
```
        Manager RadiationWindFactor: same as Sensitivity.Kerikeri.Site1.RadiationWindFactor
        RectangularZone Row: Length=100; Width=1; CanopyType=TreeRow; Slope=0; AspectAngle=0; Altitude=50
          Report RowZoneReport: EventNames=[Clock].DoReport
          Report KiwiReport: same as Sensitivity.Kerikeri.Site1.Row.KiwiReport
          SurfaceOrganicMatter: InitialResidueName=wheat_stubble; InitialResidueType=wheat; InitialResidueMass=500; InitialStandingFraction=0; InitialCPR=0; InitialCNR=100
          Fertiliser
          Irrigation
          Manager MulchResidues: same as Sensitivity.Kerikeri.Site1.Row.MulchResidues
          Plant STRUM
          Soil Otorohanga_24b1: SoilType=Typic Orthic Allophanic Soils; LocalName=Otorohanga_24b1; Latitude=-41; Longitude=174
            DataSource=Profile descriptions provided by Smap based on the work done by Trevor Webb.
            Chemical: Thickness=[210, 325, 1465]; PH=[7, 7, 7]; PHUnits=Water
            Physical
              Thickness  ParticleSizeSand  ParticleSizeSilt  ParticleSizeClay  BD     AirDry  LL15   DUL    SAT    KS
              210        25                60                15                0.71   0.134   0.269  0.5    0.661  1920
              325        25                60                15                0.703  0.238   0.276  0.472  0.664  1920
              366.3      20                60                20                0.742  0.33    0.33   0.523  0.649  1440
              366.3      20                60                20                0.742  0.33    0.33   0.523  0.649  1440
              366.3      20                60                20                0.742  0.33    0.33   0.523  0.649  1440
              366.3      20                60                20                0.742  0.33    0.33   0.523  0.649  1440
              SoilCrop STRUMSoil: LL=[0.269, 0.276, 0.33, 0.33, 0.33, 0.33]; KL=[0.11032, 0.072553, 0.0296508, 0.0135253, 0.00616958, 0]; XF=[1, 1, 1, 1, 1, 1]
            WaterBalance SoilWater: SummerDate=1-oct; SummerU=9; SummerCona=4.4; WinterDate=1-apr; WinterU=4; WinterCona=2; DiffusConst=88; DiffusSlope=35; Salb=0.13; CN2Bare=80; CNRed=29; CNCov=0.8; DischargeWidth=0; CatchmentArea=0; PSIDul=-100
              Thickness  SWCON  KLAT
              210        0.4    0
              325        0.3    0
              1465       0.4    0
            Organic: FOMCNRatio=40; CarbonUnits=Total
              Thickness  Carbon    SoilCNRatio  FBiom      FInert    FOM
              50         10        11.1         0.0788566  0.575     124.07
              50         10        11.1         0.0610103  0.575     115.105
              50         10        11.1         0.0477893  0.613573  106.788
              50         8.22356   11.1         0.037995   0.662199  99.0722
              50         5.57835   11.1         0.0307392  0.709226  91.9135
              50         3.80522   11.1         0.025364   0.749972  85.2722
              50         2.61665   11.1         0.0213819  0.785433  79.1107
              50         1.81993   11.1         0.0184319  0.816456  73.3945
              50         1.28587   11.1         0.0162465  0.843742  68.0912
              50         0.927881  11.1         0.0146275  0.867834  63.1712
              250        0.419234  11.1         0.0118814  0.923972  43.4169
              250        0.22967   11.1         0.0104198  0.978156  29.84
              500        0.201477  11.1         0.0100442  0.990841  14.0954
              500        0.200027  11.1         0.0100022  0.996255  6.6582
            Water: Thickness=[210, 325, 366.3, 366.3, 366.3, 366.3]; InitialValues=[0.4769, 0.4524, 0.5037, 0.5037, 0.5037, 0.5037]; FilledFromTop=false
            LayerStructure: Thickness=[210, 325, 366.3, 366.3, 366.3, 366.3]
            Solute NO3: Thickness=[210, 325, 1465]; InitialValues=[8.92019, 2.55531, 0.079277]; InitialValuesUnits=ppm; WaterTableConcentration=0; D0=0; DepthConstant=0; MaxDepthSoluteAccessible=0; RunoffEffectivenessAtMovingSolute=0; MaxEffectiveRunoff=0
            Solute NH4: Thickness=[210, 325, 1465]; InitialValues=[1.33803, 0.383296, 0.0118915]; InitialValuesUnits=ppm; WaterTableConcentration=0; D0=0; DepthConstant=0; MaxDepthSoluteAccessible=0; RunoffEffectivenessAtMovingSolute=0; MaxEffectiveRunoff=0
            Solute Urea: Thickness=[210, 325, 1465]; InitialValues=[0, 0, 0]; InitialValuesUnits=kg/ha; WaterTableConcentration=0; D0=0; DepthConstant=0; MaxDepthSoluteAccessible=0; RunoffEffectivenessAtMovingSolute=0; MaxEffectiveRunoff=0
            Nutrient
            SoilTemperature Temperature: InteractionsPerDay=8
            OutputLayers: Thickness=[400, 400, 200, 200, 400, 400]
          StrumTreeInstance KiwiFruit: TreeType=Deciduous; RowSpacing=3.6; InterRowSpacing=3; AlleyZoneWidthFrac=0.1; BudBreakDate=19-Sep; StartFullCanopyDate=15-Dec; StartLeafFallDate=18-May; EndLeafFallDate=21-Jun; DBHatMaturity=5; TypicalCanopyArea=22; WoodBulkDensity=450; WoodStorageFraction=0.2; MaximumLeafBiomass=150; MaximumRootBiomass=200; AgeAtSimulationStart=6; YearsToMaxDimension=6; CrownShape=1; MatureCanopyBaseHeight=1.8; MaturePrunedCanopyBaseHeight=1.8; MatureHeight=2.4; MaturePrunedHeight=2.4; MatureWidth=3.4; MaturePrunedWidth=3.4; SummerPruneDates=[15-Jul]; FRemoveSummerPrune=0.25; RootNConc=0.01; LeafNConc=0.02; WoodNConc=0.005; FruitNConc=0.02; NFixationFrac=0; GRINZ=true; MaxRD=1; ExtinctCoeff=0.8; BaseCover=0; MaxCover=0.95; RUE=2; PSBaseT=10; PSLOptT=20; PSUOptT=25; PSMaxT=35; GSMax=0.011; R50=125; SurfaceKL=0.1; WaterStress=true; Number=60; PotentialFWPerFruit=140; DMC=0.17; FruitDensity=1.02; DateMaxBloom=7-Nov; DAFStartLinearGrowth=90; DAFEndLinearGrowth=180; DAFMaxSize=200
        Manager AutoIrrigationDeficitBased: same as Sensitivity.Kerikeri.Site1.AutoIrrigationDeficitBased
    Experiment Katikati
      Factors: same as Sensitivity.Kerikeri.Factors
      Simulation Site3
        Clock: Start=1994-06-21; End=2020-12-01
        Summary SummaryFile
        Weather: FileName=VCSN/Katikati 29379_Matahui.met
        MicroClimate: a_interception=0; b_interception=1; c_interception=0; d_interception=0; SoilHeatFluxFraction=0.4; MinimumHeightDiffForNewLayer=0; NightInterceptionFraction=0.5; ReferenceHeight=2
        SoilArbitrator Soil Arbitrator
        Manager AutomaticFertiliser: same as Sensitivity.Kerikeri.Site1.AutomaticFertiliser
        Manager AutoIrrigationDeficitBased: same as Sensitivity.Kerikeri.Site1.AutoIrrigationDeficitBased
        Manager ResetDate: same as Sensitivity.Pukekohe.Site2.ResetDate
        Manager RadiationWindFactor: same as Sensitivity.Kerikeri.Site1.RadiationWindFactor
        RectangularZone Row: Length=100; Width=1; CanopyType=TreeRow; Slope=0; AspectAngle=0; Altitude=50
          Report RowZoneReport: EventNames=[Clock].DoReport
          Report KiwiReport: same as Sensitivity.Kerikeri.Site1.Row.KiwiReport
          SurfaceOrganicMatter: InitialResidueName=wheat_stubble; InitialResidueType=wheat; InitialResidueMass=500; InitialStandingFraction=0; InitialCPR=0; InitialCNR=100
          Fertiliser
          Irrigation
          Manager MulchResidues: same as Sensitivity.Kerikeri.Site1.Row.MulchResidues
          Plant STRUM
          Soil Ngakura_1a3: SoilType=Typic Orthic Allophanic Soils; LocalName=Ngakura_1a3; Latitude=-41; Longitude=174
            DataSource=Profile descriptions provided by Smap based on the work done by Trevor Webb.
            Chemical: Thickness=[195, 425, 1380]; PH=[7, 7, 7]; PHUnits=Water
            Physical
              Thickness  ParticleSizeSand  ParticleSizeSilt  ParticleSizeClay  BD     AirDry  LL15   DUL    SAT    KS
              195        42.5              42                15.5              0.764  0.12    0.24   0.466  0.64   1920
              425        41                40.5              18.5              0.727  0.223   0.254  0.444  0.654  1920
              345        25.5              51.5              23                0.82   0.323   0.323  0.531  0.619  480
              345        25.5              51.5              23                0.82   0.323   0.323  0.531  0.619  480
              345        25.5              51.5              23                0.82   0.323   0.323  0.531  0.619  480
              345        25.5              51.5              23                0.82   0.323   0.323  0.531  0.619  480
              SoilCrop STRUMSoil: LL=[0.24, 0.254, 0.323, 0.323, 0.323, 0.323]; KL=[0.112107, 0.0673106, 0.0210699, 0.0100599, 0.00480316, 0]; XF=[1, 1, 1, 1, 1, 1]
            WaterBalance SoilWater: SummerDate=1-oct; SummerU=9; SummerCona=4.4; WinterDate=1-apr; WinterU=4; WinterCona=2; DiffusConst=88; DiffusSlope=35; Salb=0.13; CN2Bare=75; CNRed=37; CNCov=0.8; DischargeWidth=0; CatchmentArea=0; PSIDul=-100
              Thickness  SWCON  KLAT
              195        0.4    0
              425        0.3    0
              1380       0.3    0
            Organic: same as Sensitivity.Pukekohe.Site2.Row.Otorohanga_24b1.Organic
            Water: Thickness=[195, 425, 345, 345, 345, 345]; InitialValues=[0.4434, 0.425, 0.5102, 0.5102, 0.5102, 0.5102]; FilledFromTop=false
            LayerStructure: Thickness=[195, 425, 345, 345, 345, 345]
            Solute NO3: Thickness=[195, 425, 1380]; InitialValues=[8.2897, 2.2132, 0.071736]; InitialValuesUnits=ppm; WaterTableConcentration=0; D0=0; DepthConstant=0; MaxDepthSoluteAccessible=0; RunoffEffectivenessAtMovingSolute=0; MaxEffectiveRunoff=0
            Solute NH4: Thickness=[195, 425, 1380]; InitialValues=[1.24346, 0.33198, 0.0107604]; InitialValuesUnits=ppm; WaterTableConcentration=0; D0=0; DepthConstant=0; MaxDepthSoluteAccessible=0; RunoffEffectivenessAtMovingSolute=0; MaxEffectiveRunoff=0
            Solute Urea: Thickness=[195, 425, 1380]; InitialValues=[0, 0, 0]; InitialValuesUnits=kg/ha; WaterTableConcentration=0; D0=0; DepthConstant=0; MaxDepthSoluteAccessible=0; RunoffEffectivenessAtMovingSolute=0; MaxEffectiveRunoff=0
            Nutrient
            SoilTemperature Temperature: InteractionsPerDay=8
            OutputLayers: Thickness=[400, 400, 200, 200, 400, 400]
          StrumTreeInstance KiwiFruit: same as Sensitivity.Pukekohe.Site2.Row.KiwiFruit
    Experiment Pukehina
      Factors: same as Sensitivity.Pukekohe.Factors
      Simulation Site4
        Clock: Start=1994-06-21; End=2020-12-01
        Summary SummaryFile
        Weather: FileName=VCSN/Pukehina_30005_Pukehina.met
        MicroClimate: a_interception=0; b_interception=1; c_interception=0; d_interception=0; SoilHeatFluxFraction=0.4; MinimumHeightDiffForNewLayer=0; NightInterceptionFraction=0.5; ReferenceHeight=2
        SoilArbitrator Soil Arbitrator
        Manager AutomaticFertiliser: same as Sensitivity.Kerikeri.Site1.AutomaticFertiliser
        Manager ResetDate: same as Sensitivity.Pukekohe.Site2.ResetDate
        Manager RadiationWindFactor: same as Sensitivity.Kerikeri.Site1.RadiationWindFactor
        RectangularZone Row: Length=100; Width=1; CanopyType=TreeRow; Slope=0; AspectAngle=0; Altitude=50
          Report RowZoneReport: EventNames=[Clock].DoReport
          Report KiwiReport: same as Sensitivity.Kerikeri.Site1.Row.KiwiReport
          SurfaceOrganicMatter: InitialResidueName=wheat_stubble; InitialResidueType=wheat; InitialResidueMass=500; InitialStandingFraction=0; InitialCPR=0; InitialCNR=100
          Fertiliser
          Irrigation
          Manager MulchResidues: same as Sensitivity.Kerikeri.Site1.Row.MulchResidues
          Plant STRUM
          Soil Turangi_8a1: SoilType=Typic Orthic Pumice Soils; LocalName=Turangi_8a1; Latitude=-41; Longitude=174
            DataSource=Profile descriptions provided by Smap based on the work done by Trevor Webb.
            Chemical: Thickness=[150, 125, 100, 300, 1325]; PH=[7, 7, 7, 7, 7]; PHUnits=Water
            Physical
              Thickness  ParticleSizeSand  ParticleSizeSilt  ParticleSizeClay  BD     AirDry  LL15   DUL    SAT    KS
              150        80                15                5                 1.129  0.036   0.072  0.244  0.502  3600
              125        75                20                5                 1.146  0.037   0.075  0.229  0.495  1920
              100        87.5              9.5               3                 1.153  0.015   0.017  0.116  0.492  2400
              300        80                15                5                 1.198  0.053   0.053  0.204  0.475  1920
              331.3      87.5              9.5               3                 1.183  0.015   0.015  0.134  0.481  2400
              331.3      87.5              9.5               3                 1.183  0.015   0.015  0.134  0.481  2400
              331.3      87.5              9.5               3                 1.183  0.015   0.015  0.134  0.481  2400
              331.3      87.5              9.5               3                 1.183  0.015   0.015  0.134  0.48   2400
              SoilCrop STRUMSoil
                LL=[0.072, 0.075, 0.017, 0.053, 0.015, 0.015, 0.015, 0.015]
                KL=[0.137252, 0.102225, 0.0803268, 0.052328, 0.0266061, 0.0130816, 0.00643198, 0]
                XF=[1, 1, 1, 1, 1, 1, 1, 1]
            WaterBalance SoilWater: SummerDate=1-oct; SummerU=9; SummerCona=4.4; WinterDate=1-apr; WinterU=4; WinterCona=2; DiffusConst=88; DiffusSlope=35; Salb=0.13; CN2Bare=72; CNRed=37; CNCov=0.8; DischargeWidth=0; CatchmentArea=0; PSIDul=-100
              Thickness  SWCON  KLAT
              150        0.5    0
              125        0.45   0
              100        0.5    0
              300        0.45   0
              1325       0.5    0
            Organic: FOMCNRatio=40; CarbonUnits=Total
              Thickness  Carbon    SoilCNRatio  FBiom      FInert    FOM
              50         6         11           0.0788566  0.431898  124.07
              50         6         11           0.0610103  0.491926  115.105
              50         6         11           0.0477893  0.542739  106.788
              50         4.94864   11           0.037995   0.5956    99.0722
              50         3.38311   11           0.0307392  0.650815  91.9135
              50         2.3337    11           0.025364   0.69947   85.2722
              50         1.63026   11           0.0213819  0.742644  79.1107
              50         1.15873   11           0.0184319  0.781204  73.3945
              50         0.842658  11           0.0162465  0.815767  68.0912
              50         0.630787  11           0.0146275  0.846679  63.1712
              250        0.32975   11           0.0118814  0.917701  43.4169
              250        0.21756   11           0.0104198  0.97694   29.84
              500        0.200874  11           0.0100442  0.990833  14.0954
              500        0.200016  11           0.0100022  0.996255  6.6582
            Water: Thickness=[150, 125, 100, 300, 331.3, 331.3, 331.3, 331.3]; FilledFromTop=false
              InitialValues=[0.2268, 0.2136, 0.1061, 0.1889, 0.1221, 0.1221, 0.1221, 0.1221]
            LayerStructure: Thickness=[150, 125, 100, 300, 331.3, 331.3, 331.3, 331.3]
            Solute NO3: Thickness=[150, 125, 100, 300, 1325]; InitialValues=[5.60968, 5.52647, 1.41149, 0.0491014, 0.049724]; InitialValuesUnits=ppm; WaterTableConcentration=0; D0=0; DepthConstant=0; MaxDepthSoluteAccessible=0; RunoffEffectivenessAtMovingSolute=0; MaxEffectiveRunoff=0
            Solute NH4: Thickness=[150, 125, 100, 300, 1325]; InitialValues=[0.841453, 0.82897, 0.211724, 0.00736522, 0.0074586]; InitialValuesUnits=ppm; WaterTableConcentration=0; D0=0; DepthConstant=0; MaxDepthSoluteAccessible=0; RunoffEffectivenessAtMovingSolute=0; MaxEffectiveRunoff=0
            Solute Urea: Thickness=[150, 125, 100, 300, 1325]; InitialValues=[0, 0, 0, 0, 0]; InitialValuesUnits=kg/ha; WaterTableConcentration=0; D0=0; DepthConstant=0; MaxDepthSoluteAccessible=0; RunoffEffectivenessAtMovingSolute=0; MaxEffectiveRunoff=0
            Nutrient
            SoilTemperature Temperature: InteractionsPerDay=8
            OutputLayers: Thickness=[400, 400, 200, 200, 400, 400]
          StrumTreeInstance KiwiFruit: same as Sensitivity.Pukekohe.Site2.Row.KiwiFruit
        Manager AutoIrrigationDeficitBased: same as Sensitivity.Kerikeri.Site1.AutoIrrigationDeficitBased
    Experiment TePuke
      Factors: same as Sensitivity.Kerikeri.Factors
      Simulation Site5
        Clock: Start=1994-06-21; End=2020-12-01
        Summary SummaryFile
        Weather: FileName=VCSN/TePuke29966_Bayly_Rd.met
        MicroClimate: a_interception=0; b_interception=1; c_interception=0; d_interception=0; SoilHeatFluxFraction=0.4; MinimumHeightDiffForNewLayer=0; NightInterceptionFraction=0.5; ReferenceHeight=2
        SoilArbitrator Soil Arbitrator
        Manager AutomaticFertiliser: same as Sensitivity.Kerikeri.Site1.AutomaticFertiliser
        Manager ResetDate: same as Sensitivity.Pukekohe.Site2.ResetDate
        Manager RadiationWindFactor: same as Sensitivity.Kerikeri.Site1.RadiationWindFactor
        RectangularZone Row: Length=100; Width=1; CanopyType=TreeRow; Slope=0; AspectAngle=0; Altitude=50
          Report RowZoneReport: EventNames=[Clock].DoReport
          Report KiwiReport: same as Sensitivity.Kerikeri.Site1.Row.KiwiReport
          SurfaceOrganicMatter: InitialResidueName=wheat_stubble; InitialResidueType=wheat; InitialResidueMass=500; InitialStandingFraction=0; InitialCPR=0; InitialCNR=100
          Fertiliser
          Irrigation
          Manager MulchResidues: same as Sensitivity.Kerikeri.Site1.Row.MulchResidues
          Plant STRUM
          Soil Ngakura_2a1: SoilType=Typic Orthic Allophanic Soils; LocalName=Ngakura_2a1; Latitude=-41; Longitude=174
            DataSource=Profile descriptions provided by Smap based on the work done by Trevor Webb.
            Chemical: Thickness=[200, 725, 1075]; PH=[7, 7, 7]; PHUnits=Water
            Physical
              Thickness  ParticleSizeSand  ParticleSizeSilt  ParticleSizeClay  BD     AirDry  LL15   DUL    SAT    KS
              200        69.5              22                8.5               0.744  0.096   0.192  0.429  0.648  1920
              362.5      56                31                13                0.589  0.157   0.183  0.317  0.451  1440
              362.5      56                31                13                0.589  0.183   0.183  0.317  0.451  1440
              358.3      51.5              32                16.5              0.802  0.264   0.264  0.46   0.579  1440
              358.3      51.5              32                16.5              0.802  0.264   0.264  0.46   0.579  1440
              358.3      51.5              32                16.5              0.802  0.264   0.264  0.46   0.579  1440
              SoilCrop STRUMSoil: LL=[0.192, 0.183, 0.183, 0.264, 0.264, 0.264]; KL=[0.111508, 0.0610331, 0.028068, 0.0129662, 0.00601682, 0]; XF=[1, 1, 1, 1, 1, 1]
            WaterBalance SoilWater: SummerDate=1-oct; SummerU=9; SummerCona=4.4; WinterDate=1-apr; WinterU=4; WinterCona=2; DiffusConst=88; DiffusSlope=35; Salb=0.13; CN2Bare=74; CNRed=37; CNCov=0.8; DischargeWidth=0; CatchmentArea=0; PSIDul=-100
              Thickness  SWCON  KLAT
              200        0.4    0
              725        0.4    0
              1075       0.4    0
            Organic: same as Sensitivity.Pukekohe.Site2.Row.Otorohanga_24b1.Organic
            Water: Thickness=[200, 362.5, 362.5, 358.3, 358.3, 358.3]; InitialValues=[0.4053, 0.3036, 0.3036, 0.4404, 0.4404, 0.4404]; FilledFromTop=false
            LayerStructure: Thickness=[200, 362.5, 362.5, 358.3, 358.3, 358.3]
            Solute NO3: Thickness=[200, 725, 1075]; InitialValues=[8.51254, 1.56922, 0.0734322]; InitialValuesUnits=ppm; WaterTableConcentration=0; D0=0; DepthConstant=0; MaxDepthSoluteAccessible=0; RunoffEffectivenessAtMovingSolute=0; MaxEffectiveRunoff=0
            Solute NH4: Thickness=[200, 725, 1075]; InitialValues=[1.27688, 0.235384, 0.0110195]; InitialValuesUnits=ppm; WaterTableConcentration=0; D0=0; DepthConstant=0; MaxDepthSoluteAccessible=0; RunoffEffectivenessAtMovingSolute=0; MaxEffectiveRunoff=0
            Solute Urea: Thickness=[200, 725, 1075]; InitialValues=[0, 0, 0]; InitialValuesUnits=kg/ha; WaterTableConcentration=0; D0=0; DepthConstant=0; MaxDepthSoluteAccessible=0; RunoffEffectivenessAtMovingSolute=0; MaxEffectiveRunoff=0
            Nutrient
            SoilTemperature Temperature: InteractionsPerDay=8
            OutputLayers: Thickness=[400, 400, 200, 200, 400, 400]
          StrumTreeInstance KiwiFruit: TreeType=Deciduous; RowSpacing=3.6; InterRowSpacing=3; AlleyZoneWidthFrac=0.1; BudBreakDate=1-Oct; StartFullCanopyDate=1-Dec; StartLeafFallDate=18-May; EndLeafFallDate=21-Jun; DBHatMaturity=5; TypicalCanopyArea=22; WoodBulkDensity=450; WoodStorageFraction=0.2; MaximumLeafBiomass=150; MaximumRootBiomass=200; AgeAtSimulationStart=6; YearsToMaxDimension=6; CrownShape=1; MatureCanopyBaseHeight=1.8; MaturePrunedCanopyBaseHeight=1.8; MatureHeight=2.4; MaturePrunedHeight=2.4; MatureWidth=3.4; MaturePrunedWidth=3.4; SummerPruneDates=[15-Jul]; FRemoveSummerPrune=0.25; RootNConc=0.01; LeafNConc=0.02; WoodNConc=0.005; FruitNConc=0.02; NFixationFrac=0; GRINZ=false; MaxRD=1; ExtinctCoeff=0.8; BaseCover=0; MaxCover=0.95; RUE=2; PSBaseT=10; PSLOptT=20; PSUOptT=25; PSMaxT=35; GSMax=0.011; R50=125; SurfaceKL=0.1; WaterStress=true; Number=45; PotentialFWPerFruit=110; DMC=0.17; FruitDensity=1.02; DateMaxBloom=7-Nov; DAFStartLinearGrowth=90; DAFEndLinearGrowth=180; DAFMaxSize=200
        Manager AutoIrrigationDeficitBased: same as Sensitivity.Kerikeri.Site1.AutoIrrigationDeficitBased
    Experiment Whakatane
      Factors: same as Sensitivity.Kerikeri.Factors
      Simulation Site6
        Clock: Start=1994-06-21; End=2020-12-01
        Summary SummaryFile
        Weather: FileName=VCSN/Whakatane31120_Opotiki.met
        MicroClimate: a_interception=0; b_interception=1; c_interception=0; d_interception=0; SoilHeatFluxFraction=0.4; MinimumHeightDiffForNewLayer=0; NightInterceptionFraction=0.5; ReferenceHeight=2
        SoilArbitrator Soil Arbitrator
        Manager AutomaticFertiliser: same as Sensitivity.Kerikeri.Site1.AutomaticFertiliser
        Manager ResetDate: same as Sensitivity.Pukekohe.Site2.ResetDate
        Manager RadiationWindFactor: same as Sensitivity.Kerikeri.Site1.RadiationWindFactor
        RectangularZone Row: Length=100; Width=1; CanopyType=TreeRow; Slope=0; AspectAngle=0; Altitude=50
          Report RowZoneReport: EventNames=[Clock].DoReport
          Report KiwiReport: same as Sensitivity.Kerikeri.Site1.Row.KiwiReport
          SurfaceOrganicMatter: InitialResidueName=wheat_stubble; InitialResidueType=wheat; InitialResidueMass=500; InitialStandingFraction=0; InitialCPR=0; InitialCNR=100
          Fertiliser
          Irrigation
          Manager MulchResidues: same as Sensitivity.Kerikeri.Site1.Row.MulchResidues
          Plant STRUM
          Soil Opotiki_1a1: SoilType=Allophanic Orthic Pumice Soils; LocalName=Opotiki_1a1; Latitude=-41; Longitude=174
            DataSource=Profile descriptions provided by Smap based on the work done by Trevor Webb.
            Chemical: Thickness=[210, 220, 275, 1295]; PH=[7, 7, 7, 7]; PHUnits=Water
            Physical
              Thickness  ParticleSizeSand  ParticleSizeSilt  ParticleSizeClay  BD     AirDry  LL15   DUL    SAT    KS
              210        55                36                9                 0.874  0.085   0.171  0.403  0.598  1920
              220        55                36                9                 1.009  0.125   0.157  0.353  0.547  1440
              275        62.5              34                3.5               1.026  0.092   0.092  0.32   0.541  1920
              323.8      65                26.5              8.5               1.053  0.109   0.109  0.32   0.531  1920
              323.8      65                26.5              8.5               1.053  0.109   0.109  0.32   0.531  1920
              323.8      65                26.5              8.5               1.053  0.109   0.109  0.32   0.531  1920
              323.8      65                26.5              8.5               1.053  0.109   0.109  0.32   0.531  1920
              SoilCrop STRUMSoil
                LL=[0.171, 0.157, 0.092, 0.109, 0.109, 0.109, 0.109]
                KL=[0.11032, 0.0695932, 0.047773, 0.0251508, 0.0125665, 0.00627877, 0]
                XF=[1, 1, 1, 1, 1, 1, 1]
            WaterBalance SoilWater: SummerDate=1-oct; SummerU=9; SummerCona=4.4; WinterDate=1-apr; WinterU=4; WinterCona=2; DiffusConst=88; DiffusSlope=35; Salb=0.13; CN2Bare=72; CNRed=37; CNCov=0.8; DischargeWidth=0; CatchmentArea=0; PSIDul=-100
              Thickness  SWCON  KLAT
              210        0.4    0
              220        0.4    0
              275        0.45   0
              1295       0.3    0
            Organic: same as Sensitivity.Pukehina.Site4.Row.Turangi_8a1.Organic
            Water: Thickness=[210, 220, 275, 323.8, 323.8, 323.8, 323.8]; InitialValues=[0.3798, 0.3334, 0.2972, 0.2989, 0.2989, 0.2989, 0.2989]; FilledFromTop=false
            LayerStructure: Thickness=[210, 220, 275, 323.8, 323.8, 323.8, 323.8]
            Solute NO3: Thickness=[210, 220, 275, 1295]; InitialValues=[7.24638, 2.60225, 0.0573329, 0.0558628]; InitialValuesUnits=ppm; WaterTableConcentration=0; D0=0; DepthConstant=0; MaxDepthSoluteAccessible=0; RunoffEffectivenessAtMovingSolute=0; MaxEffectiveRunoff=0
            Solute NH4: Thickness=[210, 220, 275, 1295]; InitialValues=[1.08696, 0.390337, 0.00859993, 0.00837942]; InitialValuesUnits=ppm; WaterTableConcentration=0; D0=0; DepthConstant=0; MaxDepthSoluteAccessible=0; RunoffEffectivenessAtMovingSolute=0; MaxEffectiveRunoff=0
            Solute Urea: Thickness=[210, 220, 275, 1295]; InitialValues=[0, 0, 0, 0]; InitialValuesUnits=kg/ha; WaterTableConcentration=0; D0=0; DepthConstant=0; MaxDepthSoluteAccessible=0; RunoffEffectivenessAtMovingSolute=0; MaxEffectiveRunoff=0
            Nutrient
            SoilTemperature Temperature: InteractionsPerDay=8
            OutputLayers: Thickness=[400, 400, 200, 200, 400, 400]
          StrumTreeInstance KiwiFruit: same as Sensitivity.Pukekohe.Site2.Row.KiwiFruit
        Manager AutoIrrigationDeficitBased: same as Sensitivity.Kerikeri.Site1.AutoIrrigationDeficitBased
    Experiment Gisborne
      Factors: same as Sensitivity.Kerikeri.Factors
      Simulation Site7
        Clock: Start=1994-06-21; End=2020-12-01
        Summary SummaryFile
        Weather: FileName=VCSN/Gisborne_30639_Whaerengaahika.met
        MicroClimate: a_interception=0; b_interception=1; c_interception=0; d_interception=0; SoilHeatFluxFraction=0.4; MinimumHeightDiffForNewLayer=0; NightInterceptionFraction=0.5; ReferenceHeight=2
        SoilArbitrator Soil Arbitrator
        Manager AutoIrrigationDeficitBased: same as Sensitivity.Kerikeri.Site1.AutoIrrigationDeficitBased
        Manager AutomaticFertiliser: same as Sensitivity.Kerikeri.Site1.AutomaticFertiliser
        Manager ResetDate: same as Sensitivity.Pukekohe.Site2.ResetDate
        Manager RadiationWindFactor: same as Sensitivity.Kerikeri.Site1.RadiationWindFactor
        RectangularZone Row: Length=100; Width=1; CanopyType=TreeRow; Slope=0; AspectAngle=0; Altitude=50
          Report RowZoneReport: EventNames=[Clock].DoReport
          Report KiwiReport: EventNames=[Clock].DoReport
            VariableNames:
              [Clock].Today
              [ResetDate].Script.SimulationYear as SimYear
              [Row].STRUM.AccumulatedWaterStress
              //[Row].STRUM.Arbitrator.DemandRatio
              [Row].Area
              [Row].STRUM.BaseHeight
              [Row].STRUM.Fruit.FreshYield_kgPerHa
              [Row].STRUM.CanopyArea
              [Row].STRUM.RootUptakesArbitrator.WaterDemand.Amount
              [Row].STRUM.RootUptakesArbitrator.WaterDemand.mm
              [Row].STRUM.RootUptakesArbitrator.NitrogenDemand.Amount
              [Row].STRUM.Root.Network.WtByLayerZone1
              [Row].STRUM.Root.Network.WtByLayerZone2
              [Row].STRUM.Arbitrator.Carbon.TotalPlantDemand
              [Row].STRUM.Arbitrator.Carbon.TotalPlantSupply
              [Row].STRUM.Arbitrator.Carbon.TotalPlantDemandsAllocated
              [Row].STRUM.Arbitrator.Fn
              [Row].STRUM.Arbitrator.Nitrogen.TotalPlantDemand
              [Row].STRUM.Arbitrator.Nitrogen.TotalPlantSupply
              [Row].STRUM.Arbitrator.Nitrogen.TotalPlantDemandsAllocated
              [Row].STRUM.Fruit.TotalCarbonDemand.RelativeFruitMass.Delta.Integral
              [Row].STRUM.Fruit.Allocated.Carbon.Total
              [Row].STRUM.Fruit.Allocated.Nitrogen.Total
              [Row].STRUM.Fruit.Carbon.Demands.Structural
              [Row].STRUM.Fruit.Carbon.Demands.Total
              [Row].STRUM.Fruit.DMC
              [Row].STRUM.Fruit.FreshWtPerFruit
              [Row].STRUM.Fruit.NextYearsFruitingBudSurvival
              [Row].STRUM.Fruit.Number.BudsSurvivalFromLastYear
              [Row].STRUM.Fruit.N
              [Row].STRUM.Fruit.Nitrogen.Demands.Total
              [Row].STRUM.Fruit.Number
              [Row].STRUM.Fruit.Diameter
              [Row].STRUM.Fruit.VolumePerFruit
              [Row].STRUM.Fruit.Wt
              [Row].STRUM.Fruit.PotentialDWPerFruit
              [Row].STRUM.Fruit.TotalCarbonDemand.RelativeFruitMass
              [Row].STRUM.Fruit.TotalCarbonDemand.CarbonConc
              [Row].STRUM.Height
              [Row].STRUM.Height.PrunedCanopyBaseHeight
              [Row].STRUM.Height.PrunedCanopyBaseHeight  + [Row].STRUM.Height.PrunedCanopyDepth
              [Row].STRUM.Height.PrunedCanopyBaseHeight  + [Row].STRUM.Height.PrunedCanopyDepth + [Row].STRUM.Height.SeasonalDepthGrowth
              [Row].STRUM.Leaf.Allocated.Carbon.Total
              [Row].STRUM.Leaf.Allocated.Nitrogen.Total
              [Row].STRUM.Leaf.Canopy.CoverGreen
              [Row].STRUM.Leaf.Canopy.Deepness
              [Row].STRUM.Leaf.Dead.Wt
              [Row].STRUM.Leaf.Carbon.Demands.Structural
              [Row].STRUM.Leaf.Carbon.Demands.Total
              [Row].STRUM.Leaf.Fn
              [Row].STRUM.Leaf.Canopy.Fw
              [Row].STRUM.Leaf.Canopy.LAI
              [Row].STRUM.Leaf.Live.Wt
              [Row].STRUM.Leaf.N
              [Row].STRUM.Leaf.Nitrogen.Demands.Total
              [Row].STRUM.Leaf.Canopy.PotentialEP
              [Row].STRUM.Leaf.Canopy.RadiationIntercepted
              [Row].STRUM.Leaf.Senesced.Weight.Structural
              [Row].STRUM.Leaf.SenescenceRate
              [Row].STRUM.Leaf.Canopy.Transpiration
              [Row].STRUM.Leaf.Canopy.WaterDemand
              [Row].STRUM.Leaf.Canopy.WaterAllocation
              [Row].STRUM.Leaf.Canopy.Width
              [Row].STRUM.Leaf.Canopy.GreenExtinctionCoefficient
              [Row].STRUM.Leaf.Wt
              [Row].STRUM.Phenology.Age.YearDecimal
              [Row].STRUM.Phenology.Age.Years
              [Row].STRUM.Phenology.CurrentStageName
              [Row].STRUM.Phenology.DaysSinceFlowering
              [Row].STRUM.Phenology.Stage
              [Row].STRUM.RelativeSeasonalDimension
              [Row].STRUM.RelativeAnnualDimension
              [Row].STRUM.Root.Allocated.Carbon.Total
              [Row].STRUM.Root.Allocated.Nitrogen.Total
              [Row].STRUM.Root.Network.Depth
              [Row].STRUM.Root.Carbon.Demands.Structural
              [Row].STRUM.Root.Carbon.Demands.Total
              [Row].STRUM.Root.N
              [Row].STRUM.Root.Nitrogen.Demands.Total
              [Row].STRUM.RootUptakesArbitrator.WaterUptake.AmountByZone
              [Row].STRUM.RootUptakesArbitrator.WaterUptake.Mm
              [Row].STRUM.RootUptakesArbitrator.WaterUptake.Amount
              [Row].STRUM.RootUptakesArbitrator.NitrogenUptake.AmountByZone
              [Row].STRUM.RootUptakesArbitrator.NitrogenUptake.Gpm2
              [Row].STRUM.RootUptakesArbitrator.NitrogenUptake.Amount
              [Row].STRUM.RootUptakesArbitrator.WaterSupply.AmountByZone
              [Row].STRUM.RootUptakesArbitrator.WaterSupply.Mm
              [Row].STRUM.RootUptakesArbitrator.WaterSupply.Amount
              [Row].STRUM.RootUptakesArbitrator.NitrogenSupply.AmountByZone
              [Row].STRUM.RootUptakesArbitrator.NitrogenSupply.Gpm2
              [Row].STRUM.RootUptakesArbitrator.NitrogenSupply.Amount
              [Row].STRUM.Root.Wt
              [Row].STRUM.TranspirationPerTree
              [Row].STRUM.Wood.Allocated.Carbon.Total
              [Row].STRUM.Wood.Allocated.Nitrogen.Total
              [Row].STRUM.Wood.Carbon.Demands.Structural
              [Row].STRUM.Wood.Carbon.Demands.Total
              [Row].STRUM.Wood.Carbon.Supplies.ReTranslocation
              [Row].STRUM.Wood.Live.Carbon.Structural * 1/0.4
              [Row].STRUM.Wood.Live.Carbon.Storage * 1/0.4
              [Row].STRUM.Wood.EnergyBalance.CoverTotal
              [Row].STRUM.Wood.EnergyBalance.DeadAreaIndex
              [Row].STRUM.Wood.EnergyBalance.LAIDead
              [Row].STRUM.Wood.EnergyBalance.RadiationInterceptedByDead
              [Row].STRUM.Wood.EnergyBalance.Transpiration
              [Row].STRUM.Wood.N
              [Row].STRUM.Wood.Nitrogen.Demands.Total
              [Row].STRUM.Wood.Wt
              [Row].STRUM.Width
              [Row].STRUM.Width.PrunedWidth
              [Row].STRUM.Width.PrunedWidth + [Row].STRUM.Width.SeasonalGrowth
              [Row].STRUM.TranspirationPerLeafArea
              [Row].SurfaceOrganicMatter.N
              [Row].SurfaceOrganicMatter.Wt
              [Row].Irrigation.IrrigationApplied
              [Row].Fertiliser.NitrogenApplied
              sum([Row].Soil.OutputLayers.SWmm)
              [Row].Soil.OutputLayers.SWmm
              ([Row].Soil.OutputLayers.SWmm[1] + [Row].Soil.OutputLayers.SWmm[2]+ [Row].Soil.OutputLayers.SWmm[3]) as SWmm0_120
              ([Row].Soil.OutputLayers.SWmm[1] + [Row].Soil.OutputLayers.SWmm[2]+ [Row].Soil.OutputLayers.SWmm[3] + [Row].Soil.OutputLayers.SWmm[4]) as SWmm0_160
              [Row].Soil.OutputLayers.SW
              [Row].Soil.OutputLayers.SAT
              [Row].Soil.OutputLayers.DUL
              [Row].Soil.OutputLayers.LL15
              [Row].Soil.SoilWater.Evaporation
              [Row].Soil.SoilWater.Eo
              [Row].Soil.SoilWater.Runoff
              [Weather].PanEvap
              [Weather].Radn
              [Weather].Rain
              [STRUM].Leaf.TotalCarbonDemand.TotalDMDemand.SizeDemand.SizeDemand.SizeDemand.TargetSize
          SurfaceOrganicMatter: InitialResidueName=wheat_stubble; InitialResidueType=wheat; InitialResidueMass=500; InitialStandingFraction=0; InitialCPR=0; InitialCNR=100
          Fertiliser
          Irrigation
          Manager MulchResidues: same as Sensitivity.Kerikeri.Site1.Row.MulchResidues
          Plant STRUM
          Soil Flaxton_76a1: SoilType=Typic Orthic Gley Soils; LocalName=Flaxton_76a1; Latitude=-41; Longitude=174
            DataSource=Profile descriptions provided by Smap based on the work done by Trevor Webb.
            Chemical: Thickness=[225, 200, 200, 1375]; PH=[7, 7, 7, 7]; PHUnits=Water
            Physical
              Thickness  ParticleSizeSand  ParticleSizeSilt  ParticleSizeClay  BD     AirDry  LL15   DUL    SAT    KS
              225        10                60                30                1.234  0.104   0.208  0.409  0.476  960
              200        10                60                30                1.361  0.17    0.209  0.382  0.43   480
              200        10                60                30                1.328  0.213   0.213  0.405  0.442  960
              343.8      10                47.5              42.5              1.366  0.27    0.27   0.431  0.452  24
              343.8      10                47.5              42.5              1.366  0.27    0.27   0.431  0.452  24
              343.8      10                47.5              42.5              1.366  0.27    0.27   0.431  0.452  24
              343.8      10                47.5              42.5              1.366  0.27    0.27   0.431  0.453  24
              SoilCrop STRUMSoil
                LL=[0.208, 0.209, 0.213, 0.27, 0.27, 0.27, 0.27]
                KL=[0.108561, 0.0573763, 0.0448526, 0.0100186, 0.00479576, 0.00229566, 0]
                XF=[1, 1, 1, 0.36, 0.36, 0.36, 0.36]
            WaterBalance SoilWater: SummerDate=1-oct; SummerU=9; SummerCona=4.4; WinterDate=1-apr; WinterU=4; WinterCona=2; DiffusConst=88; DiffusSlope=35; Salb=0.13; CN2Bare=92; CNRed=15; CNCov=0.8; DischargeWidth=0; CatchmentArea=0; PSIDul=-100
              Thickness  SWCON  KLAT
              225        0.35   0
              200        0.3    0
              200        0.35   0
              1375       0.15   0
            Organic: FOMCNRatio=40; CarbonUnits=Total
              Thickness  Carbon    SoilCNRatio  FBiom      FInert    FOM
              50         6         10.5         0.0788566  0.431898  124.07
              50         6         10.5         0.0610103  0.491926  115.105
              50         6         10.5         0.0477893  0.542739  106.788
              50         4.94864   10.5         0.037995   0.5956    99.0722
              50         3.38311   10.5         0.0307392  0.650815  91.9135
              50         2.3337    10.5         0.025364   0.69947   85.2722
              50         1.63026   10.5         0.0213819  0.742644  79.1107
              50         1.15873   10.5         0.0184319  0.781204  73.3945
              50         0.842658  10.5         0.0162465  0.815767  68.0912
              50         0.630787  10.5         0.0146275  0.846679  63.1712
              250        0.32975   10.5         0.0118814  0.917701  43.4169
              250        0.21756   10.5         0.0104198  0.97694   29.84
              500        0.200874  10.5         0.0100442  0.990833  14.0954
              500        0.200016  10.5         0.0100022  0.996255  6.6582
            Water: Thickness=[225, 200, 200, 343.8, 343.8, 343.8, 343.8]; InitialValues=[0.3889, 0.3647, 0.3858, 0.4149, 0.4149, 0.4149, 0.4149]; FilledFromTop=false
            LayerStructure: Thickness=[225, 200, 200, 343.8, 343.8, 343.8, 343.8]
            Solute NO3: Thickness=[225, 200, 200, 1375]; InitialValues=[5.13236, 1.77205, 0.0442948, 0.0430626]; InitialValuesUnits=ppm; WaterTableConcentration=0; D0=0; DepthConstant=0; MaxDepthSoluteAccessible=0; RunoffEffectivenessAtMovingSolute=0; MaxEffectiveRunoff=0
            Solute NH4: Thickness=[225, 200, 200, 1375]; InitialValues=[0.769854, 0.265808, 0.00664422, 0.00645939]; InitialValuesUnits=ppm; WaterTableConcentration=0; D0=0; DepthConstant=0; MaxDepthSoluteAccessible=0; RunoffEffectivenessAtMovingSolute=0; MaxEffectiveRunoff=0
            Solute Urea: Thickness=[225, 200, 200, 1375]; InitialValues=[0, 0, 0, 0]; InitialValuesUnits=kg/ha; WaterTableConcentration=0; D0=0; DepthConstant=0; MaxDepthSoluteAccessible=0; RunoffEffectivenessAtMovingSolute=0; MaxEffectiveRunoff=0
            Nutrient
            SoilTemperature Temperature: InteractionsPerDay=8
            OutputLayers: Thickness=[400, 400, 200, 200, 400, 400]
          StrumTreeInstance KiwiFruit: same as Sensitivity.Kerikeri.Site1.Row.KiwiFruit
    Experiment Whakatu
      Factors: same as Sensitivity.Pukekohe.Factors
      Simulation Site8
        Clock: Start=1994-06-21; End=2020-12-01
        Summary SummaryFile
        Weather: FileName=VCSN/Whakatu28991_RoysHill.met
        MicroClimate: a_interception=0; b_interception=1; c_interception=0; d_interception=0; SoilHeatFluxFraction=0.4; MinimumHeightDiffForNewLayer=0; NightInterceptionFraction=0.5; ReferenceHeight=2
        SoilArbitrator Soil Arbitrator
        Manager AutomaticFertiliser: same as Sensitivity.Kerikeri.Site1.AutomaticFertiliser
        Manager ResetDate: same as Sensitivity.Pukekohe.Site2.ResetDate
        Manager RadiationWindFactor: same as Sensitivity.Kerikeri.Site1.RadiationWindFactor
        RectangularZone Row: Length=100; Width=1; CanopyType=TreeRow; Slope=0; AspectAngle=0; Altitude=50
          Report RowZoneReport: EventNames=[Clock].DoReport
          Report KiwiReport: same as Sensitivity.Kerikeri.Site1.Row.KiwiReport
          SurfaceOrganicMatter: InitialResidueName=wheat_stubble; InitialResidueType=wheat; InitialResidueMass=500; InitialStandingFraction=0; InitialCPR=0; InitialCNR=100
          Fertiliser
          Irrigation
          Manager MulchResidues: same as Sensitivity.Kerikeri.Site1.Row.MulchResidues
          Plant STRUM
          Soil Ashburton_41a1: SoilType=Fluvial Raw Soils; LocalName=Ashburton_41a1; Latitude=-41; Longitude=174
            DataSource=Profile descriptions provided by Smap based on the work done by Trevor Webb.
            Chemical: Thickness=[25, 100, 1875]; PH=[7, 7, 7]; PHUnits=Water
            Physical
              Thickness  ParticleSizeSand  ParticleSizeSilt  ParticleSizeClay  BD     AirDry  LL15   DUL    SAT    KS
              25         90                9                 1                 1.139  0.032   0.064  0.212  0.321  3600
              100        90                9                 1                 1.07   0.015   0.029  0.109  0.345  3600
              312.5      90                9                 1                 0.648  0.011   0.016  0.065  0.215  2400
              312.5      90                9                 1                 0.648  0.016   0.016  0.065  0.215  2400
              312.5      90                9                 1                 0.648  0.016   0.016  0.065  0.215  2400
              312.5      90                9                 1                 0.648  0.016   0.016  0.065  0.215  2400
              312.5      90                9                 1                 0.648  0.016   0.016  0.065  0.215  2400
              312.5      90                9                 1                 0.648  0.016   0.016  0.065  0.215  2400
              SoilCrop STRUMSoil
                LL=[0.064, 0.029, 0.016, 0.016, 0.016, 0.016, 0.016, 0.016]
                KL=[0.156922, 0.137252, 0.0882217, 0.0451599, 0.023117, 0.0118334, 0.00605741, 0]
                XF=[1, 1, 0.81, 0.81, 0.81, 0.81, 0.81, 0.81]
            WaterBalance SoilWater: SummerDate=1-oct; SummerU=9; SummerCona=4.4; WinterDate=1-apr; WinterU=4; WinterCona=2; DiffusConst=88; DiffusSlope=35; Salb=0.13; CN2Bare=70; CNRed=37; CNCov=0.8; DischargeWidth=0; CatchmentArea=0; PSIDul=-100
              Thickness  SWCON  KLAT
              25         0.5    0
              100        0.5    0
              1875       0.5    0
            Organic: FOMCNRatio=40; CarbonUnits=Total
              Thickness  Carbon    SoilCNRatio  FBiom      FInert    FOM
              50         1         11           0.0788566  0.158981  124.07
              50         1         11           0.0610103  0.21901   115.105
              50         1         11           0.0477893  0.269823  106.788
              50         0.854985  11           0.037995   0.312835  99.0722
              50         0.639049  11           0.0307392  0.349244  91.9135
              50         0.494304  11           0.025364   0.380064  85.2722
              50         0.397278  11           0.0213819  0.406152  79.1107
              50         0.332239  11           0.0184319  0.539823  73.3945
              50         0.288643  11           0.0162465  0.659987  68.0912
              50         0.259419  11           0.0146275  0.752092  63.1712
              250        0.217897  11           0.0118814  0.902619  43.4169
              250        0.202422  11           0.0104198  0.975216  29.84
              500        0.200121  11           0.0100442  0.990824  14.0954
              500        0.200002  11           0.0100022  0.996255  6.6582
            Water: Thickness=[25, 100, 312.5, 312.5, 312.5, 312.5, 312.5, 312.5]; FilledFromTop=false
              InitialValues=[0.1972, 0.101, 0.0601, 0.0601, 0.0601, 0.0601, 0.0601, 0.0601]
            LayerStructure: Thickness=[25, 100, 312.5, 312.5, 312.5, 312.5, 312.5, 312.5]
            Solute NO3: Thickness=[25, 100, 1875]; InitialValues=[5.56043, 5.919, 0.994513]; InitialValuesUnits=ppm; WaterTableConcentration=0; D0=0; DepthConstant=0; MaxDepthSoluteAccessible=0; RunoffEffectivenessAtMovingSolute=0; MaxEffectiveRunoff=0
            Solute NH4: Thickness=[25, 100, 1875]; InitialValues=[0.834065, 0.88785, 0.149177]; InitialValuesUnits=ppm; WaterTableConcentration=0; D0=0; DepthConstant=0; MaxDepthSoluteAccessible=0; RunoffEffectivenessAtMovingSolute=0; MaxEffectiveRunoff=0
            Solute Urea: Thickness=[25, 100, 1875]; InitialValues=[0, 0, 0]; InitialValuesUnits=kg/ha; WaterTableConcentration=0; D0=0; DepthConstant=0; MaxDepthSoluteAccessible=0; RunoffEffectivenessAtMovingSolute=0; MaxEffectiveRunoff=0
            Nutrient
            SoilTemperature Temperature: InteractionsPerDay=8
            OutputLayers: Thickness=[400, 400, 200, 200, 400, 400]
          StrumTreeInstance KiwiFruit: same as Sensitivity.Pukekohe.Site2.Row.KiwiFruit
        Manager AutoIrrigationDeficitBased: same as Sensitivity.Kerikeri.Site1.AutoIrrigationDeficitBased
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