Simulations: Version=216
  Memo TitlePage
    # The STRUM model
    A simple representation of the shape and mass of rows of fruit trees which can be used in a multizone simulation with a row of mown grass to model the water N and C balance of an orchard system.
  Folder Replacements
    Report KiwiReport: EventNames=[Clock].DoReport
      VariableNames:
        [Clock].Today
        [ResetDate].Script.SimulationYear as SimYear
        [Row].STRUM.AccumulatedWaterStress
        //[Row].STRUM.Arbitrator.DemandRatio
        [Row].Area
        [Row].STRUM.BaseHeight
        [Row].STRUM.Fruit.FreshYield_kgPerHa
        [Row].STRUM.CanopyArea
        [Row].STRUM.RootUptakesArbitrator.WaterDemand.Amount
        [Row].STRUM.RootUptakesArbitrator.WaterDemand.mm
        [Row].STRUM.RootUptakesArbitrator.NitrogenDemand.Amount
        [Row].STRUM.Root.Network.WtByLayerZone1
        [Row].STRUM.Root.Network.WtByLayerZone2
        [Row].STRUM.Arbitrator.Carbon.TotalPlantDemand
        [Row].STRUM.Arbitrator.Carbon.TotalPlantSupply
        [Row].STRUM.Arbitrator.Carbon.TotalPlantDemandsAllocated
        [Row].STRUM.Arbitrator.Fn
        [Row].STRUM.Arbitrator.Nitrogen.TotalPlantDemand
        [Row].STRUM.Arbitrator.Nitrogen.TotalPlantSupply
        [Row].STRUM.Arbitrator.Nitrogen.TotalPlantDemandsAllocated
        [Row].STRUM.Fruit.TotalCarbonDemand.RelativeFruitMass.Delta.Integral
        [Row].STRUM.Fruit.Allocated.Carbon.Total
        [Row].STRUM.Fruit.Allocated.Nitrogen.Total
        [Row].STRUM.Fruit.Carbon.Demands.Structural
        [Row].STRUM.Fruit.Carbon.Demands.Total
        [Row].STRUM.Fruit.DMC
        [Row].STRUM.Fruit.FreshWtPerFruit
        [Row].STRUM.Fruit.NextYearsFruitingBudSurvival
        [Row].STRUM.Fruit.Number.BudsSurvivalFromLastYear
        [Row].STRUM.Fruit.N
        [Row].STRUM.Fruit.Nitrogen.Demands.Total
        [Row].STRUM.Fruit.Number
        [Row].STRUM.Fruit.Diameter
        [Row].STRUM.Fruit.VolumePerFruit
        [Row].STRUM.Fruit.Wt
        [Row].STRUM.Fruit.PotentialDWPerFruit
        [Row].STRUM.Fruit.TotalCarbonDemand.RelativeFruitMass
        [Row].STRUM.Fruit.TotalCarbonDemand.CarbonConc
        [Row].STRUM.Height
        [Row].STRUM.Height.PrunedCanopyBaseHeight
        [Row].STRUM.Height.PrunedCanopyBaseHeight  + [Row].STRUM.Height.PrunedCanopyDepth
        [Row].STRUM.Height.PrunedCanopyBaseHeight  + [Row].STRUM.Height.PrunedCanopyDepth + [Row].STRUM.Height.SeasonalDepthGrowth
        [Row].STRUM.Leaf.Allocated.Carbon.Total
        [Row].STRUM.Leaf.Allocated.Nitrogen.Total
        [Row].STRUM.Leaf.Canopy.CoverGreen
        [Row].STRUM.Leaf.Canopy.Deepness
        [Row].STRUM.Leaf.Dead.Wt
        [Row].STRUM.Leaf.Carbon.Demands.Structural
        [Row].STRUM.Leaf.Carbon.Demands.Total
        [Row].STRUM.Leaf.Fn
        [Row].STRUM.Leaf.Canopy.Fw
        [Row].STRUM.Leaf.Canopy.LAI
        [Row].STRUM.Leaf.Live.Wt
        [Row].STRUM.Leaf.N
        [Row].STRUM.Leaf.Nitrogen.Demands.Total
        [Row].STRUM.Leaf.Canopy.PotentialEP
        [Row].STRUM.Leaf.Canopy.RadiationIntercepted
        [Row].STRUM.Leaf.Senesced.Weight.Structural
        [Row].STRUM.Leaf.SenescenceRate
        [Row].STRUM.Leaf.Canopy.Transpiration
        [Row].STRUM.Leaf.Canopy.WaterDemand
        [Row].STRUM.Leaf.Canopy.WaterAllocation
        [Row].STRUM.Leaf.Canopy.Width
        [Row].STRUM.Leaf.Canopy.GreenExtinctionCoefficient
        [Row].STRUM.Leaf.Wt
        [Row].STRUM.Leaf.Canopy.PotentialEP
        [Row].STRUM.Phenology.Age.YearDecimal
        [Row].STRUM.Phenology.Age.Years
        [Row].STRUM.Phenology.CurrentStageName
        [Row].STRUM.Phenology.DaysSinceFlowering
        [Row].STRUM.Phenology.Stage
        [Row].STRUM.RelativeSeasonalDimension
        [Row].STRUM.RelativeAnnualDimension
        [Row].STRUM.Root.Allocated.Carbon.Total
        [Row].STRUM.Root.Allocated.Nitrogen.Total
        [Row].STRUM.Root.Network.Depth
        [Row].STRUM.Root.Carbon.Demands.Structural
        [Row].STRUM.Root.Carbon.Demands.Total
        [Row].STRUM.Root.N
        [Row].STRUM.Root.Nitrogen.Demands.Total
        [Row].STRUM.RootUptakesArbitrator.WaterUptake.AmountByZone
        [Row].STRUM.RootUptakesArbitrator.WaterUptake.Mm
        [Row].STRUM.RootUptakesArbitrator.WaterUptake.Amount
        [Row].STRUM.RootUptakesArbitrator.NitrogenUptake.AmountByZone
        [Row].STRUM.RootUptakesArbitrator.NitrogenUptake.Gpm2
        [Row].STRUM.RootUptakesArbitrator.NitrogenUptake.Amount
        [Row].STRUM.RootUptakesArbitrator.WaterSupply.AmountByZone
        [Row].STRUM.RootUptakesArbitrator.WaterSupply.Mm
        [Row].STRUM.RootUptakesArbitrator.WaterSupply.Amount
        [Row].STRUM.RootUptakesArbitrator.NitrogenSupply.AmountByZone
        [Row].STRUM.RootUptakesArbitrator.NitrogenSupply.Gpm2
        [Row].STRUM.RootUptakesArbitrator.NitrogenSupply.Amount
        [Row].STRUM.Root.Wt
        [Row].STRUM.TranspirationPerTree
        [Row].STRUM.Wood.Allocated.Carbon.Total
        [Row].STRUM.Wood.Allocated.Nitrogen.Total
        [Row].STRUM.Wood.Carbon.Demands.Structural
        [Row].STRUM.Wood.Carbon.Demands.Total
        [Row].STRUM.Wood.Carbon.Supplies.ReTranslocation
        [Row].STRUM.Wood.Live.Carbon.Structural * 1/0.4
        [Row].STRUM.Wood.Live.Carbon.Storage * 1/0.4
        [Row].STRUM.Wood.EnergyBalance.CoverTotal
        [Row].STRUM.Wood.EnergyBalance.DeadAreaIndex
        [Row].STRUM.Wood.EnergyBalance.LAIDead
        [Row].STRUM.Wood.EnergyBalance.RadiationInterceptedByDead
        [Row].STRUM.Wood.EnergyBalance.Transpiration
        [Row].STRUM.Wood.N
        [Row].STRUM.Wood.Nitrogen.Demands.Total
        [Row].STRUM.Wood.Wt
        [Row].STRUM.Width
        [Row].STRUM.Width.PrunedWidth
        [Row].STRUM.Width.PrunedWidth + [Row].STRUM.Width.SeasonalGrowth
        [Row].STRUM.TranspirationPerLeafArea
        [Row].SurfaceOrganicMatter.N
        [Row].SurfaceOrganicMatter.Wt
        [Row].Irrigation.IrrigationApplied
        [Row].Fertiliser.NitrogenApplied
        sum([Row].Soil.OutputLayers.SWmm)
        [Row].Soil.OutputLayers.SWmm
        ([Row].Soil.OutputLayers.SWmm[1] + [Row].Soil.OutputLayers.SWmm[2]+ [Row].Soil.OutputLayers.SWmm[3]) as SWmm0_120
        ([Row].Soil.OutputLayers.SWmm[1] + [Row].Soil.OutputLayers.SWmm[2]+ [Row].Soil.OutputLayers.SWmm[3] + [Row].Soil.OutputLayers.SWmm[4]) as SWmm0_160
        [Row].Soil.OutputLayers.SW
        [Row].Soil.OutputLayers.SAT
        [Row].Soil.OutputLayers.DUL
        [Row].Soil.OutputLayers.LL15
        [Row].Soil.SoilWater.Evaporation
        [Row].Soil.SoilWater.Eo
        [Row].Soil.SoilWater.Runoff as Runoff
        [Row].Soil.SoilWater.Flux
        [Row].Soil.SoilWater.Drainage
        [Row].Soil.SoilWater.Flux[1900mm] + [Row].Soil.SoilWater.Flow[1900mm] as Drainage_190cm
        [Row].Soil.SoilWater.Flux[1000mm] + [Row].Soil.SoilWater.Flow[1000mm] as Drainage_110cm
        [Weather].PanEvap
        [Weather].Radn
        [Weather].Rain
        [STRUM].Leaf.TotalCarbonDemand.TotalDMDemand.SizeDemand.SizeDemand.SizeDemand.TargetSize
    Report RowZoneReport: EventNames=[Clock].DoReport
      VariableNames:
        [Clock].Today
        [Row].STRUM.AccumulatedWaterStress
        //[Row].STRUM.Arbitrator.DemandRatio
        [Row].Area
        [Row].STRUM.BaseHeight
        [Row].STRUM.Fruit.FreshYield_kgPerHa
        [Row].STRUM.CanopyArea
        [Row].STRUM.RootUptakesArbitrator.WaterDemand.Amount
        [Row].STRUM.RootUptakesArbitrator.WaterDemand.mm
        [Row].STRUM.RootUptakesArbitrator.NitrogenDemand.Amount
        [Row].STRUM.Root.Network.WtByLayerZone1
        [Row].STRUM.Root.Network.WtByLayerZone2
        [Row].STRUM.Arbitrator.Carbon.TotalPlantDemand
        [Row].STRUM.Arbitrator.Carbon.TotalPlantSupply
        [Row].STRUM.Arbitrator.Carbon.TotalPlantDemandsAllocated
        [Row].STRUM.Arbitrator.Fn
        [Row].STRUM.Arbitrator.Nitrogen.TotalPlantDemand
        [Row].STRUM.Arbitrator.Nitrogen.TotalPlantSupply
        [Row].STRUM.Arbitrator.Nitrogen.TotalPlantDemandsAllocated
        [Row].STRUM.Fruit.TotalCarbonDemand.RelativeFruitMass.Delta.Integral
        [Row].STRUM.Fruit.Allocated.Carbon.Total
        [Row].STRUM.Fruit.Allocated.Nitrogen.Total
        [Row].STRUM.Fruit.Carbon.Demands.Structural
        [Row].STRUM.Fruit.Carbon.Demands.Total
        [Row].STRUM.Fruit.DMC
        [Row].STRUM.Fruit.FreshWtPerFruit
        [Row].STRUM.Fruit.NextYearsFruitingBudSurvival
        [Row].STRUM.Fruit.Number.BudsSurvivalFromLastYear
        [Row].STRUM.Fruit.N
        [Row].STRUM.Fruit.Nitrogen.Demands.Total
        [Row].STRUM.Fruit.Number
        [Row].STRUM.Fruit.Diameter
        [Row].STRUM.Fruit.VolumePerFruit
        [Row].STRUM.Fruit.Wt
        [Row].STRUM.Fruit.PotentialDWPerFruit
        [Row].STRUM.Fruit.TotalCarbonDemand.RelativeFruitMass
        [Row].STRUM.Fruit.TotalCarbonDemand.CarbonConc
        [Row].STRUM.Height
        [Row].STRUM.Height.PrunedCanopyBaseHeight
        [Row].STRUM.Height.PrunedCanopyBaseHeight  + [Row].STRUM.Height.PrunedCanopyDepth
        [Row].STRUM.Height.PrunedCanopyBaseHeight  + [Row].STRUM.Height.PrunedCanopyDepth + [Row].STRUM.Height.SeasonalDepthGrowth
        [Row].STRUM.Leaf.Allocated.Carbon.Total
        [Row].STRUM.Leaf.Allocated.Nitrogen.Total
        [Row].STRUM.Leaf.Canopy.CoverGreen
        [Row].STRUM.Leaf.Canopy.Deepness
        [Row].STRUM.Leaf.Dead.Wt
        [Row].STRUM.Leaf.Carbon.Demands.Structural
        [Row].STRUM.Leaf.Carbon.Demands.Total
        [Row].STRUM.Leaf.Fn
        [Row].STRUM.Leaf.Canopy.Fw
        [Row].STRUM.Leaf.Canopy.LAI
        [Row].STRUM.Leaf.Live.Wt
        [Row].STRUM.Leaf.N
        [Row].STRUM.Leaf.Nitrogen.Demands.Total
        [Row].STRUM.Leaf.Canopy.PotentialEP
        [Row].STRUM.Leaf.Canopy.RadiationIntercepted
        [Row].STRUM.Leaf.Senesced.Weight.Structural
        [Row].STRUM.Leaf.SenescenceRate
        [Row].STRUM.Leaf.Canopy.Transpiration
        [Row].STRUM.Leaf.Canopy.WaterDemand
        [Row].STRUM.Leaf.Canopy.WaterAllocation
        [Row].STRUM.Leaf.Canopy.Width
        [Row].STRUM.Leaf.Canopy.GreenExtinctionCoefficient
        [Row].STRUM.Leaf.Wt
        [Row].STRUM.Phenology.Age.YearDecimal
        [Row].STRUM.Phenology.Age.Years
        [Row].STRUM.Phenology.CurrentStageName
        [Row].STRUM.Phenology.DaysSinceFlowering
        [Row].STRUM.Phenology.Stage
        [Row].STRUM.RelativeSeasonalDimension
        [Row].STRUM.RelativeAnnualDimension
        [Row].STRUM.Root.Allocated.Carbon.Total
        [Row].STRUM.Root.Allocated.Nitrogen.Total
        [Row].STRUM.Root.Network.Depth
        [Row].STRUM.Root.Carbon.Demands.Structural
        [Row].STRUM.Root.Carbon.Demands.Total
        [Row].STRUM.Root.N
        [Row].STRUM.Root.Nitrogen.Demands.Total
        [Row].STRUM.RootUptakesArbitrator.WaterUptake.AmountByZone
        [Row].STRUM.RootUptakesArbitrator.WaterUptake.Mm
        [Row].STRUM.RootUptakesArbitrator.WaterUptake.Amount
        [Row].STRUM.RootUptakesArbitrator.NitrogenUptake.AmountByZone
        [Row].STRUM.RootUptakesArbitrator.NitrogenUptake.Gpm2
        [Row].STRUM.RootUptakesArbitrator.NitrogenUptake.Amount
        [Row].STRUM.RootUptakesArbitrator.WaterSupply.AmountByZone
        [Row].STRUM.RootUptakesArbitrator.WaterSupply.Mm
        [Row].STRUM.RootUptakesArbitrator.WaterSupply.Amount
        [Row].STRUM.RootUptakesArbitrator.NitrogenSupply.AmountByZone
        [Row].STRUM.RootUptakesArbitrator.NitrogenSupply.Gpm2
        [Row].STRUM.RootUptakesArbitrator.NitrogenSupply.Amount
        [Row].STRUM.Root.Wt
        [Row].STRUM.TranspirationPerTree
        [Row].STRUM.Wood.Allocated.Carbon.Total
        [Row].STRUM.Wood.Allocated.Nitrogen.Total
        [Row].STRUM.Wood.Carbon.Demands.Structural
        [Row].STRUM.Wood.Carbon.Demands.Total
        [Row].STRUM.Wood.Carbon.Supplies.ReTranslocation
        [Row].STRUM.Wood.Live.Carbon.Structural * 1/0.4
        [Row].STRUM.Wood.Live.Carbon.Storage * 1/0.4
        [Row].STRUM.Wood.EnergyBalance.CoverTotal
        [Row].STRUM.Wood.EnergyBalance.DeadAreaIndex
        [Row].STRUM.Wood.EnergyBalance.LAIDead
        [Row].STRUM.Wood.EnergyBalance.RadiationInterceptedByDead
        [Row].STRUM.Wood.EnergyBalance.Transpiration
        [Row].STRUM.Wood.N
        [Row].STRUM.Wood.Nitrogen.Demands.Total
        [Row].STRUM.Wood.Wt
        [Row].STRUM.Width
        [Row].STRUM.Width.PrunedWidth
        [Row].STRUM.Width.PrunedWidth + [Row].STRUM.Width.SeasonalGrowth
        [Row].STRUM.TranspirationPerLeafArea
        [Row].SurfaceOrganicMatter.N
        [Row].SurfaceOrganicMatter.Wt
        [Row].Irrigation.IrrigationApplied
        [Row].Fertiliser.NitrogenApplied
        sum([Row].Soil.OutputLayers.SWmm)
        ([Row].Soil.OutputLayers.SWmm[1] + [Row].Soil.OutputLayers.SWmm[1] + [Row].Soil.OutputLayers.SWmm[1]) as SWmm90
        [Row].Soil.OutputLayers.SW
        [Row].Soil.OutputLayers.SAT
        [Row].Soil.OutputLayers.DUL
        [Row].Soil.OutputLayers.LL15
        [Row].Soil.SoilWater.Evaporation
        [Row].Soil.SoilWater.Eo
        [Weather].PanEvap
        [Weather].Radn
        [Weather].Rain
        [STRUM].Leaf.TotalCarbonDemand.TotalDMDemand.SizeDemand.SizeDemand.SizeDemand.TargetSize
    Report AlleyZoneReport: EventNames=[Clock].DoReport
      VariableNames:
        [Clock].Today
        [Alley].Area
        [Alley].SPRUM.RootUptakesArbitrator.WaterDemand.Amount
        [Alley].SPRUM.RootUptakesArbitrator.WaterSupply.Amount
        [Alley].SPRUM.RootUptakesArbitrator.WaterUptake.Amount
        [Alley].SPRUM.RootUptakesArbitrator.NitrogenDemand.Amount
        [Alley].SPRUM.RootUptakesArbitrator.NitrogenSupply.Amount
        [Alley].SPRUM.RootUptakesArbitrator.NitrogenUptake.Amount
        [Alley].SPRUM.Root.Network.WtByLayerZone1
        [Alley].SPRUM.Root.Network.WtByLayerZone2
        [Alley].SPRUM.Arbitrator.Carbon.TotalPlantDemand
        [Alley].SPRUM.Arbitrator.Carbon.TotalPlantSupply
        [Alley].SPRUM.Arbitrator.Carbon.TotalPlantDemandsAllocated
        [Alley].SPRUM.Arbitrator.Fn
        [Alley].SPRUM.Arbitrator.Nitrogen.TotalPlantDemand
        [Alley].SPRUM.Arbitrator.Nitrogen.TotalPlantSupply
        [Alley].SPRUM.Arbitrator.Nitrogen.TotalPlantDemandsAllocated
        [Alley].SPRUM.Height
        [Alley].SPRUM.Leaf.Allocated.Carbon.Total
        [Alley].SPRUM.Leaf.Allocated.Nitrogen.Total
        [Alley].SPRUM.Leaf.Canopy.CoverGreen
        [Alley].SPRUM.Leaf.Dead.Wt
        [Alley].SPRUM.Leaf.Carbon.Demands.Structural
        [Alley].SPRUM.Leaf.Carbon.Demands.Total
        [Alley].SPRUM.Leaf.Fn
        [Alley].SPRUM.Leaf.Canopy.Fw
        [Alley].SPRUM.Leaf.Canopy.LAI
        [Alley].SPRUM.Leaf.Live.Wt
        [Alley].SPRUM.Leaf.N
        [Alley].SPRUM.Leaf.Nitrogen.Demands.Total
        [Alley].SPRUM.Leaf.Canopy.PotentialEP
        [Alley].SPRUM.Leaf.Canopy.RadiationIntercepted
        [Alley].SPRUM.Leaf.Senesced.Weight.Structural
        [Alley].SPRUM.Leaf.SenescenceRate
        [Alley].SPRUM.Leaf.Canopy.Transpiration
        [Alley].SPRUM.Leaf.Canopy.WaterDemand
        [Alley].SPRUM.Leaf.Canopy.WaterAllocation
        [Alley].SPRUM.Leaf.Canopy.Width
        [Alley].SPRUM.Leaf.Wt
        [Alley].SPRUM.Phenology.Age.YearDecimal
        [Alley].SPRUM.Phenology.Age.Years
        [Alley].SPRUM.Phenology.CurrentStageName
        [Alley].SPRUM.Phenology.Stage
        [Alley].SPRUM.RelativeAnnualDimension
        [Alley].SPRUM.Root.Allocated.Carbon.Total
        [Alley].SPRUM.Root.Allocated.Nitrogen.Total
        [Alley].SPRUM.Root.Network.Depth
        [Alley].SPRUM.Root.Carbon.Demands.Structural
        [Alley].SPRUM.Root.Carbon.Demands.Total
        [Alley].SPRUM.Root.N
        [Alley].SPRUM.Root.Nitrogen.Demands.Total
        [Alley].SPRUM.RootUptakesArbitrator.WaterUptake.AmountByZone
        [Alley].SPRUM.RootUptakesArbitrator.WaterUptake.Mm
        [Alley].SPRUM.RootUptakesArbitrator.WaterUptake.Amount
        [Alley].SPRUM.RootUptakesArbitrator.NitrogenUptake.AmountByZone
        [Alley].SPRUM.RootUptakesArbitrator.NitrogenUptake.Gpm2
        [Alley].SPRUM.RootUptakesArbitrator.NitrogenUptake.Amount
        [Alley].SPRUM.RootUptakesArbitrator.WaterSupply.AmountByZone
        [Alley].SPRUM.RootUptakesArbitrator.WaterSupply.Mm
        [Alley].SPRUM.RootUptakesArbitrator.WaterSupply.Amount
        [Alley].SPRUM.RootUptakesArbitrator.NitrogenSupply.AmountByZone
        [Alley].SPRUM.RootUptakesArbitrator.NitrogenSupply.Gpm2
        [Alley].SPRUM.RootUptakesArbitrator.NitrogenSupply.Amount
        [Alley].SPRUM.Root.Wt
        [Alley].SPRUM.Residue.Allocated.Carbon.Total
        [Alley].SPRUM.Residue.Allocated.Nitrogen.Total
        [Alley].SPRUM.Residue.Carbon.Demands.Structural
        [Alley].SPRUM.Residue.Carbon.Demands.Total
        [Alley].SPRUM.Residue.N
        [Alley].SPRUM.Residue.Nitrogen.Demands.Total
        [Alley].SPRUM.Residue.Wt
        [Alley].SurfaceOrganicMatter.N
        [Alley].SurfaceOrganicMatter.Wt
        [Alley].Irrigation.IrrigationApplied
        [Alley].Fertiliser.NitrogenApplied
        sum([Alley].Soil.OutputLayers.SWmm)
        ([Alley].Soil.OutputLayers.SWmm[1] + [Alley].Soil.OutputLayers.SWmm[1] + [Alley].Soil.OutputLayers.SWmm[1]) as SWmm90
        [Alley].Soil.OutputLayers.SW
        [Alley].Soil.OutputLayers.SAT
        [Alley].Soil.OutputLayers.DUL
        [Alley].Soil.OutputLayers.LL15
        [Alley].Soil.SoilWater.Drainage
        [Alley].Soil.SoilWater.Evaporation
        [Alley].Soil.SoilWater.Eo
        [Weather].PanEvap
        [Weather].Radn
        [Weather].Rain
    Report ZoneAgregateReport: EventNames=[Clock].DoReport
      VariableNames:
        [Clock].Today
        [ZoneAgregate].SimulationArea
        [ZoneAgregate].Eop.Amount
        [ZoneAgregate].Eop.Pm2
        [ZoneAgregate].Eop.AmountByZone[1]
        [ZoneAgregate].Eop.AmountByZone[2]
        [ZoneAgregate].Ro.Amount
        [ZoneAgregate].Ro.Pm2
        [ZoneAgregate].Ro.AmountByZone[1]
        [ZoneAgregate].Ro.AmountByZone[2]
        [ZoneAgregate].Ri.Amount
        [ZoneAgregate].Ri.Pm2
        [ZoneAgregate].Ri.AmountByZone[1]
        [ZoneAgregate].Ri.AmountByZone[2]
        [ZoneAgregate].Et.Amount
        [ZoneAgregate].Et.Pm2
        [ZoneAgregate].Et.AmountByZone[1]
        [ZoneAgregate].Et.AmountByZone[2]
        [ZoneAgregate].AccumulatedIrrigation.Amount
        [ZoneAgregate].AccumulatedIrrigation.Pm2
        [ZoneAgregate].AccumulatedIrrigation.AmountByZone[1]
        [ZoneAgregate].AccumulatedIrrigation.AmountByZone[2]
        [ZoneAgregate].AccumulatedNitrogen.Amount
        [ZoneAgregate].AccumulatedNitrogen.Pm2
        [ZoneAgregate].AccumulatedNitrogen.AmountByZone[1]
        [ZoneAgregate].AccumulatedNitrogen.AmountByZone[2]
        [ZoneAgregate].FintTreeGreen
        [ZoneAgregate].FintTreeDead
        [ZoneAgregate].FintTreeTotal
        [ZoneAgregate].FintUnderstoryGreen
        [ZoneAgregate].FintUnderstoryDead
    Manager AutomaticFertiliser
      Fertilise = True
      Season_Start = 1-Aug
      Season_End = 30-May
      Season_Allocation = 1000
      TriggerN = 50
      NApplicationAmount = 30
      Return_days = 15
      Top_Depth = 600
```csharp
using Newtonsoft.Json;
using Models.PMF.Phen;
using Models.Soils.Nutrients;
using Models.Interfaces;
using APSIM.Shared.Utilities;
using Models.PMF;
using System.Xml.Serialization;
using Models.Soils;
using Models.Core;
using System;
using Models.PMF.Organs;

        
namespace Models
{
    [Serializable] 
    [System.Xml.Serialization.XmlInclude(typeof(Model))]
    public class Script : Model
    {
        [Link] private ISummary summary;
        [Link] private Fertiliser Fertiliser;
        [Link] private Clock Clock;
        [Link] private Plant SCRUM;
        [Link(ByName = true)]
        private ISolute NO3;
        [Link] private Soils.Soil Soil;
        [Link(Type = LinkType.Path, Path = "[STRUM].Root.Network")]
        private RootNetwork root;
        [Link(Type = LinkType.Path, Path = "[STRUM].Phenology")]
        private Phenology phenology;
        [Link]
        private IPhysical soilPhysical;
        //Communication to other modules
       
        //User inputs from properties tab
        [Description("Fertilise (tick for yes)")]
        public bool Fertilise { get; set; }
        [Description("SeasonStart (dd-MMM)")]
        public string Season_Start { get; set; }
        [Description("SeasonEnd (dd-MMM)")]
        public string Season_End { get; set; }
        [Description("Season Allocation (kg/ha)")]
        public double Season_Allocation { get; set; }
        [Description("Mineral N to maintain soil above (kg/ha)")]
        public double TriggerN { get; set; }
        [Description("Amount of N to apply (kg/ha)")]
        public double NApplicationAmount { get; set; }
        [Description("Minimum days for Fertiliser spreader to return")]
        public double Return_days { get; set; }
        [Description("Depth to calculate mineral N (mm)")]
        public double Top_Depth { get; set; }
       
        //Class members
        [JsonIgnore] private bool FertiliserIsAvailable { get; set; }
        [JsonIgnore] public bool SeasonIsOpen { get; set; }
        [JsonIgnore] private bool CropIsActive { get; set; }
        [JsonIgnore] private bool FertSpreaderIsAvailable { get; set; }
        [JsonIgnore] private bool SoilNIsLow { get; set; }
        [JsonIgnore] public double Top_SoilN { get; set; }
        [JsonIgnore] public double Accumulated_depth { get; set; }
        [JsonIgnore] public double Days_since_fertiliser { get; set; }
        [JsonIgnore] public double Season_Application { get; set; }
        
        //Variables for date logic testing
        [JsonIgnore] public string StartString { get; set; }
        [JsonIgnore] public string EndString { get; set; }
        [JsonIgnore] public DateTime StartDate { get; set; }
        [JsonIgnore] public DateTime EndDate { get; set; }
        [JsonIgnore] public int TodayYear { get; set; }
        [JsonIgnore] public int TodayMonth { get; set; }
        [JsonIgnore] public int StartMonth { get; set; }
        [JsonIgnore] public int EndMonth { get; set; }
        [JsonIgnore] public int TodayDay { get; set; }
        [JsonIgnore] public int StartDay { get; set; }
        [JsonIgnore] public int EndDay { get; set; }
              
        //Determine daily requirement for fertiliser
        [EventSubscribe("StartOfDay")]
        private void OnStartOfDay(object sender, EventArgs e)
        { 
            //Can we irrigate?
            FertiliserIsAvailable = false; 
            if (Fertilise)
                FertiliserIsAvailable = true; 
    
            //Are we Allowed to Irrigate?
            TodayYear = Clock.Today.Year;
            StartString = Season_Start + "-" + TodayYear.ToString();
            EndString = Season_End + "-" + TodayYear.ToString();
            StartDate = DateTime.Parse(StartString);
            EndDate = DateTime.Parse(EndString);
            TodayMonth = Clock.Today.Month;
            TodayDay = Clock.Today.Day;
            StartDay = StartDate.Day;
            StartMonth = StartDate.Month;
            EndDay = EndDate.Day;
            EndMonth = EndDate.Month;
          
            SeasonIsOpen = false;
            //if we are in the spring and after the start date then yes
            if ((Clock.Today.Month > 6) && (Clock.Today >= StartDate))
                SeasonIsOpen = true;
            //if we are in the autumn and before the end date then yes
            if ((Clock.Today.Month <= 6) && (Clock.Today <= EndDate))
                SeasonIsOpen = true;
          
            //Is there a crop in the ground that needs irrigation?
            //CropIsActive = false;
            //if ((phenology.Stage >= 3.0) && (phenology.Stage < 6.0))
            CropIsActive = true;
          
            //Is the irrigator available?
            FertSpreaderIsAvailable = false;
            Days_since_fertiliser += 1;
            if (Days_since_fertiliser >= Return_days)
                FertSpreaderIsAvailable = true;
          
            //Is the soil N low enough to require fertiliser?
            SoilNIsLow = false;
            double CurrentRootDepth = 0;
            double RootDepth = root.Depth;
            CurrentRootDepth = Math.Max(RootDepth, CurrentRootDepth);
          
            Accumulated_depth = 0;
            Top_SoilN = 0;
            for (int layer = 0; Accumulated_depth < Top_Depth; layer++)
            {
                Top_SoilN += NO3.kgha[layer];
                Accumulated_depth += soilPhysical.Thickness[layer];
            }
            if (Top_SoilN <= TriggerN)
                SoilNIsLow = true;
                
            //Lets bloody well fertilise then!!!!
            if ((FertiliserIsAvailable) && (SeasonIsOpen) && (CropIsActive) && (FertSpreaderIsAvailable) && (SoilNIsLow)) //The conditions are rife for fertiliser
            {
                Fertiliser.Apply(NApplicationAmount, "UreaN", 10);
                Days_since_fertiliser = 0;
                Season_Application += NApplicationAmount;
                summary.WriteMessage(this, "Automatic Fertiliser", MessageType.Diagnostic);
            
            }
        }
    }
}
```
    Manager ResetDate
      ResetDate = 01-Jul
```csharp
using Newtonsoft.Json;
using Models.PMF.Organs;
using Models.Soils.Nutrients;
using Models.Interfaces;
using System;
using Models.Core;
using System.Collections.Generic;
using System.Text;
using Models.Soils;
using Models.PMF;
using Models;
using System.Xml.Serialization;
using APSIM.Shared.Utilities;
using Models.Climate;



namespace Models
{
    [Serializable] 
    //[System.Xml.Serialization.XmlInclude(typeof(Model))]
    public class Script : Model
    {
    
     [Link] private Clock Clock;
        
    [Separator("Helper script to summarise variables")]
    [Description(" Date to reset the day counter: ")]
    public string ResetDate { get; set; }
                  
        [JsonIgnore] public double SimulationYear { get; set; }
        [JsonIgnore] public double DAS { get; set; }
        
         [EventSubscribe("StartOfSimulation")]
        private void DoStartOfSimulation(object sender, EventArgs e)
        {
                DAS = 0;
                SimulationYear = Clock.Today.Year;
        }
        
        [EventSubscribe("StartOfDay")]
        private void OnStartOfDay(object sender, EventArgs e)
        {
            DAS += 1;
            if (DateUtilities.DatesAreEqual(ResetDate, Clock.Today.Date))
            //if (DateUtilities.DatesAreEqual("Jul-1", Clock.Today.Date))
            {
                SimulationYear += 1;
                DAS = 1;
                
            }
        }
    
    }
}
```
    Manager AutoIrrigationDeficitBased
      AllowIrrigation = True
      depthPAWC = 1200
      triggerDeficit = 50
      irrigateAmount = 15
      returndays = 2
      IrrigateAlley = False
```csharp
using APSIM.Core;
using Models.Interfaces;
using System;
using Models.Core;
using Models.PMF;
using Models.Soils;
using System.Xml.Serialization;
using APSIM.Shared.Utilities;
using Newtonsoft.Json;

        
namespace Models
{
    [Serializable] 
    [System.Xml.Serialization.XmlInclude(typeof(Model))]
    public class Script : Model, IStructureDependency
    {
        [Link] private Clock Clock;
        [Link] private Zone patch;
        [Link] private ISummary summary;
        [Link] private Soil Soil;
        [Link(IsOptional = true)] private IPlant existingCrop;
        [Link] private IPhysical soilPhysical;
        [Link] private ISoilWater waterBalance;
        [Link(Type = LinkType.Scoped, ByName = true)] private Zone Row;
        [Link(Type = LinkType.Scoped, ByName = true, IsOptional = true)] private Zone Alley;
        private double TopDUL;
        private double TopLL;
        private int nLayers;
        public IStructure Structure { private get; set; }
        //[Link] private Irrigation Irrigation;
        
       
        // Parameters from user interface
        [Separator("Manager for controlling automatic irrigation")]
        [Description(" Allow this manager to control irrigation?")]
        public bool AllowIrrigation { get; set; }
      
        [Separator(" Parameters for the irrigation system")]
        [Description(" Depth to calculate PAWC and deficit (mm)")]
        public double depthPAWC { get; set; }
        [Description(" Deficit to trigger irrigations (% PAWC)")]
        public double triggerDeficit { get; set; }
        [Description(" Irrigation amount to apply each event (mm)")]
        public double irrigateAmount { get; set; }
        [Description(" Minimum days for irrigation to return")]
        public double returndays { get; set; }
        
        [Description("Is the Alley zone irrigated?")]
        public bool IrrigateAlley {get; set;}

        //Class members
        [JsonIgnore] public double IrrigLayerSWDeficit { get; set; }
        [JsonIgnore] public double TopSWC { get; set; }
        [JsonIgnore] public double DaysSinceIrrigation { get; set; }
        [JsonIgnore] public double AmountToApply { get; set; }
        [JsonIgnore] public double SeasonAppliedAmount { get; set; }
        
        private bool IrrigationIsAllowed { get; set; }
        private bool CropIsActive { get; set; }
        private bool IrrigatorIsAvailable { get; set; }
        private bool SoilIsDry { get; set; }

    
        //Calculate static soil variables

        

        [EventSubscribe("StartOfSimulation")]
        private void OnStartOfSimulation(object sender, EventArgs e)
        {
            
            //Can we irrigate at all?
            IrrigationIsAllowed = false; 
            if (AllowIrrigation)
                IrrigationIsAllowed = true; 

            //Calculate soil water variables
            double depthFromSurface = 0.0;
            double fracLayer = 0.0;
            nLayers = soilPhysical.Thickness.Length;
            for (int layer = 0; layer < nLayers; layer++)
            {
                fracLayer = Math.Min(1.0, (depthPAWC - depthFromSurface) / soilPhysical.Thickness[layer]);
                TopLL += soilPhysical.LL15mm[layer] * fracLayer;
                TopDUL += soilPhysical.DULmm[layer] * fracLayer;
                depthFromSurface += soilPhysical.Thickness[layer];
                if (depthFromSurface >= depthPAWC)
                    layer = nLayers;
            }
        }
             
        //Determine daily requirement for irrigation
        [EventSubscribe("StartOfDay")]
        private void OnStartOfDay(object sender, EventArgs e)
        {
            AmountToApply = 0.0;
            DaysSinceIrrigation += 1;

            //Is the row crop actively growing?
            CropIsActive = false;
            double StageCode = (double)Structure.Get("STRUM.Phenology.Stage", relativeTo: Row);
            if ((StageCode > 3.0) && (StageCode<5.0))
            {
                CropIsActive = true;
            }
          
            //Is the irrigator available?
            IrrigatorIsAvailable = false;
            if (DaysSinceIrrigation >= returndays)
                IrrigatorIsAvailable = true;
          
            //Is the soil dry enough to require irrigation?
            SoilIsDry = false;
            double depthFromSurface = 0.0;
            double fracLayer = 0.0;
            TopSWC = 0.0;
            for (int layer = 0; layer < nLayers; layer++)
            //for (int layer = 0; depthFromSurface < depthPAWC + soilPhysical.Thickness[layer]; layer++)
            {
                fracLayer = Math.Min(1.0, (depthPAWC - depthFromSurface) / soilPhysical.Thickness[layer]);
                TopSWC += waterBalance.SWmm[layer] * fracLayer;
                depthFromSurface += soilPhysical.Thickness[layer];
                if (depthFromSurface >= depthPAWC)
                    layer = nLayers;
            }
            
            IrrigLayerSWDeficit = TopSWC - TopDUL;
            if (Math.Max(0.0, -IrrigLayerSWDeficit) >= (TopDUL - TopLL) * (100 - triggerDeficit) / 100)
                SoilIsDry = true;

            //Are all the conditions ratifying irrigation
            if (IrrigationIsAllowed && CropIsActive && IrrigatorIsAvailable && SoilIsDry)
            {
                //Lets irrigate well !!!!
                Irrigation irrigRow = (Irrigation)Structure.Get("Irrigation", relativeTo: Row);
                irrigRow.Apply(irrigateAmount, depth: 0);
                DaysSinceIrrigation = 0;
                if (IrrigateAlley)
                {
                   Irrigation irrigAlley = (Irrigation)Structure.Get("Irrigation", relativeTo: Alley);
                   irrigAlley.Apply(irrigateAmount , depth: 0);           
                }
            }
        }
    }
}
```
  DataStore
    ExcelInput: FileNames=[AllObsCopy.xlsx]; SheetNames=[Observed]
    PredictedObserved: PredictedTableName=KiwiReport; ObservedTableName=Observed; FieldNameUsedForMatch=SimulationName; FieldName2UsedForMatch=Zone; FieldName3UsedForMatch=Clock.Today; AllColumns=false
    PredictedObserved DrainagePO (disabled): PredictedTableName=Drainage; ObservedTableName=Observed; FieldNameUsedForMatch=SimulationName; FieldName2UsedForMatch=Zone; FieldName3UsedForMatch=Clock.Today; AllColumns=false
  Folder Sensitivity
    Memo ReadMe
      **Sites and soils to simulate**

      | Site         		|   Soil_SG                               | SMAP Name_SG 	| Coordinates_SG	        		 | Nearest station_RC                   |VCSN#	|Soil_RC|
      |------------------|-------------------------|--------------------|------------------------------------------------|----------------------|----------|-----------------|-----------------------
      | Kerikeri   |   Kerikeri silt loam   	| Kerikeri_2a1 or 4a1| -35.182704°, 173.919934°| Kapiro	 | 27019	 | Kaawa_13a.1|
      | Pukekohe***Ψ***   |   Karaka silt loam      	| Karaka_1a1              | -37.210337°, 174.694626° | Waipipi	 | 21728	 |  Otorohanga_24b.1     |
      | Katikati     |   Katikati sandy loam   	| Ngak_1a.3	   | -37.596273°, 175.950706°| Matahui| 29379	 | Ngakura_1a.3|
      | Pukehina***Ψ***    |   Ohanipanea sandy loam   | Turan_8a.1                | -37.815361°, 176.537074°| Pukehina| 30005	 | Turangi_8a.1 |
      | Te Puke***α***    |   Te Puke sandy loam    	| Ngak_2a.1                | -37.833892°, 176.283924°| Bayly rd	| 29966	 | Ngakura_2a.1 |
      | Whakatane  |   Rangitikei silt loam  	| Rangitikei_3a1       | -38.012183°, 177.322731°| Opotiki    | 31120	 | Opotiki_1a.1 |
      | Gisborne    |   Kaiti silt loam       	| Flax_77f.1                  | -38.605677°, 177.939866° | Whaerengaahika|30639	| Flaxton_76a.1	 |
      | Whakatu***Ψ***    |   Ngatarawa sandy loam  	| xxxx                             | -39.60714°, 176.73027°	| Roys Hill| 28991	 | Ashburton_41a.1 |

      ***SG=Steve G; RC=Rogerio***

      ***Ψ=netted***

      ***α=not usually irrigated, cv = 'Hayward'***
    Memo Read_Reporting
      NSD soils for comparison with S-map
    Experiment Kerikeri (disabled)
      Factors
        Factor IrrigationRegime
          CompositeFactor Rainfed
            Specifications:
              [AutoIrrigationDeficitBased].Script.AllowIrrigation = FALSE
              [RadiationWindFactor].Script.RadiationFactor = 1
              [RadiationWindFactor].Script.WindFactor = 0.8
          CompositeFactor Deficit
            Specifications:
              [AutoIrrigationDeficitBased].Script.AllowIrrigation = TRUE
              [AutoIrrigationDeficitBased].Script.triggerDeficit = 30
              [RadiationWindFactor].Script.RadiationFactor = 1
              [RadiationWindFactor].Script.WindFactor = 0.8
          CompositeFactor Full
            Specifications:
              [AutoIrrigationDeficitBased].Script.AllowIrrigation = TRUE
              [AutoIrrigationDeficitBased].Script.triggerDeficit = 50
              [RadiationWindFactor].Script.RadiationFactor = 1
              [RadiationWindFactor].Script.WindFactor = 0.8
          CompositeFactor Excess
            Specifications:
              [AutoIrrigationDeficitBased].Script.AllowIrrigation = TRUE
              [AutoIrrigationDeficitBased].Script.triggerDeficit = 70
              [RadiationWindFactor].Script.RadiationFactor = 1
              [RadiationWindFactor].Script.WindFactor = 0.8
      Simulation Site1
        Clock: Start=1994-06-21; End=2020-12-01
        Summary SummaryFile
        Weather: FileName=VCSN/Kerikeri27019_Kapiro.met
        MicroClimate: a_interception=0; b_interception=1; c_interception=0; d_interception=0; SoilHeatFluxFraction=0.4; MinimumHeightDiffForNewLayer=0; NightInterceptionFraction=0.5; ReferenceHeight=2
        SoilArbitrator Soil Arbitrator
        Manager AutomaticFertiliser
          Fertilise = True
          Season_Start = 1-Aug
          Season_End = 30-Apr
          Season_Allocation = 100000
          TriggerN = 50
          NApplicationAmount = 25
          Return_days = 3
          Top_Depth = 600
          script: same as in Replacements.AutomaticFertiliser
        Manager RadiationWindFactor
```csharp
using System;
using Models.Core;
using Models.Interfaces;

namespace Models
{
    [Serializable]
    public class Script : Model
    {
        [Link] private IWeather weather;

        public double RadiationFactor { get; set; } = 1.0;
        public double WindFactor { get; set; } = 1.0;

        [EventSubscribe("DoWeather")]
        private void OnDoWeather(object sender, EventArgs e)
        {
            weather.Radn *= RadiationFactor;
            weather.Wind *= WindFactor;
        }
    }
}
```
        RectangularZone Row: Length=100; Width=1; CanopyType=TreeRow; Slope=0; AspectAngle=0; Altitude=50
          Report RowZoneReport: EventNames=[Clock].DoReport
          Report KiwiReport: EventNames=[Clock].DoReport
            VariableNames:
              [Clock].Today
              [ResetDate].Script.SimulationYear as SimYear
              [Row].STRUM.AccumulatedWaterStress
              //[Row].STRUM.Arbitrator.DemandRatio
              [Row].Area
              [Row].STRUM.BaseHeight
              [Row].STRUM.Fruit.FreshYield_kgPerHa
              [Row].STRUM.CanopyArea
              [Row].STRUM.RootUptakesArbitrator.WaterDemand.Amount
              [Row].STRUM.RootUptakesArbitrator.WaterDemand.mm
              [Row].STRUM.RootUptakesArbitrator.NitrogenDemand.Amount
              [Row].STRUM.Root.Network.WtByLayerZone1
              [Row].STRUM.Root.Network.WtByLayerZone2
              [Row].STRUM.Arbitrator.Carbon.TotalPlantDemand
              [Row].STRUM.Arbitrator.Carbon.TotalPlantSupply
              [Row].STRUM.Arbitrator.Carbon.TotalPlantDemandsAllocated
              [Row].STRUM.Arbitrator.Fn
              [Row].STRUM.Arbitrator.Nitrogen.TotalPlantDemand
              [Row].STRUM.Arbitrator.Nitrogen.TotalPlantSupply
              [Row].STRUM.Arbitrator.Nitrogen.TotalPlantDemandsAllocated
              [Row].STRUM.Fruit.TotalCarbonDemand.RelativeFruitMass.Delta.Integral
              [Row].STRUM.Fruit.Allocated.Carbon.Total
              [Row].STRUM.Fruit.Allocated.Nitrogen.Total
              [Row].STRUM.Fruit.Carbon.Demands.Structural
              [Row].STRUM.Fruit.Carbon.Demands.Total
              [Row].STRUM.Fruit.DMC
              [Row].STRUM.Fruit.FreshWtPerFruit
              [Row].STRUM.Fruit.NextYearsFruitingBudSurvival
              [Row].STRUM.Fruit.Number.BudsSurvivalFromLastYear
              [Row].STRUM.Fruit.N
              [Row].STRUM.Fruit.Nitrogen.Demands.Total
              [Row].STRUM.Fruit.Number
              [Row].STRUM.Fruit.Diameter
              [Row].STRUM.Fruit.VolumePerFruit
              [Row].STRUM.Fruit.Wt
              [Row].STRUM.Fruit.PotentialDWPerFruit
              [Row].STRUM.Fruit.TotalCarbonDemand.RelativeFruitMass
              [Row].STRUM.Fruit.TotalCarbonDemand.CarbonConc
              [Row].STRUM.Height
              [Row].STRUM.Height.PrunedCanopyBaseHeight
              [Row].STRUM.Height.PrunedCanopyBaseHeight  + [Row].STRUM.Height.PrunedCanopyDepth
              [Row].STRUM.Height.PrunedCanopyBaseHeight  + [Row].STRUM.Height.PrunedCanopyDepth + [Row].STRUM.Height.SeasonalDepthGrowth
              [Row].STRUM.Leaf.Allocated.Carbon.Total
              [Row].STRUM.Leaf.Allocated.Nitrogen.Total
              [Row].STRUM.Leaf.Canopy.CoverGreen
              [Row].STRUM.Leaf.Canopy.Deepness
              [Row].STRUM.Leaf.Dead.Wt
              [Row].STRUM.Leaf.Carbon.Demands.Structural
              [Row].STRUM.Leaf.Carbon.Demands.Total
              [Row].STRUM.Leaf.Fn
              [Row].STRUM.Leaf.Canopy.Fw
              [Row].STRUM.Leaf.Canopy.LAI
              [Row].STRUM.Leaf.Live.Wt
              [Row].STRUM.Leaf.N
              [Row].STRUM.Leaf.Nitrogen.Demands.Total
              [Row].STRUM.Leaf.Canopy.PotentialEP
              [Row].STRUM.Leaf.Canopy.RadiationIntercepted
              [Row].STRUM.Leaf.Senesced.Weight.Structural
              [Row].STRUM.Leaf.SenescenceRate
              [Row].STRUM.Leaf.Canopy.Transpiration
              [Row].STRUM.Leaf.Canopy.WaterDemand
              [Row].STRUM.Leaf.Canopy.WaterAllocation
              [Row].STRUM.Leaf.Canopy.Width
              [Row].STRUM.Leaf.Canopy.GreenExtinctionCoefficient
              [Row].STRUM.Leaf.Wt
              [Row].STRUM.Phenology.Age.YearDecimal
              [Row].STRUM.Phenology.Age.Years
              [Row].STRUM.Phenology.CurrentStageName
              [Row].STRUM.Phenology.DaysSinceFlowering
              [Row].STRUM.Phenology.Stage
              [Row].STRUM.RelativeSeasonalDimension
              [Row].STRUM.RelativeAnnualDimension
              [Row].STRUM.Root.Allocated.Carbon.Total
              [Row].STRUM.Root.Allocated.Nitrogen.Total
              [Row].STRUM.Root.Network.Depth
              [Row].STRUM.Root.Carbon.Demands.Structural
              [Row].STRUM.Root.Carbon.Demands.Total
              [Row].STRUM.Root.N
              [Row].STRUM.Root.Nitrogen.Demands.Total
              [Row].STRUM.RootUptakesArbitrator.WaterUptake.AmountByZone
              [Row].STRUM.RootUptakesArbitrator.WaterUptake.Mm
              [Row].STRUM.RootUptakesArbitrator.WaterUptake.Amount
              [Row].STRUM.RootUptakesArbitrator.NitrogenUptake.AmountByZone
              [Row].STRUM.RootUptakesArbitrator.NitrogenUptake.Gpm2
              [Row].STRUM.RootUptakesArbitrator.NitrogenUptake.Amount
              [Row].STRUM.RootUptakesArbitrator.WaterSupply.AmountByZone
              [Row].STRUM.RootUptakesArbitrator.WaterSupply.Mm
              [Row].STRUM.RootUptakesArbitrator.WaterSupply.Amount
              [Row].STRUM.RootUptakesArbitrator.NitrogenSupply.AmountByZone
              [Row].STRUM.RootUptakesArbitrator.NitrogenSupply.Gpm2
              [Row].STRUM.RootUptakesArbitrator.NitrogenSupply.Amount
              [Row].STRUM.Root.Wt
              [Row].STRUM.TranspirationPerTree
              [Row].STRUM.Wood.Allocated.Carbon.Total
              [Row].STRUM.Wood.Allocated.Nitrogen.Total
              [Row].STRUM.Wood.Carbon.Demands.Structural
              [Row].STRUM.Wood.Carbon.Demands.Total
              [Row].STRUM.Wood.Carbon.Supplies.ReTranslocation
              [Row].STRUM.Wood.Live.Carbon.Structural * 1/0.4
              [Row].STRUM.Wood.Live.Carbon.Storage * 1/0.4
              [Row].STRUM.Wood.EnergyBalance.CoverTotal
              [Row].STRUM.Wood.EnergyBalance.DeadAreaIndex
              [Row].STRUM.Wood.EnergyBalance.LAIDead
              [Row].STRUM.Wood.EnergyBalance.RadiationInterceptedByDead
              [Row].STRUM.Wood.EnergyBalance.Transpiration
              [Row].STRUM.Wood.N
              [Row].STRUM.Wood.Nitrogen.Demands.Total
              [Row].STRUM.Wood.Wt
              [Row].STRUM.Width
              [Row].STRUM.Width.PrunedWidth
              [Row].STRUM.Width.PrunedWidth + [Row].STRUM.Width.SeasonalGrowth
              [Row].STRUM.TranspirationPerLeafArea
              [Row].SurfaceOrganicMatter.N
              [Row].SurfaceOrganicMatter.Wt
              [Row].Irrigation.IrrigationApplied
              [Row].Fertiliser.NitrogenApplied
              sum([Row].Soil.OutputLayers.SWmm)
              [Row].Soil.OutputLayers.SWmm
              ([Row].Soil.OutputLayers.SWmm[1] + [Row].Soil.OutputLayers.SWmm[2]+ [Row].Soil.OutputLayers.SWmm[3]) as SWmm0_120
              ([Row].Soil.OutputLayers.SWmm[1] + [Row].Soil.OutputLayers.SWmm[2]+ [Row].Soil.OutputLayers.SWmm[3] + [Row].Soil.OutputLayers.SWmm[4]) as SWmm0_160
              [Row].Soil.OutputLayers.SW
              [Row].Soil.OutputLayers.SAT
              [Row].Soil.OutputLayers.DUL
              [Row].Soil.OutputLayers.LL15
              [Row].Soil.SoilWater.Evaporation
              [Row].Soil.SoilWater.Eo
              [Weather].PanEvap
              [Weather].Radn
              [Weather].Rain
              [STRUM].Leaf.TotalCarbonDemand.TotalDMDemand.SizeDemand.SizeDemand.SizeDemand.TargetSize
          SurfaceOrganicMatter: InitialResidueName=wheat_stubble; InitialResidueType=wheat; InitialResidueMass=500; InitialStandingFraction=0; InitialCPR=0; InitialCNR=100
          Fertiliser
          Irrigation
          Manager MulchResidues
```csharp
using Models.Surface;
using Models.Core;
using Newtonsoft.Json;
using Models.Interfaces;
using APSIM.Shared.Utilities;
using System.Xml.Serialization;
using System;
        
namespace Models
{
    [Serializable] 
    [System.Xml.Serialization.XmlInclude(typeof(Model))]
    public class Script : Model
    {
        [Link] private SurfaceOrganicMatter SurfOM;
        
        //Determine daily requirement for fertiliser
        [EventSubscribe("Pruning")]
        private void OnPrun(object sender, EventArgs e)
        { 
            SurfOM.Incorporate(80,50);
        }
    }
}
```
          Plant STRUM
          StrumTreeInstance KiwiFruit: TreeType=Deciduous; RowSpacing=3.6; InterRowSpacing=3; AlleyZoneWidthFrac=0.1; BudBreakDate=19-Sep; StartFullCanopyDate=15-Dec; StartLeafFallDate=18-May; EndLeafFallDate=21-Jun; DBHatMaturity=5; TypicalCanopyArea=22; WoodBulkDensity=450; WoodStorageFraction=0.2; MaximumLeafBiomass=150; MaximumRootBiomass=200; AgeAtSimulationStart=6; YearsToMaxDimension=6; CrownShape=1; MatureCanopyBaseHeight=1.8; MaturePrunedCanopyBaseHeight=1.8; MatureHeight=2.4; MaturePrunedHeight=2.4; MatureWidth=3.4; MaturePrunedWidth=3.4; SummerPruneDates=[15-Jul]; FRemoveSummerPrune=0.25; RootNConc=0.01; LeafNConc=0.02; WoodNConc=0.005; FruitNConc=0.02; NFixationFrac=0; GRINZ=true; MaxRD=1.2; ExtinctCoeff=0.8; BaseCover=0; MaxCover=0.95; RUE=2; PSBaseT=10; PSLOptT=20; PSUOptT=25; PSMaxT=35; GSMax=0.011; R50=125; SurfaceKL=0.1; WaterStress=true; Number=60; PotentialFWPerFruit=140; DMC=0.17; FruitDensity=1.02; DateMaxBloom=7-Nov; DAFStartLinearGrowth=90; DAFEndLinearGrowth=180; DAFMaxSize=200
          Soil Kaawa_13a1: ASCOrder=U; SoilType=Typic Yellow Ultic Soils; LocalName=Kaawa_13a1; Country=New Zealand; Latitude=-41; Longitude=174
            DataSource=Profile descriptions provided by Smap based on the work done by Trevor Webb.
            Memo ReadMe
              *	Modified using NSD parameters for Kerikeri_Kaawa_13a.1 provided by SG
            Physical
              Thickness  ParticleSizeSand  ParticleSizeSilt  ParticleSizeClay  Rocks  BD     AirDry  LL15   DUL    SAT    KS
              100        6                 49                45                0      1.092  0.074   0.221  0.332  0.54   14
              200        6                 44                50                7.5    1.257  0.21    0.23   0.321  0.444  14
              200        6                 34                60                17.5   1.072  0.34    0.34   0.42   0.495  14
              100        6                 34                60                17.5   1.072  0.34    0.34   0.42   0.495  14
              100        6                 34                60                17.5   1.072  0.34    0.34   0.42   0.495  14
              300        6                 34                60                17.5   1.072  0.34    0.34   0.42   0.495  14
              200        6                 34                60                17.5   1.072  0.34    0.34   0.42   0.495  14
              300        6                 34                60                17.5   1.072  0.34    0.34   0.42   0.495  14
              300        6                 34                60                17.5   1.072  0.34    0.34   0.42   0.495  14
              200        6                 34                60                17.5   1.072  0.34    0.34   0.42   0.495  14
              SoilCrop STRUMSoil
                LL=[0.221, 0.23, 0.34, 0.34, 0.34, 0.34, 0.34, 0.34, 0.34, 0.34]
                KL=[0.127488, 0.0876213, 0.0876213, 0.00928316, 0.00928316, 0.00928316, 0.00928316, 0.00928316, 0.00928316, 0.00928316]
                XF=[1, 1, 1, 0.834, 0.834, 0.834, 0.834, 0.834, 0.834, 0.834]
            Organic: FOMCNRatio=40; CarbonUnits=Total
              Thickness  Carbon    SoilCNRatio  FBiom      FInert    FOM
              50         5.5       17.6         0.0788566  0.415799  227.364
              50         5.5       17.6         0.0610103  0.475828  220.546
              50         5.5       15.8         0.0477893  0.526641  177.533
              50         4.53927   15.8         0.037995   0.580518  138.263
              50         3.1087    15.8         0.0307392  0.637713  107.679
              50         2.14976   15.8         0.025364   0.688296  83.8606
              50         1.50696   30           0.0213819  0.733357  65.3107
              50         1.07608   30           0.0184319  0.773751  50.864
              50         0.787257  30           0.0162465  0.810056  39.6129
              50         0.59365   30           0.0146275  0.842545  30.8506
              250        0.318565  30           0.0118814  0.91667   77.4992
              250        0.216046  71           0.0104198  0.976779  22.2039
              500        0.200799  32.5         0.0100442  0.990832  8.18413
              500        0.200015  32.5         0.0100022  0.996255  0
            Chemical: PHUnits=Water
              Thickness  PH  CEC
              75         7   25.873
              275        7   22.8891
              1650       7   18.7508
            Water: Thickness=[100, 200, 200, 100, 100, 300, 200, 300, 300, 200]; FilledFromTop=true
              InitialValues=[0.332, 0.321, 0.42, 0.42, 0.42, 0.42, 0.42, 0.42, 0.42, 0.42]
            WaterBalance SoilWater: SummerDate=1-oct; SummerU=9; SummerCona=4.4; WinterDate=1-apr; WinterU=4; WinterCona=2; DiffusConst=88; DiffusSlope=35; Salb=0.13; CN2Bare=86; CNRed=26; CNCov=0.8; PSIDul=-100
              Thickness  SWCON  KLAT
              100        0.059  0
              200        0.05   0
              200        0.076  0
              100        0.129  0
              100        0.129  0
              300        0.054  0
              200        0.076  0
              300        0.054  0
              300        0.054  0
              200        0.076  1
            SoilTemperature Temperature: InteractionsPerDay=8
            Solute NO3: Thickness=[75, 275, 1650]; InitialValues=[4.75, 14.2794, 0.970588]; InitialValuesUnits=kg/ha; WaterTableConcentration=0; D0=0; DepthConstant=0; MaxDepthSoluteAccessible=0; RunoffEffectivenessAtMovingSolute=0; MaxEffectiveRunoff=0
            Solute NH4: Thickness=[75, 275, 1650]; InitialValues=[0.7125, 2.14191, 0.145588]; InitialValuesUnits=kg/ha; WaterTableConcentration=0; D0=0; DepthConstant=0; MaxDepthSoluteAccessible=0; RunoffEffectivenessAtMovingSolute=0; MaxEffectiveRunoff=0
            Solute Urea: Thickness=[75, 275, 1650]; InitialValues=[0, 0, 0]; InitialValuesUnits=ppm; WaterTableConcentration=0; D0=0; DepthConstant=0; MaxDepthSoluteAccessible=0; RunoffEffectivenessAtMovingSolute=0; MaxEffectiveRunoff=0
            Nutrient
            OutputLayers: Thickness=[400, 400, 400, 400, 400]
        Manager AutoIrrigationDeficitBased
          AllowIrrigation = True
          depthPAWC = 1000
          triggerDeficit = 50
          irrigateAmount = 15
          returndays = 2
          IrrigateAlley = False
          script: same as in Replacements.AutoIrrigationDeficitBased
        Manager ResetDate
          ResetDate = 01-Jul
          script: same as in Replacements.ResetDate
    Experiment Pukekohe
      Factors
        Factor IrrigationRegime
          CompositeFactor Rainfed
            Specifications:
              [RadiationWindFactor].Script.RadiationFactor = 0.8
              [RadiationWindFactor].Script.WindFactor = 0.5
              [AutoIrrigationDeficitBased].Script.AllowIrrigation = FALSE
          CompositeFactor Deficit
            Specifications:
              [RadiationWindFactor].Script.RadiationFactor = 0.8
              [RadiationWindFactor].Script.WindFactor = 0.5
              [AutoIrrigationDeficitBased].Script.AllowIrrigation = TRUE
              [AutoIrrigationDeficitBased].Script.triggerDeficit = 30
          CompositeFactor Full
            Specifications:
              [RadiationWindFactor].Script.RadiationFactor = 0.8
              [RadiationWindFactor].Script.WindFactor = 0.5
              [AutoIrrigationDeficitBased].Script.AllowIrrigation = TRUE
              [AutoIrrigationDeficitBased].Script.triggerDeficit = 50
          CompositeFactor Excess
            Specifications:
              [RadiationWindFactor].Script.RadiationFactor = 0.8
              [RadiationWindFactor].Script.WindFactor = 0.5
              [AutoIrrigationDeficitBased].Script.AllowIrrigation = TRUE
              [AutoIrrigationDeficitBased].Script.triggerDeficit = 70
      Simulation Site2
        Clock: Start=1994-06-21; End=2020-12-01
        Summary SummaryFile
        Weather: FileName=VCSN/Pukekohe21728_Waipipi.met
        MicroClimate: a_interception=0; b_interception=1; c_interception=0; d_interception=0; SoilHeatFluxFraction=0.4; MinimumHeightDiffForNewLayer=0; NightInterceptionFraction=0.5; ReferenceHeight=2
        SoilArbitrator Soil Arbitrator
        Manager AutomaticFertiliser
          Fertilise = True
          Season_Start = 1-Aug
          Season_End = 30-Apr
          Season_Allocation = 100000
          TriggerN = 50
          NApplicationAmount = 25
          Return_days = 3
          Top_Depth = 600
          script: same as in Replacements.AutomaticFertiliser
        Manager RadiationWindFactor
          script: same as in Sensitivity.Kerikeri.Site1.RadiationWindFactor
        RectangularZone Row: Length=100; Width=1; CanopyType=TreeRow; Slope=0; AspectAngle=0; Altitude=50
          Report RowZoneReport: EventNames=[Clock].DoReport
          Report KiwiReport: EventNames=[Clock].DoReport
            VariableNames:
              [Clock].Today
              [ResetDate].Script.SimulationYear as SimYear
              [Row].STRUM.AccumulatedWaterStress
              //[Row].STRUM.Arbitrator.DemandRatio
              [Row].Area
              [Row].STRUM.BaseHeight
              [Row].STRUM.Fruit.FreshYield_kgPerHa
              [Row].STRUM.CanopyArea
              [Row].STRUM.RootUptakesArbitrator.WaterDemand.Amount
              [Row].STRUM.RootUptakesArbitrator.WaterDemand.mm
              [Row].STRUM.RootUptakesArbitrator.NitrogenDemand.Amount
              [Row].STRUM.Root.Network.WtByLayerZone1
              [Row].STRUM.Root.Network.WtByLayerZone2
              [Row].STRUM.Arbitrator.Carbon.TotalPlantDemand
              [Row].STRUM.Arbitrator.Carbon.TotalPlantSupply
              [Row].STRUM.Arbitrator.Carbon.TotalPlantDemandsAllocated
              [Row].STRUM.Arbitrator.Fn
              [Row].STRUM.Arbitrator.Nitrogen.TotalPlantDemand
              [Row].STRUM.Arbitrator.Nitrogen.TotalPlantSupply
              [Row].STRUM.Arbitrator.Nitrogen.TotalPlantDemandsAllocated
              [Row].STRUM.Fruit.TotalCarbonDemand.RelativeFruitMass.Delta.Integral
              [Row].STRUM.Fruit.Allocated.Carbon.Total
              [Row].STRUM.Fruit.Allocated.Nitrogen.Total
              [Row].STRUM.Fruit.Carbon.Demands.Structural
              [Row].STRUM.Fruit.Carbon.Demands.Total
              [Row].STRUM.Fruit.DMC
              [Row].STRUM.Fruit.FreshWtPerFruit
              [Row].STRUM.Fruit.NextYearsFruitingBudSurvival
              [Row].STRUM.Fruit.Number.BudsSurvivalFromLastYear
              [Row].STRUM.Fruit.N
              [Row].STRUM.Fruit.Nitrogen.Demands.Total
              [Row].STRUM.Fruit.Number
              [Row].STRUM.Fruit.Diameter
              [Row].STRUM.Fruit.VolumePerFruit
              [Row].STRUM.Fruit.Wt
              [Row].STRUM.Fruit.PotentialDWPerFruit
              [Row].STRUM.Fruit.TotalCarbonDemand.RelativeFruitMass
              [Row].STRUM.Fruit.TotalCarbonDemand.CarbonConc
              [Row].STRUM.Height
              [Row].STRUM.Height.PrunedCanopyBaseHeight
              [Row].STRUM.Height.PrunedCanopyBaseHeight  + [Row].STRUM.Height.PrunedCanopyDepth
              [Row].STRUM.Height.PrunedCanopyBaseHeight  + [Row].STRUM.Height.PrunedCanopyDepth + [Row].STRUM.Height.SeasonalDepthGrowth
              [Row].STRUM.Leaf.Allocated.Carbon.Total
              [Row].STRUM.Leaf.Allocated.Nitrogen.Total
              [Row].STRUM.Leaf.Canopy.CoverGreen
              [Row].STRUM.Leaf.Canopy.Deepness
              [Row].STRUM.Leaf.Dead.Wt
              [Row].STRUM.Leaf.Carbon.Demands.Structural
              [Row].STRUM.Leaf.Carbon.Demands.Total
              [Row].STRUM.Leaf.Fn
              [Row].STRUM.Leaf.Canopy.Fw
              [Row].STRUM.Leaf.Canopy.LAI
              [Row].STRUM.Leaf.Live.Wt
              [Row].STRUM.Leaf.N
              [Row].STRUM.Leaf.Nitrogen.Demands.Total
              [Row].STRUM.Leaf.Canopy.PotentialEP
              [Row].STRUM.Leaf.Canopy.RadiationIntercepted
              [Row].STRUM.Leaf.Senesced.Weight.Structural
              [Row].STRUM.Leaf.SenescenceRate
              [Row].STRUM.Leaf.Canopy.Transpiration
              [Row].STRUM.Leaf.Canopy.WaterDemand
              [Row].STRUM.Leaf.Canopy.WaterAllocation
              [Row].STRUM.Leaf.Canopy.Width
              [Row].STRUM.Leaf.Canopy.GreenExtinctionCoefficient
              [Row].STRUM.Leaf.Wt
              [Row].STRUM.Phenology.Age.YearDecimal
              [Row].STRUM.Phenology.Age.Years
              [Row].STRUM.Phenology.CurrentStageName
              [Row].STRUM.Phenology.DaysSinceFlowering
              [Row].STRUM.Phenology.Stage
              [Row].STRUM.RelativeSeasonalDimension
              [Row].STRUM.RelativeAnnualDimension
              [Row].STRUM.Root.Allocated.Carbon.Total
              [Row].STRUM.Root.Allocated.Nitrogen.Total
              [Row].STRUM.Root.Network.Depth
              [Row].STRUM.Root.Carbon.Demands.Structural
              [Row].STRUM.Root.Carbon.Demands.Total
              [Row].STRUM.Root.N
              [Row].STRUM.Root.Nitrogen.Demands.Total
              [Row].STRUM.RootUptakesArbitrator.WaterUptake.AmountByZone
              [Row].STRUM.RootUptakesArbitrator.WaterUptake.Mm
              [Row].STRUM.RootUptakesArbitrator.WaterUptake.Amount
              [Row].STRUM.RootUptakesArbitrator.NitrogenUptake.AmountByZone
              [Row].STRUM.RootUptakesArbitrator.NitrogenUptake.Gpm2
              [Row].STRUM.RootUptakesArbitrator.NitrogenUptake.Amount
              [Row].STRUM.RootUptakesArbitrator.WaterSupply.AmountByZone
              [Row].STRUM.RootUptakesArbitrator.WaterSupply.Mm
              [Row].STRUM.RootUptakesArbitrator.WaterSupply.Amount
              [Row].STRUM.RootUptakesArbitrator.NitrogenSupply.AmountByZone
              [Row].STRUM.RootUptakesArbitrator.NitrogenSupply.Gpm2
              [Row].STRUM.RootUptakesArbitrator.NitrogenSupply.Amount
              [Row].STRUM.Root.Wt
              [Row].STRUM.TranspirationPerTree
              [Row].STRUM.Wood.Allocated.Carbon.Total
              [Row].STRUM.Wood.Allocated.Nitrogen.Total
              [Row].STRUM.Wood.Carbon.Demands.Structural
              [Row].STRUM.Wood.Carbon.Demands.Total
              [Row].STRUM.Wood.Carbon.Supplies.ReTranslocation
              [Row].STRUM.Wood.Live.Carbon.Structural * 1/0.4
              [Row].STRUM.Wood.Live.Carbon.Storage * 1/0.4
              [Row].STRUM.Wood.EnergyBalance.CoverTotal
              [Row].STRUM.Wood.EnergyBalance.DeadAreaIndex
              [Row].STRUM.Wood.EnergyBalance.LAIDead
              [Row].STRUM.Wood.EnergyBalance.RadiationInterceptedByDead
              [Row].STRUM.Wood.EnergyBalance.Transpiration
              [Row].STRUM.Wood.N
              [Row].STRUM.Wood.Nitrogen.Demands.Total
              [Row].STRUM.Wood.Wt
              [Row].STRUM.Width
              [Row].STRUM.Width.PrunedWidth
              [Row].STRUM.Width.PrunedWidth + [Row].STRUM.Width.SeasonalGrowth
              [Row].STRUM.TranspirationPerLeafArea
              [Row].SurfaceOrganicMatter.N
              [Row].SurfaceOrganicMatter.Wt
              [Row].Irrigation.IrrigationApplied
              [Row].Fertiliser.NitrogenApplied
              sum([Row].Soil.OutputLayers.SWmm)
              [Row].Soil.OutputLayers.SWmm
              ([Row].Soil.OutputLayers.SWmm[1] + [Row].Soil.OutputLayers.SWmm[2]+ [Row].Soil.OutputLayers.SWmm[3]) as SWmm0_120
              ([Row].Soil.OutputLayers.SWmm[1] + [Row].Soil.OutputLayers.SWmm[2]+ [Row].Soil.OutputLayers.SWmm[3] + [Row].Soil.OutputLayers.SWmm[4]) as SWmm0_160
              [Row].Soil.OutputLayers.SW
              [Row].Soil.OutputLayers.SAT
              [Row].Soil.OutputLayers.DUL
              [Row].Soil.OutputLayers.LL15
              [Row].Soil.SoilWater.Evaporation
              [Row].Soil.SoilWater.Eo
              [Weather].PanEvap
              [Weather].Radn
              [Weather].Rain
              [STRUM].Leaf.TotalCarbonDemand.TotalDMDemand.SizeDemand.SizeDemand.SizeDemand.TargetSize
          SurfaceOrganicMatter: InitialResidueName=wheat_stubble; InitialResidueType=wheat; InitialResidueMass=500; InitialStandingFraction=0; InitialCPR=0; InitialCNR=100
          Fertiliser
          Irrigation
          Manager MulchResidues
            script: same as in Sensitivity.Kerikeri.Site1.Row.MulchResidues
          Plant STRUM
          StrumTreeInstance KiwiFruit: TreeType=Deciduous; RowSpacing=3.6; InterRowSpacing=3; AlleyZoneWidthFrac=0.1; BudBreakDate=19-Sep; StartFullCanopyDate=15-Dec; StartLeafFallDate=18-May; EndLeafFallDate=21-Jun; DBHatMaturity=5; TypicalCanopyArea=22; WoodBulkDensity=450; WoodStorageFraction=0.2; MaximumLeafBiomass=150; MaximumRootBiomass=200; AgeAtSimulationStart=6; YearsToMaxDimension=6; CrownShape=1; MatureCanopyBaseHeight=1.8; MaturePrunedCanopyBaseHeight=1.8; MatureHeight=2.4; MaturePrunedHeight=2.4; MatureWidth=3.4; MaturePrunedWidth=3.4; SummerPruneDates=[15-Jul]; FRemoveSummerPrune=0.25; RootNConc=0.01; LeafNConc=0.02; WoodNConc=0.005; FruitNConc=0.02; NFixationFrac=0; GRINZ=true; MaxRD=1.2; ExtinctCoeff=0.8; BaseCover=0; MaxCover=0.95; RUE=2; PSBaseT=10; PSLOptT=20; PSUOptT=25; PSMaxT=35; GSMax=0.011; R50=125; SurfaceKL=0.1; WaterStress=true; Number=58; PotentialFWPerFruit=140; DMC=0.17; FruitDensity=1.02; DateMaxBloom=7-Nov; DAFStartLinearGrowth=90; DAFEndLinearGrowth=180; DAFMaxSize=200
          Soil Karaka_1a1: ASCOrder=L; SoilType=Mottled Orthic Allophanic Soils; LocalName=Karaka_1a1; Country=New Zealand; Latitude=-41; Longitude=174
            DataSource=Profile descriptions provided by Smap based on the work done by Trevor Webb.
            Memo Karaka_1a1
              *	Used hydraulic properties provided by SG
            Physical
              Thickness  ParticleSizeSand  ParticleSizeSilt  ParticleSizeClay  Rocks  BD     AirDry  LL15   DUL    SAT    KS
              100        12.5              47.5              40                0      0.82   0.139   0.278  0.485  0.619  1920
              100        12.5              47.5              40                0      0.82   0.139   0.278  0.485  0.619  1920
              200        9                 26                65                0      0.671  0.353   0.404  0.567  0.676  720
              200        9                 26                65                0      0.671  0.353   0.404  0.567  0.676  720
              233        15                35                50                0      0.749  0.375   0.375  0.554  0.646  720
              233        15                35                50                0      0.749  0.375   0.375  0.554  0.646  720
              233        15                35                50                0      0.749  0.375   0.375  0.554  0.646  720
              233        15                35                50                0      0.749  0.375   0.375  0.554  0.646  720
              233        15                35                50                0      0.749  0.375   0.375  0.554  0.646  720
              235        15                35                50                0      0.749  0.375   0.375  0.554  0.646  720
              SoilCrop STRUMSoil
                LL=[0.278, 0.278, 0.404, 0.404, 0.375, 0.375, 0.375, 0.375, 0.375, 0.375]
                KL=[0.111508, 0.111508, 0.0488579, 0.0488579, 0.00710178, 0.00710178, 0.00710178, 0.00710178, 0.00710178, 0.00710178]
                XF=[1, 1, 1, 1, 1, 1, 1, 1, 1, 1]
            Organic: FOMCNRatio=40; CarbonUnits=Total
              Thickness  Carbon    SoilCNRatio  FBiom      FInert    FOM
              50         10        11.1         0.0788566  0.575     227.364
              50         10        11.1         0.0610103  0.575     220.546
              50         10        11.1         0.0477893  0.613573  177.533
              50         8.22356   11.1         0.037995   0.662199  138.263
              50         5.57835   11.1         0.0307392  0.709226  107.679
              50         3.80522   11.1         0.025364   0.749972  83.8606
              50         2.61665   11.1         0.0213819  0.785433  65.3107
              50         1.81993   11.1         0.0184319  0.816456  50.864
              50         1.28587   11.1         0.0162465  0.843742  39.6129
              50         0.927881  11.1         0.0146275  0.867834  30.8506
              250        0.419234  11.1         0.0118814  0.923972  77.4992
              250        0.22967   11.1         0.0104198  0.978156  22.2039
              500        0.201477  11.1         0.0100442  0.990841  8.18413
              500        0.200027  11.1         0.0100022  0.996255  0
            Chemical: PHUnits=Water
              Thickness  PH  CEC
              200        7   24.4375
              400        7   20.9173
              1400       7   16.146
            Water: Thickness=[200, 400, 1400]; InitialValues=[0.485, 0.567, 0.554]; FilledFromTop=false
            WaterBalance SoilWater: SummerDate=1-oct; SummerU=9; SummerCona=4.4; WinterDate=1-apr; WinterU=4; WinterCona=2; DiffusConst=88; DiffusSlope=35; Salb=0.13; CN2Bare=88; CNRed=21; CNCov=0.8; PSIDul=-100
              Thickness  SWCON  KLAT
              200        0.3    0
              400        0.3    0
              1400       0.3    0
            SoilTemperature Temperature: InteractionsPerDay=8
            Solute NO3: Thickness=[200, 400, 1400]; InitialValues=[12.6667, 6.5098, 0.823529]; InitialValuesUnits=kg/ha; WaterTableConcentration=0; D0=0; DepthConstant=0; MaxDepthSoluteAccessible=0; RunoffEffectivenessAtMovingSolute=0; MaxEffectiveRunoff=0
            Solute NH4: Thickness=[200, 400, 1400]; InitialValues=[1.9, 0.976471, 0.123529]; InitialValuesUnits=kg/ha; WaterTableConcentration=0; D0=0; DepthConstant=0; MaxDepthSoluteAccessible=0; RunoffEffectivenessAtMovingSolute=0; MaxEffectiveRunoff=0
            Solute Urea: Thickness=[200, 400, 1400]; InitialValues=[0, 0, 0]; InitialValuesUnits=ppm; WaterTableConcentration=0; D0=0; DepthConstant=0; MaxDepthSoluteAccessible=0; RunoffEffectivenessAtMovingSolute=0; MaxEffectiveRunoff=0
            Nutrient
            OutputLayers: Thickness=[400, 400, 400, 400, 200, 200]
        Manager AutoIrrigationDeficitBased
          AllowIrrigation = True
          depthPAWC = 1000
          triggerDeficit = 50
          irrigateAmount = 15
          returndays = 2
          IrrigateAlley = False
          script: same as in Replacements.AutoIrrigationDeficitBased
        Manager ResetDate: same as Replacements.ResetDate
    Experiment Katikati
      Factors
        Factor IrrigationRegime
          CompositeFactor Rainfed
            Specifications:
              [AutoIrrigationDeficitBased].Script.AllowIrrigation = FALSE
              [RadiationWindFactor].Script.RadiationFactor = 1
              [RadiationWindFactor].Script.WindFactor = 0.8
          CompositeFactor Deficit
            Specifications:
              [AutoIrrigationDeficitBased].Script.AllowIrrigation = TRUE
              [AutoIrrigationDeficitBased].Script.triggerDeficit = 30
              [RadiationWindFactor].Script.RadiationFactor = 1
              [RadiationWindFactor].Script.WindFactor = 0.8
          CompositeFactor Full
            Specifications:
              [AutoIrrigationDeficitBased].Script.AllowIrrigation = TRUE
              [AutoIrrigationDeficitBased].Script.triggerDeficit = 50
              [RadiationWindFactor].Script.RadiationFactor = 1
              [RadiationWindFactor].Script.WindFactor = 0.8
          CompositeFactor Excess
            Specifications:
              [AutoIrrigationDeficitBased].Script.AllowIrrigation = TRUE
              [AutoIrrigationDeficitBased].Script.triggerDeficit = 70
              [RadiationWindFactor].Script.RadiationFactor = 1
              [RadiationWindFactor].Script.WindFactor = 0.8
      Simulation Site3
        Clock: Start=1994-06-21; End=2020-12-01
        Summary SummaryFile
        Weather: FileName=VCSN/Katikati 29379_Matahui.met
        MicroClimate: a_interception=0; b_interception=1; c_interception=0; d_interception=0; SoilHeatFluxFraction=0.4; MinimumHeightDiffForNewLayer=0; NightInterceptionFraction=0.5; ReferenceHeight=2
        SoilArbitrator Soil Arbitrator
        Manager AutomaticFertiliser: same as Sensitivity.Pukekohe.Site2.AutomaticFertiliser
        Manager AutoIrrigationDeficitBased: same as Sensitivity.Pukekohe.Site2.AutoIrrigationDeficitBased
        Manager RadiationWindFactor: same as Sensitivity.Pukekohe.Site2.RadiationWindFactor
        RectangularZone Row: Length=100; Width=1; CanopyType=TreeRow; Slope=0; AspectAngle=0; Altitude=50
          Report RowZoneReport: EventNames=[Clock].DoReport
          Report KiwiReport: same as Sensitivity.Pukekohe.Site2.Row.KiwiReport
          SurfaceOrganicMatter: InitialResidueName=wheat_stubble; InitialResidueType=wheat; InitialResidueMass=500; InitialStandingFraction=0; InitialCPR=0; InitialCNR=100
          Fertiliser
          Irrigation
          Manager MulchResidues: same as Sensitivity.Pukekohe.Site2.Row.MulchResidues
          Plant STRUM
          StrumTreeInstance KiwiFruit: TreeType=Deciduous; RowSpacing=3.6; InterRowSpacing=3; AlleyZoneWidthFrac=0.1; BudBreakDate=19-Sep; StartFullCanopyDate=15-Dec; StartLeafFallDate=18-May; EndLeafFallDate=21-Jun; DBHatMaturity=5; TypicalCanopyArea=22; WoodBulkDensity=450; WoodStorageFraction=0.2; MaximumLeafBiomass=150; MaximumRootBiomass=200; AgeAtSimulationStart=6; YearsToMaxDimension=6; CrownShape=1; MatureCanopyBaseHeight=1.8; MaturePrunedCanopyBaseHeight=1.8; MatureHeight=2.4; MaturePrunedHeight=2.4; MatureWidth=3.4; MaturePrunedWidth=3.4; SummerPruneDates=[15-Jul]; FRemoveSummerPrune=0.25; RootNConc=0.01; LeafNConc=0.02; WoodNConc=0.005; FruitNConc=0.02; NFixationFrac=0; GRINZ=true; MaxRD=1.2; ExtinctCoeff=0.8; BaseCover=0; MaxCover=0.95; RUE=2; PSBaseT=10; PSLOptT=20; PSUOptT=25; PSMaxT=35; GSMax=0.011; R50=125; SurfaceKL=0.1; WaterStress=true; Number=60; PotentialFWPerFruit=140; DMC=0.17; FruitDensity=1.02; DateMaxBloom=7-Nov; DAFStartLinearGrowth=90; DAFEndLinearGrowth=180; DAFMaxSize=200
          Soil Katikati: SoilType=Typic Orthic Allophanic Soils; LocalName=Otorohanga_28a1; Latitude=-41; Longitude=174
            DataSource=Profile descriptions provided by Smap based on the work done by Trevor Webb.
            Memo Katikati_silt_loam
              Soil data did not came from 'official'  smap. Values were adapted from factsheet...
            Chemical: Thickness=[175, 125, 250, 1450]; PH=[7, 7, 7, 7]; PHUnits=Water
            Physical
              Thickness  ParticleSizeSand  ParticleSizeSilt  ParticleSizeClay  Rocks  BD    AirDry  LL15   DUL    SAT    KS
              100        38.6              43.4              18                0      0.79  0.066   0.199  0.436  0.697  540
              100        46                41                13                0      0.79  0.179   0.199  0.436  0.697  540
              100        47.1              43.9              9                 0      0.75  0.171   0.171  0.409  0.713  540
              200        35.1              36.9              28                0      0.68  0.216   0.216  0.421  0.739  86
              200        34.1              46.9              19                0      0.76  0.328   0.328  0.501  0.708  86
              200        16.6              56.4              27                0      0.8   0.41    0.41   0.567  0.691  86
              300        16.6              56.4              27                0      0.8   0.41    0.41   0.567  0.691  86
              300        16.6              56.4              27                0      0.8   0.41    0.41   0.567  0.691  86
              300        16.6              56.4              27                0      0.8   0.41    0.41   0.567  0.691  86
              200        16.6              56.4              27                0      0.8   0.41    0.41   0.567  0.691  86
              SoilCrop STRUMSoil
                LL=[0.199, 0.199, 0.171, 0.216, 0.328, 0.41, 0.41, 0.41, 0.41, 0.41]
                KL=[0.115, 0.097, 0.065, 0.029, 0.013, 0.006, 0, 0, 0, 0]
                XF=[1, 1, 1, 1, 1, 1, 1, 1, 1, 1]
            WaterBalance SoilWater: SummerDate=1-oct; SummerU=9; SummerCona=4.4; WinterDate=1-apr; WinterU=4; WinterCona=2; DiffusConst=88; DiffusSlope=35; Salb=0.13; CN2Bare=83; CNRed=29; CNCov=0.8; DischargeWidth=0; CatchmentArea=0; PSIDul=-100
              Thickness  SWCON  KLAT
              100        0.326  0
              100        0.326  0
              100        0.317  0
              200        0.097  0
              200        0.129  0
              200        0.171  0
              300        0.134  0
              300        0.134  0
              300        0.134  0
              200        0.171  0
            Organic: FOMCNRatio=40; CarbonUnits=Total
              Thickness  Carbon    SoilCNRatio  FBiom      FInert    FOM
              50         10        10.77        0.0788566  0.575     124.07
              50         10        10.77        0.0610103  0.575     115.105
              50         10        12.98        0.0477893  0.613573  106.788
              50         8.22356   12.98        0.037995   0.662199  99.0722
              50         5.57835   11.48        0.0307392  0.709226  91.9135
              50         3.80522   11.48        0.025364   0.749972  85.2722
              50         2.61665   9.47         0.0213819  0.785433  79.1107
              50         1.81993   9.47         0.0184319  0.816456  73.3945
              50         1.28587   9.47         0.0162465  0.843742  68.0912
              50         0.927881  9.47         0.0146275  0.867834  63.1712
              250        0.419234  8.5          0.0118814  0.923972  43.4169
              250        0.22967   9.29         0.0104198  0.978156  29.84
              500        0.201477  9.29         0.0100442  0.990841  14.0954
              500        0.200027  9.29         0.0100022  0.996255  6.6582
            Water: Thickness=[100, 100, 100, 200, 200, 200, 300, 300, 300, 200]; FilledFromTop=false
              InitialValues=[0.436, 0.436, 0.409, 0.421, 0.501, 0.567, 0.567, 0.567, 0.567, 0.567]
            LayerStructure: Thickness=[175, 125, 250, 362.5, 362.5, 362.5, 362.5]
            Solute NO3: Thickness=[175, 125, 250, 1450]; InitialValues=[8.34431, 8.57014, 0.0842744, 0.0798148]; InitialValuesUnits=ppm; WaterTableConcentration=0; D0=0; DepthConstant=0; MaxDepthSoluteAccessible=0; RunoffEffectivenessAtMovingSolute=0; MaxEffectiveRunoff=0
            Solute NH4: Thickness=[175, 125, 250, 1450]; InitialValues=[1.25165, 1.28552, 0.0126412, 0.0119722]; InitialValuesUnits=ppm; WaterTableConcentration=0; D0=0; DepthConstant=0; MaxDepthSoluteAccessible=0; RunoffEffectivenessAtMovingSolute=0; MaxEffectiveRunoff=0
            Solute Urea: Thickness=[175, 125, 250, 1450]; InitialValues=[0, 0, 0, 0]; InitialValuesUnits=kg/ha; WaterTableConcentration=0; D0=0; DepthConstant=0; MaxDepthSoluteAccessible=0; RunoffEffectivenessAtMovingSolute=0; MaxEffectiveRunoff=0
            Nutrient
            SoilTemperature Temperature: InteractionsPerDay=8
            OutputLayers: Thickness=[400, 400, 400, 400, 200, 200]
        Manager ResetDate: same as Replacements.ResetDate
    Experiment Pukehina
      Factors: same as Sensitivity.Pukekohe.Factors
      Simulation Site4
        Clock: Start=1994-06-21; End=2020-12-01
        Summary SummaryFile
        Weather: FileName=VCSN/Pukehina_30005_Pukehina.met
        MicroClimate: a_interception=0; b_interception=1; c_interception=0; d_interception=0; SoilHeatFluxFraction=0.4; MinimumHeightDiffForNewLayer=0; NightInterceptionFraction=0.5; ReferenceHeight=2
        SoilArbitrator Soil Arbitrator
        Manager AutomaticFertiliser: same as Sensitivity.Pukekohe.Site2.AutomaticFertiliser
        Manager RadiationWindFactor: same as Sensitivity.Pukekohe.Site2.RadiationWindFactor
        RectangularZone Row: Length=100; Width=1; CanopyType=TreeRow; Slope=0; AspectAngle=0; Altitude=50
          Report RowZoneReport: EventNames=[Clock].DoReport
          Report KiwiReport: same as Sensitivity.Pukekohe.Site2.Row.KiwiReport
          SurfaceOrganicMatter: InitialResidueName=wheat_stubble; InitialResidueType=wheat; InitialResidueMass=500; InitialStandingFraction=0; InitialCPR=0; InitialCNR=100
          Fertiliser
          Irrigation
          Manager MulchResidues: same as Sensitivity.Pukekohe.Site2.Row.MulchResidues
          Plant STRUM
          StrumTreeInstance KiwiFruit: same as Sensitivity.Pukekohe.Site2.Row.KiwiFruit
          Soil: SoilType=Typic Orthic Pumice Soils; Latitude=-41; Longitude=174
            DataSource=Based on profile descriptions provided by Smap (Turangi_8a1)
            Memo Turangi_8a1_Soil
              *	Modified using NSD properties provided by SG for OHINEPANEA LOAMY SAND Drainage: Somewhat excessive
            Chemical: PHUnits=Water
              Thickness  PH  CEC
              150        7   12.915
              125        7   9.26612
              100        7   4.38429
              300        7   3.29409
              1325       7   1.88826
            Physical
              Thickness  ParticleSizeSand  ParticleSizeSilt  ParticleSizeClay  Rocks  BD    AirDry  LL15   DUL    SAT    KS
              200        70.7              25.4              3.9               0      1.11  0.03    0.09   0.309  0.575  1410
              200        66.7              30.1              3.2               0      1.15  0.043   0.048  0.281  0.56   2870
              100        78.6              20.4              1                 0      1.05  0.038   0.038  0.2    0.598  2870
              300        54.9              32.5              12.6              0      0.87  0.159   0.159  0.37   0.667  540
              400        62                28.6              9.4               0      0.98  0.136   0.136  0.299  0.625  1410
              400        62                28.6              9.4               0      0.98  0.136   0.136  0.299  0.625  1410
              200        62                28.6              9.4               0      0.98  0.136   0.136  0.299  0.625  1410
              200        62                28.6              9.4               0      0.98  0.136   0.136  0.299  0.625  1410
              SoilCrop STRUMSoil: LL=[0.09, 0.048, 0.038, 0.159, 0.136, 0.136, 0.136, 0.136]; KL=[0.14, 0.102, 0.079, 0.05, 0.024, 0.011, 0.004, 0.001]; XF=[1, 1, 1, 1, 1, 1, 1, 1]
            WaterBalance SoilWater: SummerDate=1-oct; SummerU=9; SummerCona=4.4; WinterDate=1-apr; WinterU=4; WinterCona=2; DiffusConst=88; DiffusSlope=35; Salb=0.13; CN2Bare=77; CNRed=37; CNCov=0.8; DischargeWidth=0; CatchmentArea=0; PSIDul=-100
              Thickness  SWCON  KLAT
              200        0.331  0
              200        0.37   0
              100        0.435  0
              300        0.213  0
              400        0.266  0
              400        0.266  0
              200        0.333  0
              200        0.333  0
            Organic: FOMCNRatio=40; CarbonUnits=Total
              Thickness  Carbon    SoilCNRatio  FBiom      FInert    FOM
              50         6         11.85        0.0788566  0.431898  124.07
              50         6         11.85        0.0610103  0.491926  115.105
              50         6         11.85        0.0477893  0.542739  106.788
              50         4.94864   11.85        0.037995   0.5956    99.0722
              50         3.38311   12           0.0307392  0.650815  91.9135
              50         2.3337    12           0.025364   0.69947   85.2722
              50         1.63026   12           0.0213819  0.742644  79.1107
              50         1.15873   12           0.0184319  0.781204  73.3945
              50         0.842658  10           0.0162465  0.815767  68.0912
              50         0.630787  10           0.0146275  0.846679  63.1712
              250        0.32975   6.36         0.0118814  0.917701  43.4169
              250        0.21756   12.5         0.0104198  0.97694   29.84
              500        0.200874  12.5         0.0100442  0.990833  14.0954
              500        0.200016  12.5         0.0100022  0.996255  6.6582
            Water: Thickness=[200, 200, 100, 300, 400, 400, 200, 200]; InitialValues=[0.309, 0.281, 0.2, 0.37, 0.299, 0.299, 0.299, 0.299]; FilledFromTop=false
            Solute NO3: Thickness=[150, 125, 100, 300, 1325]; InitialValues=[5.60968, 5.52647, 1.41149, 0.0491014, 0.049724]; InitialValuesUnits=ppm; WaterTableConcentration=0; D0=0; DepthConstant=0; MaxDepthSoluteAccessible=0; RunoffEffectivenessAtMovingSolute=0; MaxEffectiveRunoff=0
            Solute NH4: Thickness=[150, 125, 100, 300, 1325]; InitialValues=[0.841453, 0.82897, 0.211724, 0.00736522, 0.0074586]; InitialValuesUnits=ppm; WaterTableConcentration=0; D0=0; DepthConstant=0; MaxDepthSoluteAccessible=0; RunoffEffectivenessAtMovingSolute=0; MaxEffectiveRunoff=0
            Solute Urea: Thickness=[150, 125, 100, 300, 1325]; InitialValues=[0, 0, 0, 0, 0]; InitialValuesUnits=kg/ha; WaterTableConcentration=0; D0=0; DepthConstant=0; MaxDepthSoluteAccessible=0; RunoffEffectivenessAtMovingSolute=0; MaxEffectiveRunoff=0
            Nutrient
            SoilTemperature Temperature: InteractionsPerDay=8
            OutputLayers: Thickness=[400, 400, 400, 400, 200, 200]
        Manager AutoIrrigationDeficitBased: same as Sensitivity.Pukekohe.Site2.AutoIrrigationDeficitBased
        Manager ResetDate: same as Replacements.ResetDate
    Experiment TePuke
      Factors: same as Sensitivity.Katikati.Factors
      Simulation Site5
        Clock: Start=1994-06-21; End=2020-12-01
        Summary SummaryFile
        Weather: FileName=VCSN/TePuke29966_Bayly_Rd.met
        MicroClimate: a_interception=0; b_interception=1; c_interception=0; d_interception=0; SoilHeatFluxFraction=0.4; MinimumHeightDiffForNewLayer=0; NightInterceptionFraction=0.5; ReferenceHeight=2
        SoilArbitrator Soil Arbitrator
        Manager AutomaticFertiliser: same as Sensitivity.Pukekohe.Site2.AutomaticFertiliser
        Manager RadiationWindFactor: same as Sensitivity.Pukekohe.Site2.RadiationWindFactor
        RectangularZone Row: Length=100; Width=1; CanopyType=TreeRow; Slope=0; AspectAngle=0; Altitude=50
          Report RowZoneReport: EventNames=[Clock].DoReport
          Report KiwiReport: same as Sensitivity.Pukekohe.Site2.Row.KiwiReport
          SurfaceOrganicMatter: InitialResidueName=wheat_stubble; InitialResidueType=wheat; InitialResidueMass=500; InitialStandingFraction=0; InitialCPR=0; InitialCNR=100
          Fertiliser
          Irrigation
          Manager MulchResidues: same as Sensitivity.Pukekohe.Site2.Row.MulchResidues
          Plant STRUM
          StrumTreeInstance KiwiFruit: TreeType=Deciduous; RowSpacing=3.6; InterRowSpacing=3; AlleyZoneWidthFrac=0.1; BudBreakDate=1-Oct; StartFullCanopyDate=1-Dec; StartLeafFallDate=18-May; EndLeafFallDate=21-Jun; DBHatMaturity=5; TypicalCanopyArea=22; WoodBulkDensity=450; WoodStorageFraction=0.2; MaximumLeafBiomass=150; MaximumRootBiomass=200; AgeAtSimulationStart=6; YearsToMaxDimension=6; CrownShape=1; MatureCanopyBaseHeight=1.8; MaturePrunedCanopyBaseHeight=1.8; MatureHeight=2.4; MaturePrunedHeight=2.4; MatureWidth=3.4; MaturePrunedWidth=3.4; SummerPruneDates=[15-Jul]; FRemoveSummerPrune=0.25; RootNConc=0.01; LeafNConc=0.02; WoodNConc=0.005; FruitNConc=0.02; NFixationFrac=0; GRINZ=true; MaxRD=1.2; ExtinctCoeff=0.8; BaseCover=0; MaxCover=0.95; RUE=2; PSBaseT=10; PSLOptT=20; PSUOptT=25; PSMaxT=35; GSMax=0.011; R50=125; SurfaceKL=0.1; WaterStress=true; Number=60; PotentialFWPerFruit=110; DMC=0.17; FruitDensity=1.02; DateMaxBloom=7-Nov; DAFStartLinearGrowth=90; DAFEndLinearGrowth=180; DAFMaxSize=200
          Soil Ngakura_2a1_NSD: SoilType=Typic Orthic Allophanic Soils; LocalName=Ngakura_2a1; Latitude=-41; Longitude=174
            DataSource=Profile descriptions provided by Smap based on the work done by Trevor Webb.
            Memo ReadMe
              *	Generated from info provided by Steve G for TePuke_Ngakura_2a.1
            Physical
              Thickness  ParticleSizeSand  ParticleSizeSilt  ParticleSizeClay  Rocks  BD     AirDry  LL15   DUL    SAT    KS
              200        69.5              22                8.5               0      0.744  0.066   0.198  0.305  0.648  540
              200        56                31                13                0      0.589  0.23    0.253  0.343  0.622  540
              200        56                31                13                27.5   0.589  0.253   0.253  0.343  0.503  540
              100        56                31                13                27.5   0.589  0.253   0.253  0.343  0.503  86
              200        56                31                13                27.5   0.589  0.253   0.253  0.343  0.503  86
              300        51.5              32                16.5              5      0.802  0.276   0.276  0.381  0.647  86
              300        51.5              32                16.5              5      0.802  0.276   0.276  0.381  0.647  86
              300        51.5              32                16.5              5      0.802  0.276   0.276  0.381  0.647  86
              200        51.5              32                16.5              5      0.802  0.276   0.276  0.381  0.647  86
              SoilCrop STRUMSoil
                LL=[0.198, 0.253, 0.253, 0.253, 0.253, 0.276, 0.276, 0.276, 0.276]
                KL=[0.112, 0.061, 0.028, 0.013, 0.013, 0.006, 0, 0, 0]
                XF=[1, 1, 1, 1, 1, 1, 1, 1, 1, -]
            WaterBalance SoilWater: SummerDate=1-oct; SummerU=9; SummerCona=4.4; WinterDate=1-apr; WinterU=4; WinterCona=2; DiffusConst=88; DiffusSlope=35; Salb=0.13; CN2Bare=77; CNRed=37; CNCov=0.8; DischargeWidth=0; CatchmentArea=0; PSIDul=-100
              Thickness  SWCON  KLAT
              200        0.265  0
              200        0.287  0
              200        0.287  0
              100        0.18   0
              200        0.112  0
              300        0.094  0
              300        0.094  0
              300        0.094  0
              200        0.126  0
            Organic: FOMCNRatio=40; CarbonUnits=Total
              Thickness  Carbon    SoilCNRatio  FBiom      FInert    FOM
              50         10        13.1         0.0788566  0.575     124.07
              50         10        13.1         0.0610103  0.575     115.105
              50         10        13.1         0.0477893  0.613573  106.788
              50         8.22356   13.1         0.037995   0.662199  99.0722
              50         5.57835   12           0.0307392  0.709226  91.9135
              50         3.80522   12           0.025364   0.749972  85.2722
              50         2.61665   12           0.0213819  0.785433  79.1107
              50         1.81993   12           0.0184319  0.816456  73.3945
              50         1.28587   11.1         0.0162465  0.843742  68.0912
              50         0.927881  11.1         0.0146275  0.867834  63.1712
              250        0.419234  11.1         0.0118814  0.923972  43.4169
              250        0.22967   13           0.0104198  0.978156  29.84
              500        0.201477  13           0.0100442  0.990841  14.0954
              500        0.200027  13           0.0100022  0.996255  6.6582
            Chemical: PHUnits=Water
              Thickness  PH  CEC
              200        7   28.4268
              725        7   10.161
              1075       7   8.31223
              CEC source: Calculated
            Nutrient
            SoilTemperature Temperature: InteractionsPerDay=8
            Water: Thickness=[200, 200, 200, 100, 200, 300, 300, 300, 200]; FilledFromTop=false
              InitialValues=[0.305, 0.343, 0.343, 0.343, 0.343, 0.381, 0.381, 0.381, 0.381]
            Solute NO3: Thickness=[200, 725, 1075]; InitialValues=[8.51254, 1.56922, 0.0734322]; InitialValuesUnits=ppm; WaterTableConcentration=0; D0=0; DepthConstant=0; MaxDepthSoluteAccessible=0; RunoffEffectivenessAtMovingSolute=0; MaxEffectiveRunoff=0
            Solute NH4: Thickness=[200, 725, 1075]; InitialValues=[1.27688, 0.235384, 0.0110195]; InitialValuesUnits=ppm; WaterTableConcentration=0; D0=0; DepthConstant=0; MaxDepthSoluteAccessible=0; RunoffEffectivenessAtMovingSolute=0; MaxEffectiveRunoff=0
            Solute Urea: Thickness=[200, 725, 1075]; InitialValues=[0, 0, 0]; InitialValuesUnits=kg/ha; WaterTableConcentration=0; D0=0; DepthConstant=0; MaxDepthSoluteAccessible=0; RunoffEffectivenessAtMovingSolute=0; MaxEffectiveRunoff=0
            OutputLayers: Thickness=[400, 400, 400, 400, 200, 200]
        Manager AutoIrrigationDeficitBased: same as Sensitivity.Pukekohe.Site2.AutoIrrigationDeficitBased
        Manager ResetDate: same as Replacements.ResetDate
    Experiment Whakatane
      Factors: same as Sensitivity.Katikati.Factors
      Simulation Site6
        Clock: Start=1994-06-21; End=2020-12-01
        Summary SummaryFile
        Weather: FileName=VCSN/Whakatane31120_Opotiki.met
        MicroClimate: a_interception=0; b_interception=1; c_interception=0; d_interception=0; SoilHeatFluxFraction=0.4; MinimumHeightDiffForNewLayer=0; NightInterceptionFraction=0.5; ReferenceHeight=2
        SoilArbitrator Soil Arbitrator
        Manager AutomaticFertiliser: same as Sensitivity.Pukekohe.Site2.AutomaticFertiliser
        Manager RadiationWindFactor: same as Sensitivity.Pukekohe.Site2.RadiationWindFactor
        RectangularZone Row: Length=100; Width=1; CanopyType=TreeRow; Slope=0; AspectAngle=0; Altitude=50
          Report RowZoneReport: EventNames=[Clock].DoReport
          Report KiwiReport: same as Sensitivity.Pukekohe.Site2.Row.KiwiReport
          SurfaceOrganicMatter: InitialResidueName=wheat_stubble; InitialResidueType=wheat; InitialResidueMass=500; InitialStandingFraction=0; InitialCPR=0; InitialCNR=100
          Fertiliser
          Irrigation
          Manager MulchResidues: same as Sensitivity.Pukekohe.Site2.Row.MulchResidues
          Plant STRUM
          StrumTreeInstance KiwiFruit: TreeType=Deciduous; RowSpacing=3.6; InterRowSpacing=3; AlleyZoneWidthFrac=0.1; BudBreakDate=19-Sep; StartFullCanopyDate=15-Dec; StartLeafFallDate=18-May; EndLeafFallDate=21-Jun; DBHatMaturity=5; TypicalCanopyArea=22; WoodBulkDensity=450; WoodStorageFraction=0.2; MaximumLeafBiomass=150; MaximumRootBiomass=200; AgeAtSimulationStart=6; YearsToMaxDimension=6; CrownShape=1; MatureCanopyBaseHeight=1.8; MaturePrunedCanopyBaseHeight=1.8; MatureHeight=2.4; MaturePrunedHeight=2.4; MatureWidth=3.4; MaturePrunedWidth=3.4; SummerPruneDates=[15-Jul]; FRemoveSummerPrune=0.25; RootNConc=0.01; LeafNConc=0.02; WoodNConc=0.005; FruitNConc=0.02; NFixationFrac=0; GRINZ=true; MaxRD=1.2; ExtinctCoeff=0.8; BaseCover=0; MaxCover=0.95; RUE=2; PSBaseT=10; PSLOptT=20; PSUOptT=25; PSMaxT=35; GSMax=0.011; R50=125; SurfaceKL=0.1; WaterStress=true; Number=78; PotentialFWPerFruit=140; DMC=0.17; FruitDensity=1.02; DateMaxBloom=7-Nov; DAFStartLinearGrowth=90; DAFEndLinearGrowth=180; DAFMaxSize=200
          Soil Opotiki_1a1: SoilType=Allophanic Orthic Pumice Soils; Latitude=-41; Longitude=174
            DataSource=Based on profile descriptions provided by Smap (Opotiki_1a1)
            Memo Opotiki_1a1_Soil
              *	Modified using Opotiki sandy loam (NSD) -
            Chemical: PHUnits=Water
              Thickness  PH  CEC
              210        7   15.39
              220        7   7.86369
              275        7   4.0213
              1295       7   4.49567
            Physical
              Thickness  ParticleSizeSand  ParticleSizeSilt  ParticleSizeClay  Rocks  BD    AirDry  LL15   DUL    SAT    KS
              200        47.8              39                13.2              0      0.9   0.06    0.18   0.407  0.656  540
              300        50.1              33.1              16.8              0      0.93  0.178   0.198  0.376  0.644  1410
              200        50.1              33.1              16.8              0      0.93  0.198   0.198  0.376  0.644  1410
              200        40.8              33.2              26                0      0.82  0.315   0.315  0.492  0.687  86
              300        40.8              33.2              26                0      0.82  0.315   0.315  0.492  0.687  86
              400        40.8              33.2              26                0      0.82  0.315   0.315  0.492  0.687  86
              400        40.8              33.2              26                0      0.82  0.315   0.315  0.492  0.687  86
              SoilCrop STRUMSoil: LL=[0.18, 0.198, 0.198, 0.315, 0.315, 0.315, 0.315]; KL=[0.112, 0.068, 0.045, 0.023, 0.011, 0.004, 0]; XF=[1, 1, 1, 1, 1, 1, 1]
            WaterBalance SoilWater: SummerDate=1-oct; SummerU=9; SummerCona=4.4; WinterDate=1-apr; WinterU=4; WinterCona=2; DiffusConst=88; DiffusSlope=35; Salb=0.13; CN2Bare=77; CNRed=37; CNCov=0.8; DischargeWidth=0; CatchmentArea=0; PSIDul=-100
              Thickness  SWCON  KLAT
              200        0.263  0
              300        0.301  0
              200        0.339  0
              200        0.133  0
              300        0.101  0
              400        0.082  0
              400        0.082  0
            Organic: FOMCNRatio=40; CarbonUnits=Total
              Thickness  Carbon    SoilCNRatio  FBiom      FInert    FOM
              50         6         12.44        0.0788566  0.431898  124.07
              50         6         12.44        0.0610103  0.491926  115.105
              50         6         12.44        0.0477893  0.542739  106.788
              50         4.94864   12.44        0.037995   0.5956    99.0722
              50         3.38311   16           0.0307392  0.650815  91.9135
              50         2.3337    16           0.025364   0.69947   85.2722
              50         1.63026   16           0.0213819  0.742644  79.1107
              50         1.15873   16           0.0184319  0.781204  73.3945
              50         0.842658  16           0.0162465  0.815767  68.0912
              50         0.630787  16           0.0146275  0.846679  63.1712
              250        0.32975   16           0.0118814  0.917701  43.4169
              250        0.21756   12.5         0.0104198  0.97694   29.84
              500        0.200874  12.5         0.0100442  0.990833  14.0954
              500        0.200016  12.5         0.0100022  0.996255  6.6582
            Water: Thickness=[200, 300, 200, 200, 300, 400, 400]; InitialValues=[0.3843, 0.3582, 0.3582, 0.4743, 0.4743, 0.4743, 0.4743]; FilledFromTop=false
            Solute NO3: Thickness=[210, 220, 275, 1295]; InitialValues=[7.24638, 2.60225, 0.0573329, 0.0558628]; InitialValuesUnits=ppm; WaterTableConcentration=0; D0=0; DepthConstant=0; MaxDepthSoluteAccessible=0; RunoffEffectivenessAtMovingSolute=0; MaxEffectiveRunoff=0
            Solute NH4: Thickness=[210, 220, 275, 1295]; InitialValues=[1.087, 0.39, 0.009, 0.008]; InitialValuesUnits=ppm; WaterTableConcentration=0; D0=0; DepthConstant=0; MaxDepthSoluteAccessible=0; RunoffEffectivenessAtMovingSolute=0; MaxEffectiveRunoff=0
            Solute Urea: Thickness=[210, 220, 275, 1295]; InitialValues=[0, 0, 0, 0]; InitialValuesUnits=kg/ha; WaterTableConcentration=0; D0=0; DepthConstant=0; MaxDepthSoluteAccessible=0; RunoffEffectivenessAtMovingSolute=0; MaxEffectiveRunoff=0
            Nutrient
            SoilTemperature Temperature: InteractionsPerDay=8
            Memo ReadOrchardConfiguration
              1.   Sheltered - **ALL**

              2.   Netted - **LIN/Paengaroa, Pukehina, Waiuku**

              3.   Irrigated - **LIN/Paengaroa, OPK/Opotiki, OCR/Pukehina, Katikati, Pukehina, Waiuku**
            OutputLayers: Thickness=[400, 400, 400, 400, 200, 200]
        Manager AutoIrrigationDeficitBased: same as Sensitivity.Pukekohe.Site2.AutoIrrigationDeficitBased
        Manager ResetDate: same as Replacements.ResetDate
    Experiment Gisborne
      Factors: same as Sensitivity.Katikati.Factors
      Simulation Site7
        Clock: Start=1994-06-21; End=2020-12-01
        Summary SummaryFile
        Weather: FileName=VCSN/Gisborne_30639_Whaerengaahika.met
        MicroClimate: a_interception=0; b_interception=1; c_interception=0; d_interception=0; SoilHeatFluxFraction=0.4; MinimumHeightDiffForNewLayer=0; NightInterceptionFraction=0.5; ReferenceHeight=2
        SoilArbitrator Soil Arbitrator
        Manager AutoIrrigationDeficitBased: same as Sensitivity.Pukekohe.Site2.AutoIrrigationDeficitBased
        Manager AutomaticFertiliser: same as Sensitivity.Pukekohe.Site2.AutomaticFertiliser
        Manager RadiationWindFactor: same as Sensitivity.Pukekohe.Site2.RadiationWindFactor
        RectangularZone Row: Length=100; Width=1; CanopyType=TreeRow; Slope=0; AspectAngle=0; Altitude=50
          Report RowZoneReport: EventNames=[Clock].DoReport
          Report KiwiReport: EventNames=[Clock].DoReport
            VariableNames:
              [Clock].Today
              [ResetDate].Script.SimulationYear as SimYear
              [Row].STRUM.AccumulatedWaterStress
              //[Row].STRUM.Arbitrator.DemandRatio
              [Row].Area
              [Row].STRUM.BaseHeight
              [Row].STRUM.Fruit.FreshYield_kgPerHa
              [Row].STRUM.CanopyArea
              [Row].STRUM.RootUptakesArbitrator.WaterDemand.Amount
              [Row].STRUM.RootUptakesArbitrator.WaterDemand.mm
              [Row].STRUM.RootUptakesArbitrator.NitrogenDemand.Amount
              [Row].STRUM.Root.Network.WtByLayerZone1
              [Row].STRUM.Root.Network.WtByLayerZone2
              [Row].STRUM.Arbitrator.Carbon.TotalPlantDemand
              [Row].STRUM.Arbitrator.Carbon.TotalPlantSupply
              [Row].STRUM.Arbitrator.Carbon.TotalPlantDemandsAllocated
              [Row].STRUM.Arbitrator.Fn
              [Row].STRUM.Arbitrator.Nitrogen.TotalPlantDemand
              [Row].STRUM.Arbitrator.Nitrogen.TotalPlantSupply
              [Row].STRUM.Arbitrator.Nitrogen.TotalPlantDemandsAllocated
              [Row].STRUM.Fruit.TotalCarbonDemand.RelativeFruitMass.Delta.Integral
              [Row].STRUM.Fruit.Allocated.Carbon.Total
              [Row].STRUM.Fruit.Allocated.Nitrogen.Total
              [Row].STRUM.Fruit.Carbon.Demands.Structural
              [Row].STRUM.Fruit.Carbon.Demands.Total
              [Row].STRUM.Fruit.DMC
              [Row].STRUM.Fruit.FreshWtPerFruit
              [Row].STRUM.Fruit.NextYearsFruitingBudSurvival
              [Row].STRUM.Fruit.Number.BudsSurvivalFromLastYear
              [Row].STRUM.Fruit.N
              [Row].STRUM.Fruit.Nitrogen.Demands.Total
              [Row].STRUM.Fruit.Number
              [Row].STRUM.Fruit.Diameter
              [Row].STRUM.Fruit.VolumePerFruit
              [Row].STRUM.Fruit.Wt
              [Row].STRUM.Fruit.PotentialDWPerFruit
              [Row].STRUM.Fruit.TotalCarbonDemand.RelativeFruitMass
              [Row].STRUM.Fruit.TotalCarbonDemand.CarbonConc
              [Row].STRUM.Height
              [Row].STRUM.Height.PrunedCanopyBaseHeight
              [Row].STRUM.Height.PrunedCanopyBaseHeight  + [Row].STRUM.Height.PrunedCanopyDepth
              [Row].STRUM.Height.PrunedCanopyBaseHeight  + [Row].STRUM.Height.PrunedCanopyDepth + [Row].STRUM.Height.SeasonalDepthGrowth
              [Row].STRUM.Leaf.Allocated.Carbon.Total
              [Row].STRUM.Leaf.Allocated.Nitrogen.Total
              [Row].STRUM.Leaf.Canopy.CoverGreen
              [Row].STRUM.Leaf.Canopy.Deepness
              [Row].STRUM.Leaf.Dead.Wt
              [Row].STRUM.Leaf.Carbon.Demands.Structural
              [Row].STRUM.Leaf.Carbon.Demands.Total
              [Row].STRUM.Leaf.Fn
              [Row].STRUM.Leaf.Canopy.Fw
              [Row].STRUM.Leaf.Canopy.LAI
              [Row].STRUM.Leaf.Live.Wt
              [Row].STRUM.Leaf.N
              [Row].STRUM.Leaf.Nitrogen.Demands.Total
              [Row].STRUM.Leaf.Canopy.PotentialEP
              [Row].STRUM.Leaf.Canopy.RadiationIntercepted
              [Row].STRUM.Leaf.Senesced.Weight.Structural
              [Row].STRUM.Leaf.SenescenceRate
              [Row].STRUM.Leaf.Canopy.Transpiration
              [Row].STRUM.Leaf.Canopy.WaterDemand
              [Row].STRUM.Leaf.Canopy.WaterAllocation
              [Row].STRUM.Leaf.Canopy.Width
              [Row].STRUM.Leaf.Canopy.GreenExtinctionCoefficient
              [Row].STRUM.Leaf.Wt
              [Row].STRUM.Phenology.Age.YearDecimal
              [Row].STRUM.Phenology.Age.Years
              [Row].STRUM.Phenology.CurrentStageName
              [Row].STRUM.Phenology.DaysSinceFlowering
              [Row].STRUM.Phenology.Stage
              [Row].STRUM.RelativeSeasonalDimension
              [Row].STRUM.RelativeAnnualDimension
              [Row].STRUM.Root.Allocated.Carbon.Total
              [Row].STRUM.Root.Allocated.Nitrogen.Total
              [Row].STRUM.Root.Network.Depth
              [Row].STRUM.Root.Carbon.Demands.Structural
              [Row].STRUM.Root.Carbon.Demands.Total
              [Row].STRUM.Root.N
              [Row].STRUM.Root.Nitrogen.Demands.Total
              [Row].STRUM.RootUptakesArbitrator.WaterUptake.AmountByZone
              [Row].STRUM.RootUptakesArbitrator.WaterUptake.Mm
              [Row].STRUM.RootUptakesArbitrator.WaterUptake.Amount
              [Row].STRUM.RootUptakesArbitrator.NitrogenUptake.AmountByZone
              [Row].STRUM.RootUptakesArbitrator.NitrogenUptake.Gpm2
              [Row].STRUM.RootUptakesArbitrator.NitrogenUptake.Amount
              [Row].STRUM.RootUptakesArbitrator.WaterSupply.AmountByZone
              [Row].STRUM.RootUptakesArbitrator.WaterSupply.Mm
              [Row].STRUM.RootUptakesArbitrator.WaterSupply.Amount
              [Row].STRUM.RootUptakesArbitrator.NitrogenSupply.AmountByZone
              [Row].STRUM.RootUptakesArbitrator.NitrogenSupply.Gpm2
              [Row].STRUM.RootUptakesArbitrator.NitrogenSupply.Amount
              [Row].STRUM.Root.Wt
              [Row].STRUM.TranspirationPerTree
              [Row].STRUM.Wood.Allocated.Carbon.Total
              [Row].STRUM.Wood.Allocated.Nitrogen.Total
              [Row].STRUM.Wood.Carbon.Demands.Structural
              [Row].STRUM.Wood.Carbon.Demands.Total
              [Row].STRUM.Wood.Carbon.Supplies.ReTranslocation
              [Row].STRUM.Wood.Live.Carbon.Structural * 1/0.4
              [Row].STRUM.Wood.Live.Carbon.Storage * 1/0.4
              [Row].STRUM.Wood.EnergyBalance.CoverTotal
              [Row].STRUM.Wood.EnergyBalance.DeadAreaIndex
              [Row].STRUM.Wood.EnergyBalance.LAIDead
              [Row].STRUM.Wood.EnergyBalance.RadiationInterceptedByDead
              [Row].STRUM.Wood.EnergyBalance.Transpiration
              [Row].STRUM.Wood.N
              [Row].STRUM.Wood.Nitrogen.Demands.Total
              [Row].STRUM.Wood.Wt
              [Row].STRUM.Width
              [Row].STRUM.Width.PrunedWidth
              [Row].STRUM.Width.PrunedWidth + [Row].STRUM.Width.SeasonalGrowth
              [Row].STRUM.TranspirationPerLeafArea
              [Row].SurfaceOrganicMatter.N
              [Row].SurfaceOrganicMatter.Wt
              [Row].Irrigation.IrrigationApplied
              [Row].Fertiliser.NitrogenApplied
              sum([Row].Soil.OutputLayers.SWmm)
              [Row].Soil.OutputLayers.SWmm
              ([Row].Soil.OutputLayers.SWmm[1] + [Row].Soil.OutputLayers.SWmm[2]+ [Row].Soil.OutputLayers.SWmm[3]) as SWmm0_120
              ([Row].Soil.OutputLayers.SWmm[1] + [Row].Soil.OutputLayers.SWmm[2]+ [Row].Soil.OutputLayers.SWmm[3] + [Row].Soil.OutputLayers.SWmm[4]) as SWmm0_160
              [Row].Soil.OutputLayers.SW
              [Row].Soil.OutputLayers.SAT
              [Row].Soil.OutputLayers.DUL
              [Row].Soil.OutputLayers.LL15
              [Row].Soil.SoilWater.Evaporation
              [Row].Soil.SoilWater.Eo
              [Row].Soil.SoilWater.Runoff
              [Weather].PanEvap
              [Weather].Radn
              [Weather].Rain
              [STRUM].Leaf.TotalCarbonDemand.TotalDMDemand.SizeDemand.SizeDemand.SizeDemand.TargetSize
          SurfaceOrganicMatter: InitialResidueName=wheat_stubble; InitialResidueType=wheat; InitialResidueMass=500; InitialStandingFraction=0; InitialCPR=0; InitialCNR=100
          Fertiliser
          Irrigation
          Manager MulchResidues: same as Sensitivity.Pukekohe.Site2.Row.MulchResidues
          Plant STRUM
          StrumTreeInstance KiwiFruit: TreeType=Deciduous; RowSpacing=3.6; InterRowSpacing=3; AlleyZoneWidthFrac=0.1; BudBreakDate=19-Sep; StartFullCanopyDate=15-Dec; StartLeafFallDate=18-May; EndLeafFallDate=21-Jun; DBHatMaturity=5; TypicalCanopyArea=22; WoodBulkDensity=450; WoodStorageFraction=0.2; MaximumLeafBiomass=150; MaximumRootBiomass=200; AgeAtSimulationStart=6; YearsToMaxDimension=6; CrownShape=1; MatureCanopyBaseHeight=1.8; MaturePrunedCanopyBaseHeight=1.8; MatureHeight=2.4; MaturePrunedHeight=2.4; MatureWidth=3.4; MaturePrunedWidth=3.4; SummerPruneDates=[15-Jul]; FRemoveSummerPrune=0.25; RootNConc=0.01; LeafNConc=0.02; WoodNConc=0.005; FruitNConc=0.02; NFixationFrac=0; GRINZ=true; MaxRD=1.2; ExtinctCoeff=0.8; BaseCover=0; MaxCover=0.95; RUE=2; PSBaseT=10; PSLOptT=20; PSUOptT=25; PSMaxT=35; GSMax=0.011; R50=125; SurfaceKL=0.1; WaterStress=true; Number=40; PotentialFWPerFruit=140; DMC=0.17; FruitDensity=1.02; DateMaxBloom=7-Nov; DAFStartLinearGrowth=90; DAFEndLinearGrowth=180; DAFMaxSize=200
          Soil Flaxton_77f1: ASCOrder=G; SoilType=Typic Orthic Gley Soils; LocalName=Flaxton_77f1; Country=New Zealand; Latitude=-41; Longitude=174
            DataSource=Profile descriptions provided by Smap based on the work done by Trevor Webb.
            Memo ReadMe
              *	Modified using NSD parameters for Kaiti silt loam provided by SG
            Physical
              Thickness  ParticleSizeSand  ParticleSizeSilt  ParticleSizeClay  Rocks  BD     AirDry  LL15   DUL    SAT    KS
              100        10                60                30                0      1.234  0.07    0.21   0.31   0.476  30
              100        10                60                30                0      1.234  0.189   0.21   0.31   0.476  30
              100        10                60                30                0      1.361  0.209   0.209  0.299  0.43   30
              100        10                60                30                0      1.361  0.209   0.209  0.299  0.43   30
              100        10                60                30                0      1.328  0.213   0.213  0.315  0.442  30
              100        10                60                30                0      1.328  0.213   0.213  0.315  0.442  30
              100        10                47.5              42.5              0      1.366  0.266   0.266  0.359  0.452  14
              300        10                47.5              42.5              0      1.366  0.266   0.266  0.359  0.452  14
              200        10                47.5              42.5              0      1.366  0.283   0.283  0.321  0.452  14
              300        10                47.5              42.5              0      1.366  0.283   0.283  0.321  0.452  14
              300        10                47.5              42.5              0      1.366  0.283   0.283  0.321  0.452  14
              200        10                47.5              42.5              0      1.366  0.283   0.283  0.321  0.452  14
              SoilCrop STRUMSoil
                LL=[0.21, 0.21, 0.209, 0.209, 0.213, 0.213, 0.266, 0.266, 0.283, 0.283, 0.283, 0.283]
                KL=[0.109, 0.109, 0.067, 0.004, 0.004, 0.004, 0.004, 0.004, 0.004, 0.004, 0.004, 0.004]
                XF=[1, 1, 1, 0.404, 0.404, 0.404, 0.404, 0.404, 0.404, 0.404, 0.404, 0.404]
            Organic: FOMCNRatio=40; CarbonUnits=Total
              Thickness  Carbon    SoilCNRatio  FBiom      FInert    FOM
              50         6         10.5         0.0788566  0.431898  231.228
              50         6         10.5         0.0610103  0.491926  224.294
              50         6         10.5         0.0477893  0.542739  180.55
              50         4.94864   10.5         0.037995   0.5956    140.612
              50         3.38311   10.5         0.0307392  0.650815  109.509
              50         2.3337    10.5         0.025364   0.69947   85.2856
              50         1.63026   10.5         0.0213819  0.742644  66.4205
              50         1.15873   10.5         0.0184319  0.781204  51.7283
              50         0.842658  10.5         0.0162465  0.815767  40.2861
              50         0.630787  10.5         0.0146275  0.846679  31.3748
              250        0.32975   10.5         0.0118814  0.917701  78.8161
              250        0.21756   10.5         0.0104198  0.97694   0
              500        0.200874  10.5         0.0100442  0.990833  0
              500        0.200016  10.5         0.0100022  0.996255  0
            Chemical: PHUnits=Water
              Thickness  PH  CEC
              225        7   21.435
              225        7   12.3992
              1550       7   15.6494
            Water: FilledFromTop=true
              Thickness=[100, 100, 100, 100, 100, 100, 100, 300, 200, 300, 300, 200]
              InitialValues=[0.31, 0.31, 0.299, 0.299, 0.315, 0.315, 0.359, 0.359, 0.321, 0.321, 0.321, 0.321]
            WaterBalance SoilWater: SummerDate=1-oct; SummerU=9; SummerCona=4.4; WinterDate=1-apr; WinterU=4; WinterCona=2; DiffusConst=88; DiffusSlope=35; Salb=0.13; CN2Bare=92; CNRed=15; CNCov=0.8; PSIDul=-100
              Thickness  SWCON  KLAT
              100        0.126  0
              100        0.126  0
              100        0.147  0
              100        0.147  0
              100        0.148  0
              100        0.148  0
              100        0.111  0
              300        0.044  0
              200        0.049  0
              300        0.033  0
              300        0.033  0
              200        0.049  0
            SoilTemperature Temperature: InteractionsPerDay=8
            Solute NO3: Thickness=[225, 225, 1550]; InitialValues=[14.25, 4.83824, 0.911765]; InitialValuesUnits=kg/ha; WaterTableConcentration=0; D0=0; DepthConstant=0; MaxDepthSoluteAccessible=0; RunoffEffectivenessAtMovingSolute=0; MaxEffectiveRunoff=0
            Solute NH4: Thickness=[225, 225, 1550]; InitialValues=[2.1375, 0.725735, 0.136765]; InitialValuesUnits=kg/ha; WaterTableConcentration=0; D0=0; DepthConstant=0; MaxDepthSoluteAccessible=0; RunoffEffectivenessAtMovingSolute=0; MaxEffectiveRunoff=0
            Solute Urea: Thickness=[225, 225, 1550]; InitialValues=[0, 0, 0]; InitialValuesUnits=ppm; WaterTableConcentration=0; D0=0; DepthConstant=0; MaxDepthSoluteAccessible=0; RunoffEffectivenessAtMovingSolute=0; MaxEffectiveRunoff=0
            Nutrient
            OutputLayers: Thickness=[400, 400, 400, 400, 400]
        Manager ResetDate: same as Replacements.ResetDate
    Experiment Whakatu
      Factors: same as Sensitivity.Pukekohe.Factors
      Simulation Site8
        Clock: Start=1994-06-21; End=2020-12-01
        Summary SummaryFile
        Weather: FileName=VCSN/Whakatu28991_RoysHill.met
        MicroClimate: a_interception=0; b_interception=1; c_interception=0; d_interception=0; SoilHeatFluxFraction=0.4; MinimumHeightDiffForNewLayer=0; NightInterceptionFraction=0.5; ReferenceHeight=2
        SoilArbitrator Soil Arbitrator
        Manager AutomaticFertiliser: same as Sensitivity.Pukekohe.Site2.AutomaticFertiliser
        Manager RadiationWindFactor: same as Sensitivity.Pukekohe.Site2.RadiationWindFactor
        RectangularZone Row: Length=100; Width=1; CanopyType=TreeRow; Slope=0; AspectAngle=0; Altitude=50
          Report RowZoneReport: EventNames=[Clock].DoReport
          Report KiwiReport: same as Sensitivity.Pukekohe.Site2.Row.KiwiReport
          SurfaceOrganicMatter: InitialResidueName=wheat_stubble; InitialResidueType=wheat; InitialResidueMass=500; InitialStandingFraction=0; InitialCPR=0; InitialCNR=100
          Fertiliser
          Irrigation
          Manager MulchResidues: same as Sensitivity.Pukekohe.Site2.Row.MulchResidues
          Plant STRUM
          StrumTreeInstance KiwiFruit: TreeType=Deciduous; RowSpacing=3.6; InterRowSpacing=3; AlleyZoneWidthFrac=0.1; BudBreakDate=19-Sep; StartFullCanopyDate=15-Dec; StartLeafFallDate=18-May; EndLeafFallDate=21-Jun; DBHatMaturity=5; TypicalCanopyArea=22; WoodBulkDensity=450; WoodStorageFraction=0.2; MaximumLeafBiomass=150; MaximumRootBiomass=200; AgeAtSimulationStart=6; YearsToMaxDimension=6; CrownShape=1; MatureCanopyBaseHeight=1.8; MaturePrunedCanopyBaseHeight=1.8; MatureHeight=2.4; MaturePrunedHeight=2.4; MatureWidth=3.4; MaturePrunedWidth=3.4; SummerPruneDates=[15-Jul]; FRemoveSummerPrune=0.25; RootNConc=0.01; LeafNConc=0.02; WoodNConc=0.005; FruitNConc=0.02; NFixationFrac=0; GRINZ=true; MaxRD=1.2; ExtinctCoeff=0.8; BaseCover=0; MaxCover=0.95; RUE=2; PSBaseT=10; PSLOptT=20; PSUOptT=25; PSMaxT=35; GSMax=0.011; R50=125; SurfaceKL=0.1; WaterStress=true; Number=35; PotentialFWPerFruit=140; DMC=0.17; FruitDensity=1.02; DateMaxBloom=7-Nov; DAFStartLinearGrowth=90; DAFEndLinearGrowth=180; DAFMaxSize=200
          Soil Ngatarawa: ASCOrder=R; SoilType=Mottled Fluvial Recent Soils; LocalName=Hinds_6a2; Country=New Zealand; Latitude=-41; Longitude=174
            DataSource=Profile descriptions provided by Smap based on the work done by Trevor Webb.
            Memo ReadMe
              *	Generated from info provided by Steve G
            Physical
              Thickness  ParticleSizeSand  ParticleSizeSilt  ParticleSizeClay  Rocks  BD     AirDry  LL15   DUL    SAT    KS
              200        32.91             46.44             20.65             0      1.465  0.079   0.238  0.405  0.437  540
              100        37.05             46.19             16.76             0      1.33   0.194   0.215  0.392  0.488  540
              100        40.05             46.47             13.48             5      1.275  0.16    0.16   0.366  0.484  540
              200        55.19             33.6              11.23             66     1.275  0.021   0.021  0.047  0.173  540
              100        70.47             21.3              8.27              66     1.21   0.023   0.023  0.05   0.182  2870
              100        68.98             14.51             16.51             66     1.57   0.02    0.02   0.043  0.135  2870
              400        76.56             10.99             12.45             66     1.26   0.027   0.027  0.05   0.175  2870
              400        76.56             10.99             12.45             66     1.26   0.027   0.027  0.05   0.175  2870
              400        76.56             10.99             12.45             66     1.26   0.027   0.027  0.05   0.175  2870
              SoilCrop STRUMSoil
                LL=[0.238, 0.215, 0.16, 0.021, 0.023, 0.02, 0.027, 0.027, 0.027]
                KL=[0.134504, 0.0157799, 0.0157799, 0.0157799, 0.0157799, 0.0157799, 0.0157799, 0.0157799, 0.0157799]
                XF=[1, 1, 1, 1, 1, 1, 1, 1, 1]
            Organic: FOMCNRatio=40; CarbonUnits=Total
              Thickness  Carbon    SoilCNRatio  FBiom      FInert    FOM
              50         3.5       10.4         0.0788566  0.30541   227.364
              50         3.5       10.4         0.0610103  0.365438  220.546
              50         3.5       10.4         0.0477893  0.416251  177.533
              50         2.90181   10.4         0.037995   0.477639  138.263
              50         2.01108   10.4         0.0307392  0.549551  107.679
              50         1.414     10.4         0.025364   0.614528  83.8606
              50         1.01377   8            0.0213819  0.673618  65.3107
              50         0.745486  8            0.0184319  0.727416  50.864
              50         0.56565   8            0.0162465  0.776021  39.6129
              50         0.445103  8            0.0146275  0.819115  30.8506
              250        0.273824  10.4         0.0118814  0.911701  77.4992
              250        0.209991  20           0.0104198  0.976109  22.2039
              500        0.200497  20           0.0100442  0.990829  8.18413
              500        0.200009  20           0.0100022  0.996255  0
            Chemical: PHUnits=Water
              Thickness  PH  CEC
              25         7   18.6975
              1975       7   8.5827
            Water: Thickness=[200, 100, 100, 200, 100, 100, 400, 400, 400]; InitialValues=[0.405, 0.392, 0.366, 0.047, 0.05, 0.043, 0.05, 0.05, 0.05]; FilledFromTop=false
            WaterBalance SoilWater: SummerDate=1-oct; SummerU=9; SummerCona=4.4; WinterDate=1-apr; WinterU=4; WinterCona=2; DiffusConst=88; DiffusSlope=35; Salb=0.13; CN2Bare=88; CNRed=22; CNCov=0.8; PSIDul=-100
              Thickness  SWCON  KLAT
              200        0.411  0
              100        0.396  0
              100        0.374  0
              200        0.27   0
              100        0.479  0
              100        0.495  0
              400        0.358  0
              400        0.358  0
              400        0.358  0
            SoilTemperature Temperature: InteractionsPerDay=8
            Solute NO3: Thickness=[25, 1975]; InitialValues=[1.58333, 18.4167]; InitialValuesUnits=kg/ha; WaterTableConcentration=0; D0=0; DepthConstant=0; MaxDepthSoluteAccessible=0; RunoffEffectivenessAtMovingSolute=0; MaxEffectiveRunoff=0
            Solute NH4: Thickness=[25, 1975]; InitialValues=[0.2375, 2.7625]; InitialValuesUnits=kg/ha; WaterTableConcentration=0; D0=0; DepthConstant=0; MaxDepthSoluteAccessible=0; RunoffEffectivenessAtMovingSolute=0; MaxEffectiveRunoff=0
            Solute Urea: Thickness=[25, 1975]; InitialValues=[0, 0]; InitialValuesUnits=ppm; WaterTableConcentration=0; D0=0; DepthConstant=0; MaxDepthSoluteAccessible=0; RunoffEffectivenessAtMovingSolute=0; MaxEffectiveRunoff=0
            Nutrient
            OutputLayers: Thickness=[400, 400, 400, 400, 400]
        Manager AutoIrrigationDeficitBased: same as Sensitivity.Pukekohe.Site2.AutoIrrigationDeficitBased
        Manager ResetDate: same as Replacements.ResetDate
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